*Heading
** Job name: umat_cube_elastoplastic_solver Model name: umat_cube_elastoplastic_solver
** Generated by: Abaqus/CAE 2023.HF4
*Preprint, echo=NO, model=NO, history=NO, contact=NO
**
** PARTS
**
*Part, name=cube
*Node
      1, 0.00999999978, 0.00999999978, 0.00999999978
      2, 0.00999999978, 0.00749999983, 0.00999999978
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*Element, type=C3D8T
 1,  26,  27,  32,  31,   1,   2,   7,   6
 2,  27,  28,  33,  32,   2,   3,   8,   7
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*Nset, nset=Set-1, generate
   1,  125,    1
*Elset, elset=Set-1, generate
  1,  64,   1
** Section: Section-1-Whole specimen
*Solid Section, elset=Set-1, material=steel
,
*End Part
**
**
** ASSEMBLY
**
*Assembly, name=Assembly
**
*Instance, name=cube-1, part=cube
*End Instance
**
*Nset, nset=top_side, instance=cube-1, generate
   1,  121,    5
*Elset, elset=top_side, instance=cube-1, generate
  1,  61,   4
*Nset, nset=xsymm_side, instance=cube-1, generate
 101,  125,    1
*Elset, elset=xsymm_side, instance=cube-1, generate
 49,  64,   1
*Nset, nset=ysymm_side, instance=cube-1, generate
   5,  125,    5
*Elset, elset=ysymm_side, instance=cube-1, generate
  4,  64,   4
*Nset, nset=zsymm_side, instance=cube-1
  21,  22,  23,  24,  25,  46
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*Elset, elset=zsymm_side, instance=cube-1
 13, 14, 15, 16, 29, 30, 31, 32, 45, 46, 47, 48, 61, 62, 63, 64
*End Assembly
*Amplitude, name=AMP-1
             0.,              0.,              1.,              1.
**
** MATERIALS
**
*Material, name=steel
*Conductivity
45.,
*Density
7850.,
*Elastic
 2.1e+11, 0.3
*Plastic
 8.39646e+08,     0.
 8.80025e+08, 0.0003
 9.06975e+08, 0.0005
 9.26275e+08,  0.001
 9.26275e+08,  0.002
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 1.20529e+09,     3.
*Specific Heat
420.,
** ----------------------------------------------------------------
**
** STEP: Step-1
**
*Step, name=Step-1, nlgeom=YES
*Coupled Temperature-displacement, creep=none, deltmx=1.
1., 1., 1e-05, 1.
**
** BOUNDARY CONDITIONS
**
** Name: h_charge Type: Temperature
*Boundary
top_side, 11, 11, 1.
** Name: top_disp Type: Displacement/Rotation
*Boundary, amplitude=AMP-1
top_side, 2, 2, 0.002
** Name: xsymm Type: Symmetry/Antisymmetry/Encastre
*Boundary
xsymm_side, XSYMM
** Name: ysymm Type: Symmetry/Antisymmetry/Encastre
*Boundary
ysymm_side, YSYMM
** Name: zsymm Type: Symmetry/Antisymmetry/Encastre
*Boundary
zsymm_side, ZSYMM
**
** OUTPUT REQUESTS
**
*Restart, write, frequency=0
**
** FIELD OUTPUT: F-Output-1
**
*Output, field
*Node Output
NT, RF, RFL, U
*Element Output, directions=YES
HFL, LE, PE, PEEQ, S, SDV, TEMP
*Output, history, frequency=0
*End Step
