*Heading
** Job name: vumat_cube_elastoplastic_srt Model name: vumat_cube_elastoplastic_srt
** Generated by: Abaqus/CAE 2023.HF4
*Preprint, echo=NO, model=NO, history=NO, contact=NO
**
** PARTS
**
*Part, name=cube
*Node
      1, 0.00999999978, 0.00999999978, 0.00999999978
      2, 0.00999999978, 0.00749999983, 0.00999999978
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*Element, type=C3D8T
 1,  26,  27,  32,  31,   1,   2,   7,   6
 2,  27,  28,  33,  32,   2,   3,   8,   7
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*Nset, nset=Set-1, generate
   1,  125,    1
*Elset, elset=Set-1, generate
  1,  64,   1
** Section: Section-1-Whole specimen
*Solid Section, elset=Set-1, material=steel
,
*End Part
**
**
** ASSEMBLY
**
*Assembly, name=Assembly
**
*Instance, name=cube-1, part=cube
*End Instance
**
*Nset, nset=hSurface, instance=cube-1, generate
  1,  25,   1
*Elset, elset=hSurface, instance=cube-1, generate
  1,  16,   1
*Nset, nset=top_side, instance=cube-1, generate
   1,  121,    5
*Elset, elset=top_side, instance=cube-1, generate
  1,  61,   4
*Nset, nset=xsymm_side, instance=cube-1, generate
 101,  125,    1
*Elset, elset=xsymm_side, instance=cube-1, generate
 49,  64,   1
*Nset, nset=ysymm_side, instance=cube-1, generate
   5,  125,    5
*Elset, elset=ysymm_side, instance=cube-1, generate
  4,  64,   4
*Nset, nset=zsymm_side, instance=cube-1
  21,  22,  23,  24,  25,  46
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*Elset, elset=zsymm_side, instance=cube-1
 13, 14, 15, 16, 29, 30, 31, 32, 45, 46, 47, 48, 61, 62, 63, 64
*End Assembly
*Amplitude, name=AMP-1
             0.,              0.,              1.,              1.
**
** MATERIALS
**
*Material, name=steel
*Density
7850.,
*Depvar
     19,
*User Material, constants=9, type=THERMAL
 1.27e-08,     2e-06,     8.314,      300.,   5.1e+29, 2.084e+21,    28600.,   -19576.
   -60000.,
*User Material, constants=168, type=MECHANICAL
 2.1e+11,         0.3,          0.,          0.,          0.,          0.,          0.,          0.
 8.39646e+08,          0., 8.80025e+08,      0.0003, 9.06975e+08,      0.0005, 9.26275e+08,       0.001
 9.26275e+08,       0.002, 9.39393e+08,       0.003, 9.49756e+08,       0.004, 9.58495e+08,       0.005
 9.66134e+08,       0.006,  9.7296e+08,       0.007,  9.7915e+08,       0.008, 9.84823e+08,       0.009
 9.90061e+08,        0.01, 1.02747e+09,        0.02, 1.04975e+09,        0.03, 1.06431e+09,        0.04
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 1.20355e+09,        2.85, 1.20414e+09,         2.9, 1.20472e+09,        2.95, 1.20529e+09,          3.
** ----------------------------------------------------------------
**
** STEP: Step-1
**
*Step, name=Step-1, nlgeom=YES
*Dynamic Temperature-displacement, Explicit
, 1.
*Bulk Viscosity
0.06, 1.2
**
** BOUNDARY CONDITIONS
**
** Name: hydrogen_concentration Type: Temperature
*Boundary
top_side, 11, 11, 1.
** Name: top_displcement Type: Displacement/Rotation
*Boundary, amplitude=AMP-1
top_side, 2, 2, 0.002
** Name: xsymm Type: Displacement/Rotation
*Boundary
xsymm_side, 1, 1
** Name: ysymm Type: Displacement/Rotation
*Boundary
ysymm_side, 2, 2
** Name: zsymm Type: Displacement/Rotation
*Boundary
zsymm_side, 3, 3
**
** OUTPUT REQUESTS
**
*Restart, write, number interval=1, time marks=NO
**
** FIELD OUTPUT: F-Output-1
**
*Output, field, number interval=100
*Node Output
NT, RF, RFL, U
*Element Output, directions=YES
HFL, LE, PE, PEEQ, S, SDV, TEMP
*Output, history, frequency=0
*End Step
