*Heading
** Job name: plate_model_vumat Model name: plate_model_vumat
** Generated by: Abaqus/CAE 2023.HF4
*Preprint, echo=NO, model=NO, history=NO, contact=NO
**
** PARTS
**
*Part, name=plate_model_2D
*Node
      1, 0.000508709403, 0.000509524019
      2,  0.224816993,  0.225177005
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*Element, type=CPE4RT
  1,    1,   24,  962,  183
  2,   24,   25,  963,  962
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*Nset, nset=Set-1, generate
    1,  6949,     1
*Elset, elset=Set-1, generate
    1,  6776,     1
** Section: Section-1
*Solid Section, elset=Set-1, controls=EC-1, material=Material-1
,
*End Part
**
**
** ASSEMBLY
**
*Assembly, name=Assembly
**
*Instance, name=plate_model_2D-1, part=plate_model_2D
*End Instance
**
*Nset, nset=OuterN, instance=plate_model_2D-1
   7,  10,  11,  12,  15,  16
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*Nset, nset=bottom_encastre, instance=plate_model_2D-1
  17,  18,  21,  23, 646, 647
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*Elset, elset=bottom_encastre, instance=plate_model_2D-1
 4031, 4032, 4033, 4034, 4035, 4036
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*Nset, nset=hydrogen_charged_edge, instance=plate_model_2D-1
  12,  13,  20,  22,  23, 455
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*Elset, elset=hydrogen_charged_edge, instance=plate_model_2D-1
 2831, 2832, 2833, 2834, 2835, 2836
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*Nset, nset=whole_plate, instance=plate_model_2D-1, generate
    1,  6949,     1
*Elset, elset=whole_plate, instance=plate_model_2D-1, generate
    1,  6776,     1
*End Assembly
**
** ELEMENT CONTROLS
**
*Section Controls, name=EC-1, hourglass=STIFFNESS
1., 1., 1.
*Amplitude, name=Amp-1
             0.,              0.,            130.,              1.
**
** MATERIALS
**
*Material, name=Material-1
*Density
 0.0001,
*Depvar
     21,
1, Eqplas, Eqplas
2, Deqplas, Deqplas
3, Sig_H, Sig_H
4, Sig_vonMises, Sig_vonMises
5, CL_R, CL_R
6, KT, KT
7, CL_bar, CL_bar
8, SDV8, SDV8
9, xNT, xNT
10, xdNTdeps, xdNTdeps
11, Dstar, Dstar
12, dEnerTh, dEnerTh
13, dEnerThDTemp, dEnerThDTemp
14, xThetaT, xThetaT
15, SDV15, SDV15
16, SDV16, SDV16
17, CL_mol
18, C_trap_mol, C_trap_mol
19, C_total, C_total
20, CL/CL0, CL/CL0
21, mu_bar, mu_bar
*User Material, constants=9, type=THERMAL
 0.0127,       2000.,     8314.46,        300.,     5.1e+20,   2.084e+12,    2.86e+07, -1.9576e+07
      -6e+07,
*User Material, constants=4, type=MECHANICAL
207000., 0.3,250., 0.2
**
** PREDEFINED FIELDS
**
** Name: Predefined Field-1   Type: Temperature
*Initial Conditions, type=TEMPERATURE
whole_plate, 1.
** ----------------------------------------------------------------
**
** STEP: Step-1
**
*Step, name=Step-1, nlgeom=YES
*Dynamic Temperature-displacement, Explicit
, 130.
*Bulk Viscosity
0.06, 1.2
**
** BOUNDARY CONDITIONS
**
** Name: disp_user Type: Displacement/Rotation
*Boundary, amplitude=Amp-1, user
OuterN, 1, 1, 1.
OuterN, 2, 2, 1.
** Name: fixed_edge Type: Displacement/Rotation
*Boundary
bottom_encastre, 2, 2
** Name: hydrogen_concentration Type: Temperature
*Boundary
hydrogen_charged_edge, 11, 11, 1.
**
** OUTPUT REQUESTS
**
*Restart, write, number interval=1, time marks=NO
**
** FIELD OUTPUT: F-Output-1
**
*Output, field, number interval=100
*Node Output
NT, RF, RFL, U
*Element Output, directions=YES
E, HFL, LE, S, SDV, TEMP
*Output, history, frequency=0
*End Step
