*Heading
** Job name: elastic_plate_3D Model name: elastic_plate_3D
** Generated by: Abaqus/CAE 2023.HF4
*Preprint, echo=NO, model=NO, history=NO, contact=NO
**
** PARTS
**
*Part, name=elastic-hold-plate
*Node
      1, 0.0185979996, 0.0599999987,           0.
      2, 0.0185979996, 0.0181120001,           0.
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*Element, type=C3D8T
  1,   8,  96, 659, 125,   1,  21, 499,  76
  2,  96,  95, 660, 659,  21,  22, 500, 499
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*Nset, nset=Set-1, generate
    1,  3196,     1
*Elset, elset=Set-1, generate
    1,  1499,     1
** Section: Section-1
*Solid Section, elset=Set-1, material=Material-1
,
*End Part
**
**
** ASSEMBLY
**
*Assembly, name=Assembly
**
*Instance, name=elastic-hold-plate-1, part=elastic-hold-plate
*End Instance
**
*Nset, nset=whole_part, instance=elastic-hold-plate-1, generate
    1,  3196,     1
*Elset, elset=whole_part, instance=elastic-hold-plate-1, generate
    1,  1499,     1
*Nset, nset=xsymm_side, instance=elastic-hold-plate-1
   3,   4,   6,   7,  17,  20
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*Elset, elset=xsymm_side, instance=elastic-hold-plate-1
 169, 170, 171, 172, 173, 174
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*Nset, nset=ysymm_side, instance=elastic-hold-plate-1
  13,  14,  15,  16,  18,  19
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*Elset, elset=ysymm_side, instance=elastic-hold-plate-1
 683, 684, 685, 686, 687, 688
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*Nset, nset=zsymm_side, instance=elastic-hold-plate-1, generate
    1,  3196,     1
*Elset, elset=zsymm_side, instance=elastic-hold-plate-1, generate
    1,  1499,     1
*Elset, elset=_Surf-1_S5, internal, instance=elastic-hold-plate-1, generate
 210,  546,   21
*Elset, elset=_Surf-1_S6, internal, instance=elastic-hold-plate-1, generate
   1,  169,   21
*Surface, type=ELEMENT, name=Surf-1
_Surf-1_S5, S5
_Surf-1_S6, S6
*End Assembly
**
** MATERIALS
**
*Material, name=Material-1
*Density
1.,
*Depvar
     43,
*User Material, constants=24, type=THERMAL
3.,          1.,     8.31446,        300.,       2e-06,    3.07e-10, 6.02214e+23,   8.518e+28
          1.,          1.,          1.,          0.,   8.464e+22,   8.464e+26,     -20200.,     -58600.
     -11500.,          6.,          1.,   2.866e-10,   3.571e-10,       2e+16,       1e+10,      30000.
*User Material, constants=208, type=MECHANICAL
 2.1e+11,         0.3,          0.,          0.,          0.,          0.,          0.,          0.
 8.69678e+08,          0., 8.71527e+08,      0.0002, 8.73375e+08,      0.0004, 8.75224e+08,      0.0006
 8.77073e+08,      0.0008, 8.78921e+08,       0.001, 8.88164e+08,       0.002, 8.97407e+08,       0.003
  9.0665e+08,       0.004, 9.15893e+08,       0.005, 9.25136e+08,       0.006, 9.34379e+08,       0.007
 9.43622e+08,       0.008, 9.52085e+08,       0.009, 9.59845e+08,        0.01, 1.01043e+09,        0.02
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 1.26043e+09,        2.85, 1.26213e+09,         2.9, 1.26382e+09,        2.95, 1.26549e+09,          3.
*User Output Variables
     10,
**
** PREDEFINED FIELDS
**
** Name: Cbar_L   Type: Temperature
*Initial Conditions, type=TEMPERATURE
whole_part, 20.
** ----------------------------------------------------------------
**
** STEP: Step-1
**
*Step, name=Step-1, nlgeom=YES, inc=10000000
*Coupled Temperature-displacement, creep=none, deltmx=10.
5e+06, 1e+10, 1e+06, 1e+07
**
** BOUNDARY CONDITIONS
**
** Name: Xsymm Type: Symmetry/Antisymmetry/Encastre
*Boundary
xsymm_side, XSYMM
** Name: Ysymm Type: Symmetry/Antisymmetry/Encastre
*Boundary
ysymm_side, YSYMM
** Name: Zsymm Type: Symmetry/Antisymmetry/Encastre
*Boundary
zsymm_side, ZSYMM
**
** LOADS
**
** Name: Load-1   Type: Pressure
*Dsload
Surf-1, P, -1e+08
**
** PREDEFINED FIELDS
**
** Name: Predefined Field-2   Type: Field
*Field, variable=1, user
whole_part
**
** OUTPUT REQUESTS
**
*Restart, write, frequency=0
**
** FIELD OUTPUT: F-Output-1
**
*Output, field
*Node Output
COORD, NT, RF, U
*Element Output, directions=YES
COORD, LE, S, SDV, UVARM
*Output, history, frequency=0
*End Step
