*Heading
** Job name: elastoplastic_plate_3D Model name: elastoplastic_plate_3D
** Generated by: Abaqus/CAE 2023.HF4
*Preprint, echo=NO, model=NO, history=NO, contact=NO
**
** PARTS
**
*Part, name=elastic-plastic-plate
*Node
      1, 0.0599999987, 0.0250000004, 0.00100000005
      2, 0.0599999987, 0.0250000004,           0.
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*Element, type=C3D8T
   1,   73,   74,   76,   75,    1,    2,    4,    3
   2,   75,   76,   78,   77,    3,    4,    6,    5
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*Nset, nset=Set-1, generate
     1,  15574,      1
*Elset, elset=Set-1, generate
    1,  7588,     1
** Section: Section-1
*Solid Section, elset=Set-1, material=Material-1
,
*End Part
**
**
** ASSEMBLY
**
*Assembly, name=Assembly
**
*Instance, name=elastic-plastic-plate-1, part=elastic-plastic-plate
*End Instance
**
*Nset, nset=top_side, instance=elastic-plastic-plate-1
   71,   72,  143,  144,  215,  216
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*Elset, elset=top_side, instance=elastic-plastic-plate-1, generate
   35,  2100,    35
*Nset, nset=whole_part, instance=elastic-plastic-plate-1, generate
     1,  15574,      1
*Elset, elset=whole_part, instance=elastic-plastic-plate-1, generate
    1,  7588,     1
*Nset, nset=xsymm_side, instance=elastic-plastic-plate-1
    1,    2,    3,    4,    5,    6
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*Elset, elset=xsymm_side, instance=elastic-plastic-plate-1
    1,    2,    3,    4,    5,    6
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*Nset, nset=ysymm_side, instance=elastic-plastic-plate-1
 4413, 4414, 4415, 4416, 4417, 4418
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*Elset, elset=ysymm_side, instance=elastic-plastic-plate-1
 2258, 2274, 2286, 2296, 2297, 2307
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*Nset, nset=zsymm_side, instance=elastic-plastic-plate-1, generate
     1,  15574,      1
*Elset, elset=zsymm_side, instance=elastic-plastic-plate-1, generate
    1,  7588,     1
*End Assembly
*Amplitude, name=Amp-1
             0.,              0.,         100000.,              1.
**
** MATERIALS
**
*Material, name=Material-1
*Density
1.,
*Depvar
     44,
*User Material, constants=4, type=THERMAL
 8.31446,    293.,   2e-06, 3.8e-11
*User Material, constants=5, type=MECHANICAL
 2e+11, 0.3, 0.2,  3.,  2.
*Material, name=Material-1_old
*Density
1.,
*Depvar
     50,
*User Material, constants=4, type=THERMAL
 8.31446,    293.,   2e-06, 3.8e-11
*User Material, constants=5, type=MECHANICAL
 2e+11, 0.3, 0.2,  3.,  2.
**
** BOUNDARY CONDITIONS
**
** Name: XSYMM Type: Symmetry/Antisymmetry/Encastre
*Boundary
xsymm_side, XSYMM
** Name: YSYMM Type: Symmetry/Antisymmetry/Encastre
*Boundary
ysymm_side, YSYMM
** Name: ZSYMM Type: Symmetry/Antisymmetry/Encastre
*Boundary
zsymm_side, ZSYMM
**
** PREDEFINED FIELDS
**
** Name: Cbar_L   Type: Temperature
*Initial Conditions, type=TEMPERATURE
whole_part, 27.
** ----------------------------------------------------------------
**
** STEP: Step-1
**
*Step, name=Step-1, nlgeom=YES, inc=1000
*Coupled Temperature-displacement, creep=none
1000., 100000.,
**
** BOUNDARY CONDITIONS
**
** Name: DISP Type: Displacement/Rotation
*Boundary, amplitude=Amp-1
top_side, 2, 2, 0.0006
**
** PREDEFINED FIELDS
**
** Name: Predefined Field-1   Type: Field
*Field, variable=1, user
whole_part
**
** OUTPUT REQUESTS
**
*Restart, write, frequency=0
**
** FIELD OUTPUT: F-Output-1
**
*Output, field
*Node Output
COORD, NT, RF, RFL, U
*Element Output, directions=YES
COORD, E, HFL, LE, S, SDV, TEMP
*Output, history, frequency=0
*End Step
