*Heading
** Job name: elastoplastic_plate_3D Model name: elastoplastic_plate_3D
** Generated by: Abaqus/CAE 2023.HF4
*Preprint, echo=NO, model=NO, history=NO, contact=NO
**
** PARTS
**
*Part, name=elastic-plastic-plate
*Node
1, 0.0599999987, 0.0250000004, 0.00100000005
2, 0.0599999987, 0.0250000004,           0.
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*Element, type=C3D8T
1,   73,   74,   76,   75,    1,    2,    4,    3
2,   75,   76,   78,   77,    3,    4,    6,    5
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*Nset, nset=Set-1, generate
1,  15574,      1
*Elset, elset=Set-1, generate
1,  7588,     1
** Section: Section-1
*Solid Section, elset=Set-1, material=Material-1
,
*End Part
**
**
** ASSEMBLY
**
*Assembly, name=Assembly
**
*Instance, name=elastic-plastic-plate-1, part=elastic-plastic-plate
*End Instance
**
*Nset, nset=top_side, instance=elastic-plastic-plate-1
71,   72,  143,  144,  215,  216
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*Elset, elset=top_side, instance=elastic-plastic-plate-1, generate
35,  2100,    35
*Nset, nset=whole_part, instance=elastic-plastic-plate-1, generate
1,  15574,      1
*Elset, elset=whole_part, instance=elastic-plastic-plate-1, generate
1,  7588,     1
*Nset, nset=xsymm_side, instance=elastic-plastic-plate-1
1,    2,    3,    4,    5,    6
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*Elset, elset=xsymm_side, instance=elastic-plastic-plate-1
1,    2,    3,    4,    5,    6
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*Nset, nset=ysymm_side, instance=elastic-plastic-plate-1
4413, 4414, 4415, 4416, 4417, 4418
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*Elset, elset=ysymm_side, instance=elastic-plastic-plate-1
2258, 2274, 2286, 2296, 2297, 2307
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*Nset, nset=zsymm_side, instance=elastic-plastic-plate-1, generate
1,  15574,      1
*Elset, elset=zsymm_side, instance=elastic-plastic-plate-1, generate
1,  7588,     1
*End Assembly
*Amplitude, name=Amp-1
0.,              0.,         100000.,              1.
**
** MATERIALS
**
*Material, name=Material-1
*Density
1.,
*Depvar
  37,
1, AR1_sig11, AR1_sig11
2, AR2_sig22, AR2_sig22
3, AR3_sig33, AR3_sig33
4, AR4_sig12, AR4_sig12
5, AR5_sig13, AR5_sig13
6, AR6_sig23, AR6_sig23
7, AR7_stran11, AR7_stran11
8, AR8_stran22, AR8_stran22
9, AR9_stran33, AR9_stran33
10, AR10_stran12, AR10_stran12
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37, AR37_thetaT_dis, AR37_thetaT_dis
*User Material, constants=24, type=THERMAL
**
** =============================
**
** HYDROGEN DIFFUSION PROPERTIES
**
3, 1, 8.31446e0, 293.0e0, 2e-06, 3.8e-11, 6.02214e+23, 9.24e+28
** mode_trap (1 - no trap I 2 - kumnick, krom | 3 - sofronis, dadfarnia), crystal_structure (1 - BCC | 2 - FCC), Universal gas constant - R (N*m)/(mol*K), Temperature - T (K)
** Partial molar volume - VH (m^3/mol), Diffusion coefficient - DL (m^2/s), Avogadro's constant - avogadro (1/mol), Number of solvent metal atoms per unit volume - NL (1/m^3)
1.0e0, 1.0e0, 1.0e0, 0.0d0, 8.464e+22, 8.464e+26,  -18e+3, -58.6e+3
** Number of interstitial sites per trap site (dislocations) - alpha_dis (dimless), Number of interstitial sites per trap site (grain boundaries) - alpha_gb (dimless), Number of interstitial sites per trap site (carbides) - alpha_carb (dimless), Number of trap type of dislocations - NT_dis (1/m^3)
** Number of trap type of grain boundaries - NT_gb (1/m^3), Number of trap type of carbides - NT_carb (1/m^3), Binding energy of hydrogen to dislocations - WB_dis (N*m/mol), Binding energy of hydrogen to grain boundaries - WB_gb (N*m/mol)
-11.5e+3, 6.0e0, 1.0e0, 2.866e-10, 3.571e-10, 2.0e+16, 1.0e+10 , 30000.0e0
** Binding energy of hydrogen to carbides - WB_carb (N*m/mol), Number of hydrogen atoms that can reside in each BCC lattice site - beta_BCC (dimless), Number of hydrogen atoms that can reside in each FCC lattice site - beta_FCC (dimless), Lattice parameter for BCC - a_lattice_BCC (m)
** Lattice parameter for FCC - a_lattice_FCC (m), gamma fitting parameter in Dadfarnia et al. - gamma (1/m^2), Dislocation density for the annealed material in Dadfarnia et al. - rho_d0 (1/m^2), Gibbs free energy difference between the decohering interface and the surrounding material - delta_g_b0 (N*m/mol)
**
*******************************************************
*User Material, constants=8, type=MECHANICAL
**
** =====================
**
** MECHANICAL PROPERTIES
**
200e+9, 0.3e0, 500e+6, 0.2, 1, 0.0, 0.0, 0.0
** Young's modulus - E (Pa), Poisson ratio - nu (dimless), Initial yield stress - sig_0 (Pa), n_hardening
** case_study_version, none, none, none
**
*******************************************************
*Material, name=Material-1_old
*Density
1.,
*Depvar
50,
*User Material, constants=4, type=THERMAL
8.31446,    293.,   2e-06, 3.8e-11
*User Material, constants=5, type=MECHANICAL
2e+11, 0.3, 0.2,  3.,  2.
**
** BOUNDARY CONDITIONS
**
** Name: XSYMM Type: Symmetry/Antisymmetry/Encastre
*Boundary
xsymm_side, XSYMM
** Name: YSYMM Type: Symmetry/Antisymmetry/Encastre
*Boundary
ysymm_side, YSYMM
** Name: ZSYMM Type: Symmetry/Antisymmetry/Encastre
*Boundary
zsymm_side, ZSYMM
**
** PREDEFINED FIELDS
**
** Name: Cbar_L   Type: Temperature
*Initial Conditions, type=TEMPERATURE
whole_part, 27.
** ----------------------------------------------------------------
**
** STEP: Step-1
**
*Step, name=Step-1, nlgeom=YES, inc=1000
*Coupled Temperature-displacement, creep=none
1000., 100000.,
**
** BOUNDARY CONDITIONS
**
** Name: DISP Type: Displacement/Rotation
*Boundary, amplitude=Amp-1
top_side, 2, 2, 0.0006
**
** PREDEFINED FIELDS
**
** Name: Predefined Field-1   Type: Field
*Field, variable=1, user
whole_part
**
** OUTPUT REQUESTS
**
*Restart, write, frequency=0
**
** FIELD OUTPUT: F-Output-1
**
*Output, field
*Node Output
COORD, NT, RF, RFL, U
*Element Output, directions=YES
COORD, E, HFL, LE, S, SDV, TEMP
*Output, history, frequency=0
*End Step
