*Heading
** Job name: Job-1 Model name: Model-1
** Generated by: Abaqus/CAE 2023.HF4
*Preprint, echo=NO, model=NO, history=NO, contact=NO
**
** PARTS
**
*Part, name=Part-1
*Node
      1,           0.,           0.
      2, 0.0500000007,           0.
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*Element, type=CPE4HT
   1,    1,    2, 1003, 1002
   2,    2,    3, 1004, 1003
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*Nset, nset=Set-1, generate
    1,  2002,     1
*Elset, elset=Set-1, generate
    1,  1000,     1
*Nset, nset=nodes_along_bar, unsorted
    1,    2,    3,    4,    5,    6
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** Section: Section-1
*Solid Section, elset=Set-1, material=Material-1
,
*End Part
**
**
** ASSEMBLY
**
*Assembly, name=Assembly
**
*Instance, name=Part-1-1, part=Part-1
*End Instance
**
*Nset, nset=Set-1, instance=Part-1-1
    1, 1002
*Elset, elset=Set-1, instance=Part-1-1
 1,
*Nset, nset=Set-2, instance=Part-1-1
 1001, 2002
*Elset, elset=Set-2, instance=Part-1-1
 1000,
*Nset, nset=Set-3, instance=Part-1-1, generate
    1,  1001,     1
*Elset, elset=Set-3, instance=Part-1-1, generate
    1,  1000,     1
*Nset, nset=Set-4, instance=Part-1-1, generate
    1,  1001,     1
*Elset, elset=Set-4, instance=Part-1-1, generate
    1,  1000,     1
*Nset, nset=Set-5, instance=Part-1-1
    1, 1002
*Elset, elset=Set-5, instance=Part-1-1
 1,
*Nset, nset=Set-6, instance=Part-1-1
 1001, 2002
*Elset, elset=Set-6, instance=Part-1-1
 1000,
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*Elset, elset=_Surf-1_S2, internal, instance=Part-1-1
 1000,
*Surface, type=ELEMENT, name=Surf-1
_Surf-1_S2, S2
*Elset, elset=_Surf-2_S2, internal, instance=Part-1-1
 1000,
*Surface, type=ELEMENT, name=Surf-2
_Surf-2_S2, S2
*Elset, elset=_Surf-3_S2, internal, instance=Part-1-1
 1000,
*Surface, type=ELEMENT, name=Surf-3
_Surf-3_S2, S2
*End Assembly
*Amplitude, name=Ramp
             0.,              0.,              1.,              1.
**
** MATERIALS
**
*Material, name=Material-1
*Conductivity
 3.8e-05,
*Density
1.,
*Elastic
200000., 0.3
*Specific Heat
1.,
** ----------------------------------------------------------------
**
** STEP: Step-1
**
*Step, name=Step-1, nlgeom=YES, inc=2000
*Coupled Temperature-displacement, creep=none
10000., 2e+07,
**
** BOUNDARY CONDITIONS
**
** Name: BC-1 Type: Displacement/Rotation
*Boundary
Set-3, 2, 2
** Name: BC-2 Type: Displacement/Rotation
*Boundary
Set-4, 1, 1
** Name: BC-3 Type: Temperature
*Boundary
Set-5, 11, 11
** Name: BC-4 Type: Temperature
*Boundary
Set-6, 11, 11, 100.
**
** OUTPUT REQUESTS
**
*Restart, write, frequency=0
**
** FIELD OUTPUT: F-Output-1
**
*Output, field
*Node Output
NT,
**
** HISTORY OUTPUT: H-Output-1
**
*Output, history, variable=PRESELECT
*End Step
