*Heading
** Job name: Job-1 Model name: Model-1
** Generated by: Abaqus/CAE 2023.HF4
*Preprint, echo=NO, model=NO, history=NO, contact=NO
**
** PARTS
**
*Part, name=elastic_hole_plate
*Node
      1, 0.0145979999,           0.
      2, 0.0145979999, 0.0141120004
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*Element, type=CPE8RT
  1,  461,  532,  478,  470, 1760, 1761, 1762, 1763
  2,  414,  426,  448,  436, 1764, 1765, 1766, 1767
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*Nset, nset=Set-1, generate
    1,  5199,     1
*Elset, elset=Set-1, generate
    1,  1682,     1
*Nset, nset=Point_A
 5,
*Nset, nset=Point_B
 930,
*Nset, nset=Point_C
 4,
** Section: Section-1
*Solid Section, elset=Set-1, material=Material-1
,
*End Part
**
**
** ASSEMBLY
**
*Assembly, name=Assembly
**
*Instance, name=Part-1-1, part=elastic_hole_plate
*End Instance
**
*Nset, nset=Set-1, instance=Part-1-1, generate
    1,  5199,     1
*Elset, elset=Set-1, instance=Part-1-1, generate
    1,  1682,     1
*Nset, nset=Set-2, instance=Part-1-1, generate
    1,  5199,     1
*Elset, elset=Set-2, instance=Part-1-1, generate
    1,  1682,     1
*Nset, nset=Set-3, instance=Part-1-1
    3,    4,    8,   36,   37,   38
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*Elset, elset=Set-3, instance=Part-1-1
  31,  32,  38,  39,  77, 149
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*Nset, nset=Set-4, instance=Part-1-1
    1,    5,    6,   76,   77,   78
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*Elset, elset=Set-4, instance=Part-1-1
  54,  74, 101, 150, 188, 237
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*Nset, nset=Set-8, instance=Part-1-1
    1,    3,    4,    5,    6,    7
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*Elset, elset=Set-8, instance=Part-1-1
   5,  25,  26,  31,  32,  33
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*Nset, nset=Set-9, instance=Part-1-1
    6,    7,    8,  104,  105,  106
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*Elset, elset=Set-9, instance=Part-1-1
 478, 479, 495, 496, 504, 505
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*Nset, nset=Set-13, instance=Part-1-1, generate
    1,  5199,     1
*Elset, elset=Set-13, instance=Part-1-1, generate
    1,  1682,     1
*Elset, elset=_Surf-1_S2, internal, instance=Part-1-1
 495, 496, 522, 523, 524, 527, 539, 540, 541, 679, 780, 815, 816, 817, 825
*Elset, elset=_Surf-1_S4, internal, instance=Part-1-1
 504, 505, 520, 526, 534, 535, 536, 537, 538, 542, 828, 836
*Surface, type=ELEMENT, name=Surf-1
_Surf-1_S2, S2
_Surf-1_S4, S4
*Elset, elset=_Surf-2_S2, internal, instance=Part-1-1
 495, 496, 522, 523, 524, 527, 539, 540, 541, 679, 780, 815, 816, 817, 825
*Elset, elset=_Surf-2_S4, internal, instance=Part-1-1
 504, 505, 520, 526, 534, 535, 536, 537, 538, 542, 828, 836
*Surface, type=ELEMENT, name=Surf-2
_Surf-2_S2, S2
_Surf-2_S4, S4
*End Assembly
**
** MATERIALS
**
** Mechanical props: E (Pa), nu (dimless), element_flag (0 or 1)
** if element_flag = 0, element CPE8RT is used
** if element_flag = 1, element CPE8HT is used
**
** Thermal props: R (J / (mol K), T (K), VH (m^3/mol), DL (m^2/s)
**
** STATEV(1): eps_elastic(1)
** STATEV(2): eps_elastic(2)
** STATEV(3): eps_elastic(3)
** STATEV(4): eps_elastic(4)
** STATEV(5): hydrostatic_stress
** STATEV(6): Cbar_L
** STATEV(7): theta_L
**
*Material, name=Material-1
*Density
1.,
*Depvar
      6,
*User Material, constants=4, type=THERMAL
 8.31446,    293.,   2e-06, 3.8e-11
*User Material, constants=3, type=MECHANICAL
 2e+11, 0.3,  1.
**
** PREDEFINED FIELDS
**
** Name: CL_bar_field   Type: Temperature
*Initial Conditions, type=TEMPERATURE
Set-13, 20.
** ----------------------------------------------------------------
**
** STEP: Step-1
**
*Step, name=Step-1, nlgeom=YES, inc=10000
*Coupled Temperature-displacement, creep=none, deltmx=1.
500., 1e+06, 100., 1000.
**
** BOUNDARY CONDITIONS
**
** Name: Xsymm Type: Symmetry/Antisymmetry/Encastre
*Boundary
Set-3, XSYMM
** Name: Ysymm Type: Symmetry/Antisymmetry/Encastre
*Boundary
Set-4, YSYMM
**
** LOADS
**
** Name: Load-1   Type: Pressure
*Dsload
Surf-2, P, -1e+08
**
** OUTPUT REQUESTS
**
*Restart, write, frequency=0
**
** FIELD OUTPUT: F-Output-1
**
*Output, field, frequency=10
*Node Output
COORD, NT
*Element Output, directions=YES
COORD, S, SDV
**
** HISTORY OUTPUT: H-Output-1
**
*Output, history, variable=PRESELECT
*End Step
