*Heading
** Job name: Job-1 Model name: Model-1
** Generated by: Abaqus/CAE 2023.HF4
*Preprint, echo=NO, model=NO, history=NO, contact=NO
**
** PARTS
**
*Part, name=elastic-plastic-plate
*Node
      1,           0., 0.0254629999
      2, 0.0599999987, 0.0254629999
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*Element, type=CPE8RT
   1,    1,    8,  336,  193, 4637, 4638, 4639, 4640
   2,    8,    9,  337,  336, 4641, 4642, 4643, 4638
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*Nset, nset=Set-1, generate
     1,  13768,      1
*Elset, elset=Set-1, generate
    1,  4497,     1
** Section: Section-1
*Solid Section, elset=Set-1, material=Material-1
,
*End Part
**
**
** ASSEMBLY
**
*Assembly, name=Assembly
**
*Instance, name=elastic-plastic-plate-1, part=elastic-plastic-plate
*End Instance
**
*Nset, nset=Set-2, instance=elastic-plastic-plate-1
     6,     7,   264,   265,   266,   267
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*Elset, elset=Set-2, instance=elastic-plastic-plate-1
 2116, 2117, 2247, 2249, 2494, 2969
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*Nset, nset=Set-4, instance=elastic-plastic-plate-1
    3,    4,  101,  102,  103,  104
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*Elset, elset=Set-4, instance=elastic-plastic-plate-1, generate
 2041,  2100,     1
*Nset, nset=Set-5, instance=elastic-plastic-plate-1
     3,     4,     5,     6,     7,   101
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*Elset, elset=Set-5, instance=elastic-plastic-plate-1
 2041, 2042, 2043, 2044, 2045, 2046
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*Nset, nset=Set-7, instance=elastic-plastic-plate-1
     2,     3,     7,    67,    68,    69
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*Elset, elset=Set-7, instance=elastic-plastic-plate-1
   60,  120,  180,  240,  300,  360
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*Nset, nset=Set-8, instance=elastic-plastic-plate-1
     6,     7,   264,   265,   266,   267
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*Elset, elset=Set-8, instance=elastic-plastic-plate-1
 2116, 2117, 2247, 2249, 2494, 2969
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*Nset, nset=Set-9, instance=elastic-plastic-plate-1
    3,    4,  101,  102,  103,  104
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*Elset, elset=Set-9, instance=elastic-plastic-plate-1, generate
 2041,  2100,     1
*Nset, nset=Set-10, instance=elastic-plastic-plate-1, generate
     1,  13768,      1
*Elset, elset=Set-10, instance=elastic-plastic-plate-1, generate
    1,  4497,     1
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*End Assembly
*Amplitude, name=Amp-1
             0.,              0.,         100000.,              1.
**
** MATERIALS
**
*Material, name=Material-1
*Density
1.,
*Depvar
     22,
*User Material, constants=4, type=THERMAL
 8.31446,    293.,   2e-06, 3.8e-11
*User Material, constants=6, type=MECHANICAL
 2e+11,   0.3, 5e+08,   0.2,    2.,    1.
**
** PREDEFINED FIELDS
**
** Name: Cbar_L   Type: Temperature
*Initial Conditions, type=TEMPERATURE
Set-10, 27.
** ----------------------------------------------------------------
**
** STEP: Step-1
**
*Step, name=Step-1, nlgeom=YES, inc=1000
*Coupled Temperature-displacement, creep=none
1000., 100000.,
**
** BOUNDARY CONDITIONS
**
** Name: DISP Type: Displacement/Rotation
*Boundary, amplitude=Amp-1
Set-9, 2, 2, 0.0006
** Name: XSYMM Type: Symmetry/Antisymmetry/Encastre
*Boundary
Set-7, XSYMM
** Name: YSYMM Type: Symmetry/Antisymmetry/Encastre
*Boundary
Set-8, YSYMM
**
** OUTPUT REQUESTS
**
*Restart, write, frequency=0
**
** FIELD OUTPUT: F-Output-1
**
*Output, field
*Node Output
COORD, NT, RF, RFL, U
*Element Output, directions=YES
COORD, E, HFL, LE, S, SDV, TEMP
**
** HISTORY OUTPUT: H-Output-1
**
*Output, history, variable=PRESELECT
*End Step
