*Heading
** Job name: Job-1 Model name: Model-3D
** Generated by: Abaqus/CAE 2023.HF4
*Preprint, echo=NO, model=NO, history=NO, contact=NO
**
** PARTS
**
*Part, name=elastic-hold-plate
*Node
      1, 0.0185979996, 0.0599999987,           0.
      2, 0.0185979996, 0.0181120001,           0.
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*Element, type=C3D8T
  1,    8,   96,  871,  125,    1,   21,  711,   76
  2,   96,   95,  872,  871,   21,   22,  712,  711
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*Nset, nset=Set-1, generate
    1,  9060,     1
*Elset, elset=Set-1, generate
    1,  4378,     1
** Section: Section-1
*Solid Section, elset=Set-1, material=Material-1
10.,
*End Part
**
**
** ASSEMBLY
**
*Assembly, name=Assembly
**
*Instance, name=elastic-hold-plate-1, part=elastic-hold-plate
*End Instance
**
*Nset, nset=Set-1, instance=elastic-hold-plate-1, generate
    1,  9060,     1
*Elset, elset=Set-1, instance=elastic-hold-plate-1, generate
    1,  4378,     1
*Nset, nset=Set-2, instance=elastic-hold-plate-1
   3,   4,   6,   7,  17,  20
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*Elset, elset=Set-2, instance=elastic-hold-plate-1
  169,  170,  171,  172,  173,  174
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*Nset, nset=Set-3, instance=elastic-hold-plate-1
  13,  14,  15,  16,  18,  19
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*Elset, elset=Set-3, instance=elastic-hold-plate-1
  683,  684,  685,  686,  687,  688
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*Nset, nset=Set-4, instance=elastic-hold-plate-1
   3,   4,   6,   7,  17,  20
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*Elset, elset=Set-4, instance=elastic-hold-plate-1
  169,  170,  171,  172,  173,  174
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*Nset, nset=Set-5, instance=elastic-hold-plate-1
  13,  14,  15,  16,  18,  19
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*Elset, elset=Set-5, instance=elastic-hold-plate-1
  683,  684,  685,  686,  687,  688
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*Nset, nset=Set-6, instance=elastic-hold-plate-1
   3,   4,   6,   7,  17,  20
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*Elset, elset=Set-6, instance=elastic-hold-plate-1
  169,  170,  171,  172,  173,  174
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*Nset, nset=Set-11, instance=elastic-hold-plate-1, generate
    1,  9060,     1
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*Elset, elset=_Surf-1_S5, internal, instance=elastic-hold-plate-1, generate
 210,  546,   21
*Elset, elset=_Surf-1_S6, internal, instance=elastic-hold-plate-1, generate
   1,  169,   21
*Surface, type=ELEMENT, name=Surf-1
_Surf-1_S5, S5
_Surf-1_S6, S6
*End Assembly
**
** MATERIALS
**
*Material, name=Material-1
*Density
1.,
*Depvar
      8,
*User Material, constants=4, type=THERMAL
 8.31446,    300.,   2e-06, 3.8e-11
*User Material, constants=2, type=MECHANICAL
 2e+11, 0.3
**
** PREDEFINED FIELDS
**
** Name: Cbar_L   Type: Temperature
*Initial Conditions, type=TEMPERATURE
Set-1, 20.
** ----------------------------------------------------------------
**
** STEP: Step-1
**
*Step, name=Step-1, nlgeom=YES, inc=10000000
*Coupled Temperature-displacement, creep=none, deltmx=10.
500., 1e+10, 100., 1000.
**
** BOUNDARY CONDITIONS
**
** Name: Xsymm Type: Symmetry/Antisymmetry/Encastre
*Boundary
Set-6, XSYMM
** Name: Ysymm Type: Symmetry/Antisymmetry/Encastre
*Boundary
Set-5, YSYMM
** Name: Zsymm Type: Symmetry/Antisymmetry/Encastre
*Boundary
Set-11, ZSYMM
**
** LOADS
**
** Name: Load-1   Type: Pressure
*Dsload
Surf-1, P, -1e+08
**
** OUTPUT REQUESTS
**
*Restart, write, frequency=0
**
** FIELD OUTPUT: F-Output-1
**
*Output, field
*Node Output
COORD, NT
*Element Output, directions=YES
COORD, LODE, S, SDV, TRIAX
**
** HISTORY OUTPUT: H-Output-1
**
*Output, history, variable=PRESELECT
*End Step
