*Heading
***************************************************************************************
******************** Dynamic fracture using 3D hexagonal elements *********************
***************************************************************************************
** Job name: Test_3D_hexa Model name: Model-1-blocks
** Generated by: Abaqus/CAE 6.14-5
*Preprint, echo=NO, model=NO, history=NO, contact=NO
**
** PARTS
**
***************************************************************
** Definition of the nodes and the elements
***************************************************************
*Part, name=Block
** ------------------ Nodes ------------------------
*Node
      1,           0., 0.0199999996,           0.
      2,           0.,           0.,           0.
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****************************************************************
** ---------------- Element type definition ------------------
*********************** HEXAGONAL ***************************
** ---------------- Displacement ----------------
*User element, nodes=8, type=U2, properties=10, coordinates=3, VARIABLES=344
1,2,3
** ---------------- Phase-field ----------------
*User element, nodes=8, type=U4, properties=3, coordinates=3, VARIABLES=24
4
***************************************************************
** ---------------- Element definition ------------------
***************************************************************
** ---------------- Displacement ----------------
*Element, type=U2
1, 75,  209,   10,    1, 1171, 1305, 1106, 1097
2, 209,  210,   11,   10, 1305, 1306, 1107, 1106
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***************************************************************
** ---------------- Phase-field ----------------
*Element, type=U4
13001, 75,  209,   10,    1, 1171, 1305, 1106, 1097
13002, 209,  210,   11,   10, 1305, 1306, 1107, 1106
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***************************************************************
********************** ASSIGNING MATERIAL PROP ****************
** ---------------- Generate sets ----------------
*Elset, elset=Block, generate
     1,  13000,      1
***************************************************************
*Uel property, elset=Block
32000000000, 0.2, 100000000000, 0, 0, 2450, 1, 0,
0.004, 3
**E, nu, Y, H, eps_cr, rho, anisoswt, plswt,
**lc, gc
***************************************************************
*Elset, elset=Block_PH, generate
13001, 26000, 1
***************************************************************
*Uel property, elset=Block_PH
0.004, 3, 1
**lc, gc, elswt
***************************************************************
** ---------------- UMAT element layer ----------------
*Element, type=C3D8
26001, 75,  209,   10,    1, 1171, 1305, 1106, 1097
26002, 209,  210,   11,   10, 1305, 1306, 1107, 1106
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***************************************************************
*Elset, elset=umatelem, generate
26001, 39000, 1
***************************************************************
*Solid Section, elset=umatelem, material=umaterial
1.0
*End Part
**
**
** ASSEMBLY
**
*Assembly, name=Assembly
**
*Instance, name=Block-1, part=Block
*End Instance
**
** ---------------- Surface definitions ----------------
*Elset, elset=_btm_S3, internal, instance=Block-1
26726, 26727, 26728, 26729, 26730, 26731
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*Elset, elset=_btm_S4, internal, instance=Block-1
26760, 26770, 26780, 26790, 26800, 26810
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*Surface, type=ELEMENT, name=btm
_btm_S3, S3
_btm_S4, S4
*Elset, elset=_top_S6, internal, instance=Block-1
26001, 26011, 26021, 26031, 26041, 26051
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*Elset, elset=_top_S5, internal, instance=Block-1
26251, 26252, 26253, 26254, 26255, 26256
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*Surface, type=ELEMENT, name=top
_top_S6, S6
_top_S5, S5
**
*Elset, elset=umatelem, instance=Block-1, generate
26001, 39000, 1
**
*End Assembly
***************************************************************
**
** MATERIALS
**
** ----- UMAT MATERIAL -----
*Material, name=umaterial
*Density
 1e-11,
*Depvar
     34,
*User Material, constants=2
 1e-11, 0.3
** ----------------------------------------------------------------
**
** STEP: Step-1
**
** ---- Time integration control
*Step, name=Step-1, nlgeom=NO, inc=1000
*Dynamic,direct
1e-07,0.0001,
**
** LOADS
**
** ---- Pressure load on the bottom and the top side of the sample
** Name: btm   Type: Pressure
*Dsload
btm, P, -1e+06
** Name: top   Type: Pressure
*Dsload
top, P, -1e+06
**
** OUTPUT REQUESTS
**
** ---- Restart file request
*Restart, write, frequency=0
**
** ---- Output request
** FIELD OUTPUT: F-Output-1
**
*Output, field
*Node Output
A, U, V
*Element Output, directions=YES
E,
**
** HISTORY OUTPUT: H-Output-1
**
*element output, elset=umatelem
SDV
*Element Output, elset=umatelem, Position=Integration Points
COORD, IVOL
**
*Output, history, variable=PRESELECT
*End Step
