*Heading
Cube rounding
**
** This input file is for the simulation of the rounding of a cube
**    as the surface tension of the exterior surface is increased.
**    It is intended as a simple test of the UEL subroutine,
**    uel_surften_3D_tet.for.
**
** UNITS:  Length - micron, Force - picoNewtons,
**	   Stress - picoNewton/micron^2 = Pa,
**	   Surface Tension = picoNewton/micron = microNewton/m
**
** David L. Henann, May 2016
**
************************************************************************
**			PARAMETERS
************************************************************************
**
*Parameter
**
** Initial side length of the cube (micron)
L0 = 1.
**
** Material properties
** Shear modulus (Pa)
G0 = 100.0
**
** Bulk modulus (Pa)
Kbulk = 100.0*G0
**
** Final elasto-capillary number (dimensionless)
EC = 1.0
**
** Final surface tension (microN/m)
gamma = EC*G0*L0
**
************************************************************************
**			MODEL DEFINITION
************************************************************************
**
** Nodes
**
*Node, nset=nAll
      1,          0.5,          0.5,          0.5
      2,          0.5,           0.,          0.5
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**
** Elements
**
*User Element,Nodes=10,Type=U1,Iproperties=1,Properties=5,Coordinates=3,Variables=36,Unsymm
1,2,3
*element,type=U1,elset=elall
    1,  1017,  1018,  1019,  1020,  2742,  2741,  2740,  2744,  2743,  2745
    2,  1017,  1021,  1022,  1023,  2748,  2747,  2746,  2750,  2749,  2751
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**
** Dummy elements (for visualization)
**
*ELEMENT,TYPE=C3D10,ELSET=ElDummy
20001,1017,1018,1019,1020,2742,2741,2740,2744,2743,2745
20002,1017,1021,1022,1023,2748,2747,2746,2750,2749,2751
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**
** Node sets
**
*Nset, nset=xsymm
     5,     6,     7,     8,    69,    70
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*Nset, nset=ysymm
     2,     3,     5,     6,    21,    22
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*Nset, nset=zsymm
     3,     4,     6,     7,    33,    34
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**
** Element sets
**
*Elset, elset=exterior_S3
    37,    68,   119,   131,   145,   178
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*Elset, elset=exterior_S4
 1624, 3193, 4982, 5362, 5388, 5395, 6099, 6209, 6221, 6226, 6558, 6592, 6666, 6674, 8049
*Elset, elset=exterior_S2
  1766,  3139,  3327,  3341,  3422,  3442
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*Elset, elset=exterior_S1
 2309, 7891, 8564
**
************************************************************************
**			AMPLITUDE
************************************************************************
*Amplitude, name=Amp-1
0.0,0.0,1.0,1.0
**
************************************************************************
**			MATERIAL DEFINITION
************************************************************************
**
** Material properties for the real material
**
*uel property,elset=elall
*******************************************************************
**G0	Kbulk	Im	Gnoneq	eta	matflag
<G0>,	<Kbulk>,  0.0,	0.0,	1.0,	1
**
*******************************************************************
**
** Dummy mesh material properties
**
*Solid section, elset=ElDummy, material=Material-1
**
*Material, name=Material-1
** The dummy mesh stiffness is very small
*Elastic
1.e-20
************************************************************************
**			STEP DEFINITION
************************************************************************
*Step, name=ST, nlgeom=YES, unsymm=yes, inc=50000
*Static
0.01, 1.0, 1e-05, 0.1
*CONTROLS, PARAMETERS=LINE SEARCH
10,1.0,0.0001,0.25,0.10
*CONTROLS, PARAMETERS=TIME INCREMENTATION
,,,,,,,10,,,,,,
**
*boundary
xsymm,1,1
ysymm,2,2
zsymm,3,3
*Dload, amplitude=Amp-1
exterior_S1,U1,<gamma>
exterior_S2,U2,<gamma>
exterior_S3,U3,<gamma>
exterior_S4,U4,<gamma>
**
*Output, field, time interval=0.1
*node output
u
*element output, elset=ElDummy
le
**
*End Step
************************************************************************
