*Heading
***************************************************************************************
************************* Dynamic fracture using 2D elements **************************
***************************************************************************************
** Job name: Test_2D Model name: Model-1
** Generated by: Abaqus/CAE 6.14-5
*Preprint, echo=NO, model=NO, history=NO, contact=NO
**
***************************************************************
** Definition of the nodes and the elements
***************************************************************
*Part, name=Plate
** ------------------ Nodes ------------------------
*Node
      1,           0.,           0.
      2, -0.0500000007, 0.0199999996
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***************************************************************
** ---------------- Element type definition ------------------
*********************** TRIANGULAR ****************************
** ---------------- Displacement ----------------
*User element, nodes=3, type=U1, properties=11, coordinates=2, VARIABLES=34
1,2
** ---------------- Phase-field ----------------
*User element, nodes=3, type=U3, properties=4, coordinates=2, VARIABLES=5
3
*********************** RECTENGULAR ***************************
** ---------------- Displacement ----------------
*User element, nodes=4, type=U2, properties=11, coordinates=2, VARIABLES=120
1,2
** ---------------- Phase-field ----------------
*User element, nodes=4, type=U4, properties=4, coordinates=2, VARIABLES=12
3
***************************************************************
** ---------------- Element definition ------------------
***************************************************************
** ---------------- Displacement ----------------
*Element, type=U2
1, 1, 210, 228, 100
2, 210, 211, 229, 228
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***************************************************************
** ---------------- Phase-field ----------------
*Element, type=U4
1247, 1, 210, 228, 100
1248, 210, 211, 229, 228
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***************************************************************
** ---------------- Displacement ----------------
*Element, type=U1
801, 926,  27, 26
802, 927,  27, 926
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***************************************************************
** ---------------- Phase-field ----------------
*Element, type=U3
2047, 926,  27, 26
2048, 927,  27, 926
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***************************************************************
********************** ASSIGNING MATERIAL PROP ****************
** ---------------- Generate sets ----------------
*Elset, elset=uel_Plate, generate
    1,  1246,     1
***************************************************************
*Uel property, elset=uel_Plate
32000000000, 0.2, 100000000000, 0, 1, 1, 2450, 1,
0, 0.004, 3
**E, nu, Y, H, eps_cr, h, rho, anisoswt,
**plswt, lc, gc
***************************************************************
*Elset, elset=uel_Plate_PH, generate
1247, 2492, 1
*Uel property, elset=uel_Plate_PH
0.004, 3, 1, 1
**lc, gc, h, elswt
***************************************************************
** ---------------- UMAT element layer ----------------
*Element, type=CPE4
2493, 1, 210, 228, 100
2494, 210, 211, 229, 228
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***************************************************************
*Element, type=CPE3
3293, 926,  27, 26
3294, 927,  27, 926
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***************************************************************
*Elset, elset=umatelem, generate
2493, 3738, 1
***************************************************************
*Solid Section, elset=umatelem, material=umaterial
1.0
*End Part
**
**
** ASSEMBLY
**
*Assembly, name=Assembly
**
*Instance, name=Plate-1, part=Plate
*End Instance
**
** ---------------- Surface definitions ----------------
*Elset, elset=_btm_S2, internal, instance=Plate-1
2762, 2782, 2802, 2822, 2842, 2862
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*Elset, elset=_btm_S4, internal, instance=Plate-1, generate
3043, 3283, 10
*Surface, type=ELEMENT, name=btm
_btm_S2, S2
_btm_S4, S4
*Elset, elset=_top_S2, internal, instance=Plate-1
2502, 2512, 2522, 2532, 2542, 2552
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*Elset, elset=_top_S4, internal, instance=Plate-1, generate
2743, 3023, 20
*Elset, elset=_top_S3, internal, instance=Plate-1
3323,
*Elset, elset=_top_S1, internal, instance=Plate-1
3342,
*Surface, type=ELEMENT, name=top
_top_S2, S2
_top_S4, S4
_top_S3, S3
_top_S1, S1
**
*Elset, elset=umatelem, instance=Plate-1, generate
2493, 3738, 1
**
*End Assembly
***************************************************************
**
** ----- UMAT MATERIAL -----
*Material, name=umaterial
*Density
 1e-11,
*Depvar
     24,
*User Material, constants=2
 1e-11, 0.3
** ----------------------------------------------------------------
**
** STEP: Step-1
**
** ---- Time integration control
*Step, name=Step-1, nlgeom=NO, inc=1000
*Dynamic,direct
1e-07,0.0001,
**
** LOADS
**
** ---- Pressure load on the bottom and the top side of the sample
** Name: btm   Type: Pressure
*Dsload
btm, P, -1e+06
** Name: top   Type: Pressure
*Dsload
top, P, -1e+06
**
** OUTPUT REQUESTS
**
** ---- Restart file request
*Restart, write, frequency=0
**
** FIELD OUTPUT: F-Output-1
**
** ---- Output request
*Output, field
*Node Output
A, U, V
*Element Output, directions=YES
E,
**
** HISTORY OUTPUT: H-Output-1
**
*element output, elset=umatelem
SDV
*Element Output, elset=umatelem, Position=Integration Points
COORD, IVOL
**
*Output, history, variable=PRESELECT
*End Step
