*Heading
** Job name: Job-1 Model name: Model-1
** Generated by: Abaqus/CAE 2023.HF4
*Preprint, echo=NO, model=NO, history=NO, contact=NO
**
** PARTS
**
*Part, name=Part-1
*Node
      1,          25.,        0.125
      2,   24.7999992,        0.125
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*Element, type=COH2D4
  1,   1,   2, 103, 102
  2,   2,   3, 104, 103
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*Element, type=CPE4
 101,    1,  206,  402,    2
 102,  206,  207,  403,  402
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*Nset, nset=Set-1, generate
    1,  6552,     1
*Elset, elset=Set-1, generate
  101,  6350,     1
*Nset, nset=Set-2, generate
   1,  202,    1
*Elset, elset=Set-2, generate
   1,  100,    1
** Section: Section-2
*Cohesive Section, elset=Set-2, controls=EC-1, material=cohesive, response=TRACTION SEPARATION, thickness=SPECIFIED
1., 1.2
** Section: Section-1
*Solid Section, elset=Set-1, material=rubber
1.2,
*End Part
**
**
** ASSEMBLY
**
*Assembly, name=Assembly
**
*Instance, name=Part-1-1, part=Part-1
*End Instance
**
*Node
      1,         12.5,       20.125,           0.
*Nset, nset=RefP
 1,
*Nset, nset=Set-1, instance=Part-1-1
 3388, 3389, 3438, 3439, 3440, 3441
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*Elset, elset=Set-1, instance=Part-1-1, generate
 6226,  6350,     1
*Nset, nset=Set-2, instance=Part-1-1
 203, 204, 230, 231, 232, 233
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*Elset, elset=Set-2, instance=Part-1-1, generate
  125,  3225,    25
*Nset, nset=Set-5
 1,
*Nset, nset=m_Set-3
 1,
*Elset, elset=_s_Surf-1_S2, internal, instance=Part-1-1, generate
  125,  3225,    25
*Surface, type=ELEMENT, name=s_Surf-1
_s_Surf-1_S2, S2
** Constraint: Constraint-1
*Coupling, constraint name=Constraint-1, ref node=m_Set-3, surface=s_Surf-1
*Kinematic
*End Assembly
**
** ELEMENT CONTROLS
**
*Section Controls, name=EC-1, ELEMENT DELETION=YES
1., 1., 1.
**
** MATERIALS
**
*Material, name=cohesive
*Damage Initiation, criterion=QUADS
 0.1, 0.1, 0.1
*Damage Evolution, type=ENERGY
 0.005,
*Elastic, type=TRACTION
10000.,10000.,10000.
*Material, name=rubber
*Elastic
2., 0.45
** ----------------------------------------------------------------
**
** STEP: Step-1
**
*Step, name=Step-1, nlgeom=YES, inc=1000000
*Static, stabilize, factor=0.0002, allsdtol=0, continue=NO
0.0001, 1., 1e-12, 0.001
**
** BOUNDARY CONDITIONS
**
** Name: BC-1 Type: Symmetry/Antisymmetry/Encastre
*Boundary
Set-1, ENCASTRE
** Name: BC-2 Type: Displacement/Rotation
*Boundary
Set-5, 2, 2, 1.
**
** OUTPUT REQUESTS
**
*Restart, write, frequency=0
**
** FIELD OUTPUT: F-Output-1
**
*Output, field
*Node Output
CF, RF, U
*Element Output, directions=YES
LE, PE, PEEQ, PEMAG, S
**
** HISTORY OUTPUT: H-Output-1
**
*Output, history
*Node Output, nset=RefP
RF2, U2
*End Step
