*Heading
** Job name: Job-1 Model name: Model-1
** Generated by: Abaqus/CAE 2023.HF4
*Preprint, echo=NO, model=NO, history=NO, contact=NO
**
** PARTS
**
*Part, name=Part-1
*Node
      1, 0.0199999996, 0.0299999993, 0.00499999989
      2, 0.0199999996,           0., 0.00499999989
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*Element, type=C3D8
   1,   186,  1373, 10355,  1221,     1,    17,   989,    82
   2,  1373,  1374, 10356, 10355,    17,    18,   990,   989
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*Nset, nset=Set-1, generate
     1,  25326,      1
*Elset, elset=Set-1, generate
     1,  20000,      1
** Section: Section-1
*Solid Section, elset=Set-1, material=Material-1
,
*End Part
**
**
** ASSEMBLY
**
*Assembly, name=Assembly
**
*Instance, name=Part-1-1, part=Part-1
*End Instance
**
*Nset, nset=Set-1, instance=Part-1-1
     1,     2,     3,     4,     5,     6
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*Elset, elset=Set-1, instance=Part-1-1, generate
    1,  3000,     1
*Nset, nset=Set-2, instance=Part-1-1
     9,    10,    11,    12,    13,    14
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*Elset, elset=Set-2, instance=Part-1-1, generate
 17001,  20000,      1
*Nset, nset=Set-3, instance=Part-1-1
     1,     2,     3,     4,     5,     6
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*Elset, elset=Set-3, instance=Part-1-1, generate
    1,  3000,     1
*Nset, nset=Set-4, instance=Part-1-1
     9,    10,    11,    12,    13,    14
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*Elset, elset=Set-4, instance=Part-1-1, generate
 17001,  20000,      1
*End Assembly
*Amplitude, name=Amp-1
             0.,              0.,           0.001,              1.
**
** MATERIALS
**
*Material, name=Material-1
*Damage Initiation, criterion=DUCTILE
 0.1,0.,1.
*Damage Evolution, type=DISPLACEMENT
 6.5e-05,
*Density
7800.,
*Elastic
 2e+11, 0.3
*Plastic
 3e+08,    0.
 4e+08, 0.001
 5e+08, 0.003
** ----------------------------------------------------------------
**
** STEP: Step-1
**
*Step, name=Step-1, nlgeom=YES, inc=1000
*Static
5., 1000., 1., 10.
**
** BOUNDARY CONDITIONS
**
** Name: BC-1 Type: Symmetry/Antisymmetry/Encastre
*Boundary
Set-3, ENCASTRE
** Name: BC-2 Type: Displacement/Rotation
*Boundary, amplitude=Amp-1
Set-4, 2, 2, 0.005
**
** OUTPUT REQUESTS
**
*Restart, write, frequency=0
**
** FIELD OUTPUT: F-Output-1
**
*Output, field, variable=PRESELECT
**
** HISTORY OUTPUT: H-Output-1
**
*Output, history, variable=PRESELECT
*End Step
