*Heading
** Job name: CHD4Full_FullFix_sv05 Model name: CH4_sym05_aalto_fix
** Generated by: Abaqus/CAE 2020.HF3
*Preprint, echo=NO, model=NO, history=NO, contact=NO
**
** PARTS
**
*Part, name=Part-1
*End Part
**
**
** ASSEMBLY
**
*Assembly, name=Assembly
**
*Instance, name=Part-1-1, part=Part-1
*Node
      1,          7.5,   1.39999998,           0.
      2,   1.42828572,   1.39999998,           0.
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*Element, type=C3D8R
   1, 3361, 3553,  340,   10, 5042, 5233, 1332,  345
   2, 3553, 3552,  339,  340, 5233, 5234, 1331, 1332
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*Nset, nset=Sample, generate
     1,  39753,      1
*Elset, elset=Sample, generate
     1,  31650,      1
** Section: Section-1
*Solid Section, elset=Sample, material=CP1000_SV05
,
*End Instance
**
*Nset, nset=Disp, instance=Part-1-1
 39066, 39067, 39070, 39094, 39109, 39122
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*Elset, elset=Disp, instance=Part-1-1
 31259, 31260, 31285, 31286, 31311, 31312, 31337, 31338, 31363, 31364, 31389, 31390, 31415, 31416, 31441, 31442
*Nset, nset=topfix, instance=Part-1-1
 36683, 36779, 36786, 36796, 37043, 37044
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*Elset, elset=topfix, instance=Part-1-1, generate
 31235,  31442,      1
*Nset, nset=y_fix, instance=Part-1-1
 37872, 37941, 37942, 38077, 38079, 38090
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*Elset, elset=y_fix, instance=Part-1-1, generate
 31443,  31650,      1
*Nset, nset=z_symm, instance=Part-1-1
     1,     2,     3,     4,    11,    12
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*Elset, elset=z_symm, instance=Part-1-1
  3905,  3906,  3907,  3908,  3909,  3910
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*End Assembly
*Amplitude, name=Amp-1
             0.,              0.,            0.01,              1.
**
** MATERIALS
**
*Material, name=CP1000_SV05
*Density
 7.89e-09,
*Elastic
210000., 0.3
*Plastic
 839.646,     0.
 880.025, 0.0003
 906.975, 0.0005
 926.275,  0.001
 926.275,  0.002
 939.393,  0.003
 949.756,  0.004
 958.495,  0.005
 966.134,  0.006
  972.96,  0.007
  979.15,  0.008
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 1205.29,     3.
*Material, name=CP1000_sv02
*Density
 7.89e-09,
*Elastic
210000., 0.3
*Plastic
 888.926,     0.
 906.607, 0.0003
 920.864, 0.0005
 920.864,  0.001
 933.332,  0.002
 943.083,  0.003
   951.5,  0.004
 959.048,  0.005
 965.946,  0.006
 972.322,  0.007
 978.256,  0.008
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 1132.41,     3.
**
** BOUNDARY CONDITIONS
**
** Name: Yfix Type: Symmetry/Antisymmetry/Encastre
*Boundary
y_fix, ENCASTRE
** Name: zsymm Type: Symmetry/Antisymmetry/Encastre
*Boundary
z_symm, ZSYMM
** ----------------------------------------------------------------
**
** STEP: Move
**
*Step, name=Move, nlgeom=YES
*Dynamic, Explicit
, 0.01
*Bulk Viscosity
0.06, 1.2
**
** BOUNDARY CONDITIONS
**
** Name: Move Type: Displacement/Rotation
*Boundary, amplitude=Amp-1
Disp, 2, 2, 2.5
** Name: TopFix Type: Displacement/Rotation
*Boundary
topfix, 1, 1
topfix, 3, 3
topfix, 4, 4
topfix, 5, 5
topfix, 6, 6
**
** OUTPUT REQUESTS
**
*Restart, write, number interval=1, time marks=NO
**
** FIELD OUTPUT: F-Output-1
**
*Output, field, number interval=200
*Node Output
RF, U
*Element Output, directions=YES
LE, PE, PEEQ, S, TRIAX
**
** HISTORY OUTPUT: H-Output-1
**
*Output, history, variable=PRESELECT
*End Step
