*Heading
** Job name: elastic_plate_3D Model name: elastic_plate_3D
** Generated by: Abaqus/CAE 2023.HF4
*Preprint, echo=NO, model=NO, history=NO, contact=NO
**
** PARTS
**
*Part, name=elastic-hold-plate
*Node
1, 0.0185979996, 0.0599999987,           0.
2, 0.0185979996, 0.0181120001,           0.
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*Element, type=C3D8T
1,   8,  96, 659, 125,   1,  21, 499,  76
2,  96,  95, 660, 659,  21,  22, 500, 499
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*Nset, nset=Set-1, generate
1,  3196,     1
*Elset, elset=Set-1, generate
1,  1499,     1
** Section: Section-1
*Solid Section, elset=Set-1, material=Material-1
,
*End Part
**
**
** ASSEMBLY
**
*Assembly, name=Assembly
**
*Instance, name=elastic-hold-plate-1, part=elastic-hold-plate
*End Instance
**
*Nset, nset=whole_part, instance=elastic-hold-plate-1, generate
1,  3196,     1
*Elset, elset=whole_part, instance=elastic-hold-plate-1, generate
1,  1499,     1
*Nset, nset=xsymm_side, instance=elastic-hold-plate-1
3,   4,   6,   7,  17,  20
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*Elset, elset=xsymm_side, instance=elastic-hold-plate-1
169, 170, 171, 172, 173, 174
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*Nset, nset=ysymm_side, instance=elastic-hold-plate-1
13,  14,  15,  16,  18,  19
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*Elset, elset=ysymm_side, instance=elastic-hold-plate-1
683, 684, 685, 686, 687, 688
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*Nset, nset=zsymm_side, instance=elastic-hold-plate-1, generate
1,  3196,     1
*Elset, elset=zsymm_side, instance=elastic-hold-plate-1, generate
1,  1499,     1
*Elset, elset=_Surf-1_S5, internal, instance=elastic-hold-plate-1, generate
210,  546,   21
*Elset, elset=_Surf-1_S6, internal, instance=elastic-hold-plate-1, generate
1,  169,   21
*Surface, type=ELEMENT, name=Surf-1
_Surf-1_S5, S5
_Surf-1_S6, S6
*End Assembly
**
** MATERIALS
**
*Material, name=Material-1
*Density
1.,
*Depvar
  43,
1, AR1_sig11, AR1_sig11
2, AR2_sig22, AR2_sig22
3, AR3_sig33, AR3_sig33
4, AR4_sig12, AR4_sig12
5, AR5_sig13, AR5_sig13
6, AR6_sig23, AR6_sig23
7, AR7_stran11, AR7_stran11
8, AR8_stran22, AR8_stran22
9, AR9_stran33, AR9_stran33
10, AR10_stran12, AR10_stran12
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43, AR43_k_HEHE, AR43_k_HEHE
*User Material, constants=24, type=THERMAL
**
** =============================
**
** HYDROGEN DIFFUSION PROPERTIES
**
3, 1, 8.31446e0, 300.0e0, 2e-06, 3.07e-10, 6.02214e+23, 8.518e+28
** mode_trap (1 - no trap I 2 - kumnick, krom | 3 - sofronis, dadfarnia), crystal_structure (1 - BCC | 2 - FCC), Universal gas constant - R (N*m)/(mol*K), Temperature - T (K)
** Partial molar volume - VH (m^3/mol), Diffusion coefficient - DL (m^2/s), Avogadro's constant - avogadro (1/mol), Number of solvent metal atoms per unit volume - NL (1/m^3)
1.0e0, 1.0e0, 1.0e0, 0.0d0, 8.464e+22, 8.464e+26,  -20.2e+3, -58.6e+3
** Number of interstitial sites per trap site (dislocations) - alpha_dis (dimless), Number of interstitial sites per trap site (grain boundaries) - alpha_gb (dimless), Number of interstitial sites per trap site (carbides) - alpha_carb (dimless), Number of trap type of dislocations - NT_dis (1/m^3)
** Number of trap type of grain boundaries - NT_gb (1/m^3), Number of trap type of carbides - NT_carb (1/m^3), Binding energy of hydrogen to dislocations - WB_dis (N*m/mol), Binding energy of hydrogen to grain boundaries - WB_gb (N*m/mol)
-11.5e+3, 6.0e0, 1.0e0, 2.866e-10, 3.571e-10, 2.0e+16, 1.0e+10 , 30000.0e0
** Binding energy of hydrogen to carbides - WB_carb (N*m/mol), Number of hydrogen atoms that can reside in each BCC lattice site - beta_BCC (dimless), Number of hydrogen atoms that can reside in each FCC lattice site - beta_FCC (dimless), Lattice parameter for BCC - a_lattice_BCC (m)
** Lattice parameter for FCC - a_lattice_FCC (m), gamma fitting parameter in Dadfarnia et al. - gamma (1/m^2), Dislocation density for the annealed material in Dadfarnia et al. - rho_d0 (1/m^2), Gibbs free energy difference between the decohering interface and the surrounding material - delta_g_b0 (N*m/mol)
**
*******************************************************
*User Material, constants=208, type=MECHANICAL
**
** =====================
**
** MECHANICAL PROPERTIES
**
210.0e+9, 0.3e0, 0.0, 0.0, 0.0, 0.0, 0.0, 0.0
** Young's modulus - E (Pa), Poisson ratio - nu (dimless), none, none
** none, none, none, none
**
** =====================
**
** FLOW CURVE PROPERTIES
**
** True stress (Pa) - PEEQ (dimless) value pairs
869678161.0449681, 0.00e+00, 871526750.9057986, 2.00e-04, 873375340.766629, 4.00e-04, 875223930.6274595, 6.00e-04
877072520.48829, 8.00e-04, 878921110.3491204, 1.00e-03, 888164059.6532726, 2.00e-03, 897407008.9574249, 3.00e-03
906649958.2615771, 4.00e-03, 915892907.5657294, 5.00e-03, 925135856.8698816, 6.00e-03, 934378806.1740339, 7.00e-03
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1260425937.332496, 2.85e+00, 1262132630.438223, 2.90e+00, 1263820905.377339, 2.95e+00, 1265491268.102705, 3.00e+00
**
*******************************************************
*User Output Variables
10,
*Initial Conditions, Type=Solution
whole_part, 0.0, 0.0, 0.0, 0.0, 0.0, 0.0, 0.0
0.0, 0.0, 0.0, 0.0, 0.0, 0.0, 0.0, 0.0
0.0, 0.0, 0.0, 0.0, 0.0, 0.0, 0.0, 0.0
0.0, 0.0, 0.0, 0.0, 0.0, 0.0, 0.0, 0.0
0.0, 0.0, 0.0, 0.0, 0.0, 0.0, 0.0, 0.0
0.0, 0.0, 0.0, 0.0
**
** PREDEFINED FIELDS
**
** Name: Cbar_L   Type: Temperature
*Initial Conditions, type=TEMPERATURE
whole_part, 20.
** ----------------------------------------------------------------
**
** STEP: Step-1
**
*Step, name=Step-1, nlgeom=YES, inc=10000000
*Coupled Temperature-displacement, creep=none, deltmx=10.
5e+06, 1e+10, 1e+06, 1e+07
**
** BOUNDARY CONDITIONS
**
** Name: Xsymm Type: Symmetry/Antisymmetry/Encastre
*Boundary
xsymm_side, XSYMM
** Name: Ysymm Type: Symmetry/Antisymmetry/Encastre
*Boundary
ysymm_side, YSYMM
** Name: Zsymm Type: Symmetry/Antisymmetry/Encastre
*Boundary
zsymm_side, ZSYMM
**
** LOADS
**
** Name: Load-1   Type: Pressure
*Dsload
Surf-1, P, -1e+08
**
** PREDEFINED FIELDS
**
** Name: Predefined Field-2   Type: Field
*Field, variable=1, user
whole_part
**
** OUTPUT REQUESTS
**
*Restart, write, frequency=0
**
** FIELD OUTPUT: F-Output-1
**
*Output, field
*Node Output
COORD, NT, RF, U
*Element Output, directions=YES
COORD, LE, S, SDV, UVARM
*Output, history, frequency=0
*End Step
