*Heading
** Job name: elastic_plate_3D_aravas Model name: elastic_plate_3D
** Generated by: Abaqus/CAE 2023.HF4
*Preprint, echo=NO, model=NO, history=NO, contact=NO
**
** PARTS
**
*Part, name=elastic-hold-plate
*Node
1, 0.0185979996, 0.0599999987,           0.
2, 0.0185979996, 0.0181120001,           0.
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*Element, type=C3D8T
1,   8,  96, 659, 125,   1,  21, 499,  76
2,  96,  95, 660, 659,  21,  22, 500, 499
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*Nset, nset=Set-1, generate
1,  3196,     1
*Elset, elset=Set-1, generate
1,  1499,     1
** Section: Section-1
*Solid Section, elset=Set-1, material=Material-1
,
*End Part
**
**
** ASSEMBLY
**
*Assembly, name=Assembly
**
*Instance, name=elastic-hold-plate-1, part=elastic-hold-plate
*End Instance
**
*Nset, nset=ALLE, instance=elastic-hold-plate-1, generate
1,  3196,     1
*Elset, elset=ALLE, instance=elastic-hold-plate-1, generate
1,  1499,     1
*Nset, nset=ALLN, instance=elastic-hold-plate-1, generate
1,  3196,     1
*Nset, nset=xsymm_side, instance=elastic-hold-plate-1
3,   4,   6,   7,  17,  20
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*Elset, elset=xsymm_side, instance=elastic-hold-plate-1
169, 170, 171, 172, 173, 174
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*Nset, nset=ysymm_side, instance=elastic-hold-plate-1
13,  14,  15,  16,  18,  19
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*Elset, elset=ysymm_side, instance=elastic-hold-plate-1
683, 684, 685, 686, 687, 688
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*Nset, nset=zsymm_side, instance=elastic-hold-plate-1, generate
1,  3196,     1
*Elset, elset=zsymm_side, instance=elastic-hold-plate-1, generate
1,  1499,     1
*Elset, elset=_Surf-1_S5, internal, instance=elastic-hold-plate-1, generate
210,  546,   21
*Elset, elset=_Surf-1_S6, internal, instance=elastic-hold-plate-1, generate
1,  169,   21
*Surface, type=ELEMENT, name=Surf-1
_Surf-1_S5, S5
_Surf-1_S6, S6
*End Assembly
**
** MATERIALS
**
*Material, name=Material-1
*Density
1.,
*Depvar
  29,
1, AR1_EBARP, AR1_EBARP
2, AR2_YFLAG, AR2_YFLAG
3, AR3_CL, AR3_CL
4, AR4_CT, AR4_CT
5, AR5_GRADPX, AR5_GRADPX
6, AR6_GRADPY, AR6_GRADPY
7, AR7_CTOTAL, AR7_CTOTAL
8, AR8_CL0, AR8_CL0
9, AR9_DD, AR9_DD
10, AR10_AIDD, AR10_AIDD
11, AR11_DFLAG, AR11_DFLAG
12, AR12_AIF, AR12_AIF
13, AR13_FFLAG, AR13_FFLAG
14, AR14_SYI, AR14_SYI
15, AR15_ETA, AR15_ETA
16, AR16_THETADEG, AR16_THETADEG
17, AR17_QETA, AR17_QETA
18, AR18_QTHETA, AR18_QTHETA
19, AR19_DCR, AR19_DCR
20, AR20_PDD, AR20_PDD
21, AR21_U, AR21_U
22, AR22_YIELD, AR22_YIELD
23, AR23_RHO, AR23_RHO
24, AR24_THETAL, AR24_THETAL
25, AR25_THETAT, AR25_THETAT
26, AR26_DDH, AR26_DDH
27, AR27_AMU, AR27_AMU
28, AR28_SYD, AR28_SYD
29, AR29_DCOMB, AR29_DCOMB
*User Material, constants=32, type=THERMAL
**
** =============================
**
** HYDROGEN DIFFUSION PROPERTIES
**
207e9, 0.3e0, 250e6, 5, 0.0012077294685990338, 2.086e21, 1.27e-08, 8.018217389909875e-10
** AE, POISSON, SIG0, EXPO
** AE0, C0, D, VH
49703300000, 1.0e0, 84599999999999998980079484928, 1, 0.281, 0.03, 100.0e0, 100.0e0
** KT, ALPHA, NL, BETA
** LAMBDA, EPCL, SC, C1
0.0e0, 100.0e0, 0.0e0, -0.33, 0.515, 100.0e0, 0.0e0, 100.0e0
** C2, C3, C4, ETAC
** GF, D1, D2, D3
0.0e0, 1.0e0, 11.8449, 1.E0, 0, 0, 0.0, 0.0
** D4, RHO0, ALFREQ, SFD
** P0, AMU0, none, none
**
*******************************************************
*User Material, constants=32, type=MECHANICAL
**
** =====================
**
** MECHANICAL PROPERTIES
**
207e9, 0.3e0, 250e6, 5, 0.0012077294685990338, 2.086e21, 1.27e-08, 8.018217389909875e-10
** AE, POISSON, SIG0, EXPO
** AE0, C0, D, VH
49703300000, 1.0e0, 84599999999999998980079484928, 1, 0.281, 0.03, 100.0e0, 100.0e0
** KT, ALPHA, NL, BETA
** LAMBDA, EPCL, SC, C1
0.0e0, 100.0e0, 0.0e0, -0.33, 0.515, 100.0e0, 0.0e0, 100.0e0
** C2, C3, C4, ETAC
** GF, D1, D2, D3
0.0e0, 1.0e0, 11.8449, 1.E0, 0, 0, 0.0, 0.0
** D4, RHO0, ALFREQ, SFD
** P0, AMU0, none, none
**
*******************************************************
*Initial Conditions, Type=Solution
ALLE, 0.0, 0.0, 1.0, 0.0, 0.0, 0.0, 0.0
0.0, 0.0, 0.0, 0.0, 0.0, 1.0, 0.0, 0.0
0.0, 0.0, 0.0, 0.0, 0.0, 0.0, 0.0, 1.0
0.0, 0.0, 0.0, 0.0, 0.0, 0.0
**
** PREDEFINED FIELDS
**
** Name: Cbar_L   Type: Temperature
*Initial Conditions, type=TEMPERATURE
ALLN, 20.
** ----------------------------------------------------------------
**
** STEP: Step-1
**
*Step, name=Step-1, nlgeom=YES, inc=10000000
*Coupled Temperature-displacement, creep=none, deltmx=10.
5e+06, 1e+10, 1e+06, 1e+07
**
** BOUNDARY CONDITIONS
**
** Name: Xsymm Type: Symmetry/Antisymmetry/Encastre
*Boundary
xsymm_side, XSYMM
** Name: Ysymm Type: Symmetry/Antisymmetry/Encastre
*Boundary
ysymm_side, YSYMM
** Name: Zsymm Type: Symmetry/Antisymmetry/Encastre
*Boundary
zsymm_side, ZSYMM
**
** LOADS
**
** Name: Load-1   Type: Pressure
*Dsload
Surf-1, P, -1e+08
**
** PREDEFINED FIELDS
**
** Name: Predefined Field-2   Type: Field
*Field, variable=1, user
ALLN
**
** OUTPUT REQUESTS
**
*Restart, write, frequency=0
**
** FIELD OUTPUT: F-Output-1
**
*Output, field
*Node Output
COORD, NT, RF, U
*Element Output, directions=YES
COORD, HFL, LE, S, SDV, UVARM
*Output, history, frequency=0
*End Step
