*Heading
** Job name: cube_subroutine Model name: cube-subroutine
** Generated by: Abaqus/CAE 2023.HF4
*Preprint, echo=NO, model=NO, history=NO, contact=NO
**
** PARTS
**
*Part, name=cube
*Node
      1, 0.0199999996, 0.0199999996, 0.0199999996
      2, 0.0199999996, 0.0179999992, 0.0199999996
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*Element, type=C3D8T
   1,  122,  123,  134,  133,    1,    2,   13,   12
   2,  123,  124,  135,  134,    2,    3,   14,   13
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*Nset, nset=Set-1, generate
    1,  1331,     1
*Elset, elset=Set-1, generate
    1,  1000,     1
** Section: Section-1-CP1000-m
*Solid Section, elset=Set-1, material=CP1000-m
,
*End Part
**
**
** ASSEMBLY
**
*Assembly, name=Assembly
**
*Instance, name=cube-1, part=cube
*End Instance
**
*Nset, nset=Set-1, instance=cube-1, generate
   11,  1331,    11
*Elset, elset=Set-1, instance=cube-1, generate
   10,  1000,    10
*Nset, nset=Set-2, instance=cube-1, generate
    1,  1321,    11
*Elset, elset=Set-2, instance=cube-1, generate
   1,  991,   10
*End Assembly
*Amplitude, name=Amp-1
             0.,              0.,           1000.,              1.
**
** MATERIALS
**
*Material, name=CP1000-m
*Density
1.,
*Depvar
     13,
*User Material, constants=4, type=THERMAL
 8.31446,    300.,   2e-06, 3.8e-11
*User Material, constants=162, type=MECHANICAL
 2.1e+11,         0.3, 8.39646e+08,          0., 8.80025e+08,      0.0003, 9.06975e+08,      0.0005
 9.26275e+08,       0.001, 9.26275e+08,       0.002, 9.39393e+08,       0.003, 9.49756e+08,       0.004
 9.58495e+08,       0.005, 9.66134e+08,       0.006,  9.7296e+08,       0.007,  9.7915e+08,       0.008
 9.84823e+08,       0.009, 9.90061e+08,        0.01, 1.02747e+09,        0.02, 1.04975e+09,        0.03
 1.06431e+09,        0.04, 1.07441e+09,        0.05, 1.08181e+09,        0.06, 1.08749e+09,        0.07
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 1.20529e+09,          3.
** ----------------------------------------------------------------
**
** STEP: Step-1
**
*Step, name=Step-1, nlgeom=YES, inc=100000
*Coupled Temperature-displacement, creep=none, deltmx=1.
10., 1000., 0.01, 10.
**
** BOUNDARY CONDITIONS
**
** Name: bottom-part-constraint Type: Symmetry/Antisymmetry/Encastre
*Boundary
Set-1, ENCASTRE
** Name: top-surface-disp Type: Displacement/Rotation
*Boundary, amplitude=Amp-1
Set-2, 2, 2, 0.01
**
** OUTPUT REQUESTS
**
*Restart, write, frequency=0
**
** FIELD OUTPUT: F-Output-1
**
*Output, field, number interval=100
*Node Output
RF, U
**
** HISTORY OUTPUT: H-Output-1
**
*Output, history, variable=PRESELECT
*End Step
