*Heading
** Job name: mesh-1 Model name: Model-Full-mesh-1
** Generated by: Abaqus/CAE 2023.HF4
*Preprint, echo=NO, model=NO, history=NO, contact=NO
**
** PARTS
**
*Part, name=CHD2-m
*Node
      1, 0.00562500022, -0.0841666684, 0.00100000005
      2,           0., -0.0346875004, 0.00100000005
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*Element, type=C3D8T
   1,  442,  404, 1107, 1084,  468,  599,    6,  760
   2,  404,  405, 1108, 1107,  599,  600,   35,    6
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*Nset, nset=Set-42, generate
     1,  23886,      1
*Elset, elset=Set-42, generate
     1,  18767,      1
** Section: Section-1-CP1000-m
*Solid Section, elset=Set-42, material=CP1000-m
,
*End Part
**
**
** ASSEMBLY
**
*Assembly, name=Assembly
**
*Instance, name=CHD2-m-1, part=CHD2-m
*End Instance
**
*Nset, nset=Set-1, instance=CHD2-m-1
  404,  405,  406,  407,  408,  409
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*Elset, elset=Set-1, instance=CHD2-m-1, generate
 1153,  1440,     1
*Nset, nset=Set-2, instance=CHD2-m-1
     3,     4,     9,    11,    13,    14
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*Elset, elset=Set-2, instance=CHD2-m-1
     3,     6,     9,    12,    15,    18
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*Nset, nset=Set-3, instance=CHD2-m-1, generate
 2197,  2664,     1
*Elset, elset=Set-3, instance=CHD2-m-1, generate
 1441,  1728,     1
*Nset, nset=Set-4, instance=CHD2-m-1
 2210, 2224, 2238, 2241, 2257, 2266
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*Elset, elset=Set-4, instance=CHD2-m-1
 1474, 1475, 1476, 1510, 1511, 1512
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*Nset, nset=Set-5, instance=CHD2-m-1, generate
 2197,  2664,     1
*Elset, elset=Set-5, instance=CHD2-m-1, generate
 1441,  1728,     1
*Nset, nset=Set-6, instance=CHD2-m-1
 2210, 2224, 2238, 2241, 2257, 2266
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*Elset, elset=Set-6, instance=CHD2-m-1
 1474, 1475, 1476, 1510, 1511, 1512
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*Nset, nset=Set-7, instance=CHD2-m-1, generate
     1,  23886,      1
*Elset, elset=Set-7, instance=CHD2-m-1, generate
     1,  18767,      1
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*End Assembly
*Amplitude, name=Amp-1
             0.,              0.,           1000.,              1.
**
** MATERIALS
**
*Material, name=CP1000-m
*Density
7890.,
*Depvar
      1,
*User Material, constants=4, type=THERMAL
 8.31446,    300.,   2e-06, 3.8e-11
*User Material, constants=162, type=MECHANICAL
 2.1e+11,         0.3, 8.39646e+08,          0., 8.80025e+08,      0.0003, 9.06975e+08,      0.0005
 9.26275e+08,       0.001, 9.26275e+08,       0.002, 9.39393e+08,       0.003, 9.49756e+08,       0.004
 9.58495e+08,       0.005, 9.66134e+08,       0.006,  9.7296e+08,       0.007,  9.7915e+08,       0.008
 9.84823e+08,       0.009, 9.90061e+08,        0.01, 1.02747e+09,        0.02, 1.04975e+09,        0.03
 1.06431e+09,        0.04, 1.07441e+09,        0.05, 1.08181e+09,        0.06, 1.08749e+09,        0.07
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 1.20529e+09,          3.
**
** BOUNDARY CONDITIONS
**
** Name: bottom-part-encastre Type: Symmetry/Antisymmetry/Encastre
*Boundary
Set-1, ENCASTRE
**
** PREDEFINED FIELDS
**
** Name: Cbar_L   Type: Temperature
*Initial Conditions, type=TEMPERATURE
Set-7, 0.
** ----------------------------------------------------------------
**
** STEP: Step-1
**
*Step, name=Step-1, nlgeom=YES, inc=100000
*Coupled Temperature-displacement, creep=none, deltmx=1.
10., 1000., 0.01, 10.
**
** BOUNDARY CONDITIONS
**
** Name: top-part-constraint Type: Displacement/Rotation
*Boundary
Set-5, 1, 1
Set-5, 3, 3
Set-5, 4, 4
Set-5, 5, 5
Set-5, 6, 6
** Name: top-surface-disp Type: Displacement/Rotation
*Boundary, amplitude=Amp-1
Set-6, 2, 2, 0.0019
**
** OUTPUT REQUESTS
**
*Restart, write, frequency=0
**
** FIELD OUTPUT: F-Output-1
**
*Output, field, number interval=100
*Node Output
RF, U
**
** HISTORY OUTPUT: H-Output-1
**
*Output, history, variable=PRESELECT
*End Step
