*Heading
** Job name: NDB_R40 Model name: NDB_R40_coarse
** Generated by: Abaqus/CAE Learning Edition 2023
*Preprint, echo=NO, model=NO, history=NO, contact=NO
**
** PARTS
**
*Part, name=DogBone_Form1
*End Part
**
**
** ASSEMBLY
**
*Assembly, name=Assembly
**
*Instance, name=model, part=DogBone_Form1
          0.,           0., 0.500000000000002
          0.,           0., 0.500000000000002,           0.,           1., 0.500000000000002,         180.
*Node
      1,  -5.61726284,           7.,          0.5
      2,  -5.61726284,           7.,           0.
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*Element, type=C3D8R
 1,  38, 168,  27,   1, 195, 425, 204,  56
 2, 168, 169,  28,  27, 425, 426, 205, 204
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*Nset, nset=Sample, generate
   1,  580,    1
*Elset, elset=Sample, generate
   1,  356,    1
** Section: Section-1
*Solid Section, elset=Sample, material=CP1000
,
*End Instance
**
*Nset, nset=Disp, instance=model
  21,  22,  25,  26, 138, 139
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*Elset, elset=Disp, instance=model
 264, 265, 268, 272, 289, 290, 293, 297, 314, 315, 318, 322, 339, 340, 343, 347
*Nset, nset=Force, instance=model
  21,  22,  25,  26, 138, 139
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*Elset, elset=Force, instance=model
 264, 265, 268, 272, 289, 290, 293, 297, 314, 315, 318, 322, 339, 340, 343, 347
*Nset, nset=x_symm, instance=model
   5,   6,   7,   8,   9,  10
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*Elset, elset=x_symm, instance=model
  49,  50,  51,  52,  53,  54
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*Nset, nset=y_symm, instance=model
  17,  18,  19,  20, 114, 115
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*Elset, elset=y_symm, instance=model
 205, 206, 207, 208, 221, 222, 223, 224, 237, 238, 239, 240, 253, 254, 255, 256
*Nset, nset=z_symm, instance=model
   1,   4,   7,   8,   9,  11
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*Elset, elset=z_symm, instance=model
   1,   5,   9,  13,  17,  21
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*End Assembly
*Amplitude, name=Amp-1
             0.,              0.,            0.01,              1.
**
** MATERIALS
**
*Material, name=CP1000
*Density
 7.85,
*Elastic
213000., 0.3
**
** BOUNDARY CONDITIONS
**
** Name: x-Symmetrie Type: Symmetry/Antisymmetry/Encastre
*Boundary
x_symm, XSYMM
** Name: y-Symmetrie Type: Symmetry/Antisymmetry/Encastre
*Boundary
y_symm, YSYMM
** Name: z-Symmetrie Type: Symmetry/Antisymmetry/Encastre
*Boundary
z_symm, ZSYMM
** ----------------------------------------------------------------
**
** STEP: move
**
*Step, name=move, nlgeom=YES, inc=10000
*Static
0.001, 1., 1e-05, 0.01
**
** BOUNDARY CONDITIONS
**
** Name: Zug Type: Displacement/Rotation
*Boundary, amplitude=Amp-1
Disp, 2, 2, 1.
**
** OUTPUT REQUESTS
**
*Restart, write, number interval=1, time marks=NO
**
** FIELD OUTPUT: F-Output-1
**
*Output, field, number interval=100, time marks=NO
*Node Output
RF, U
*Element Output, directions=YES
PEEQ, S
**
** HISTORY OUTPUT: H-Output-1
**
*Output, history, variable=PRESELECT, number interval=200, time marks=NO
*End Step
