*Heading
**
** PARTS
**
*Part, name=bushing
*End Part
**
** ASSEMBLY
**
*Assembly, name=Assembly
**
*Instance, name=bushing-1, part=bushing
*Node
      1,          0.5,           0.
      2,     0.583333,           0.
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*Element, type=CPE4R, elset=ALL
1,  1,  2, 12, 11
2,  2,  3, 13, 12
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*Solid Section, elset=ALL, material=RUBBER
1.,
*End Instance
*Nset, nset=ref, instance=bushing-1
 999,
*Nset, nset=outer, generate, instance=bushing-1
   7,  557,   10
*Nset, nset=inner, generate, instance=bushing-1
   1,  551,   10
*Surface, type=node, name=inner, internal
inner, 1.0
*Coupling, constraint name=Constraint-1, ref node=ref, surface=inner
*Kinematic
1, 1
2, 2
*End Assembly
**
** MATERIALS
**
*Material, name=RUBBER
*Hyperelastic, moduli=INSTANTANEOUS
4000., 1000., 2e-05
*Viscoelastic, time=PRONY
 0.2, 0.5, 0.1
 0.1, 0.2, 0.2
**
** BOUNDARY CONDITIONS
**
*Boundary
outer, 1, 2
** ----------------------------------------------------------------
**
** STEP: Step-1
**
*Step, name=Step-1, nlgeom
*Static
0.001, 0.001, 0.0001, 0.001
*Cload
ref, 1, 50000.
*End Step
** ----------------------------------------------------------------
**
** STEP: Step-2
**
*Step, name=Step-2, nlgeom, inc=150
*Visco, cetol=0.0005
0.04, 1., 1e-05, 1.
*End Step
