*Heading
**
*Part, name=block
*Node
      1,           0.,          10.
      2,           0.,          8.5
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*Element, type=CAX4R, elset=block
  1,   1,   2,  23,  22
  2,   2,   3,  24,  23
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**
*Solid Section, elset=block, material=rubber
**
*Nset, nset=bottom, generate
  21,  714,   21
*Nset, nset=axis, generate
  1,  21,   1
*Elset, elset=block_S4, generate
   1,  641,   20
*Surface, type=ELEMENT, name=block
 block_S4, S4
*End Part
**
*Part, name=punch
*Node, nset=refPt
      1,           0.,          10.,           0.
*Surface, type=SEGMENTS, name=punch
START,          10.,          20.
 LINE,          10.,          10.
CIRCL,           0.,           0.,           0.,          10.
*Rigid Body, ref node=refPt, analytical surface=punch
*End Part
**
** ASSEMBLY
**
*Assembly, name=Assembly
**
*Instance, name=block-1, part=block
*End Instance
**
*Instance, name=punch-1, part=punch
          0.,          14.,           0.
*End Instance
**
*End Assembly
**
*Material, name=rubber
*Density
 1.2e-09,
*Hyperelastic, neo hooke
 2.,0.
**
*Surface Interaction, name=noFric
*Friction
 0.0,
**
*Boundary
 block-1.bottom, ENCASTRE
 block-1.axis,   XSYMM
 punch-1.refPt,  1, 6
**
*Amplitude, name=ramp
0., 0., 0.001, 1.
**
*Step, name=Step-1
*Dynamic, Explicit
, 0.001
**
*Boundary, amplitude=ramp
 punch-1.refPt, 2, 2, -10.
**
*Contact Pair, interaction=noFric
 block-1.block, punch-1.punch
**
*End Step
