*Heading
**
*Part, name=plate
*Node
      1,    0.7071068,    0.7071068
      2,           1.,           0.
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*Element, type=CPS4R, elset=plate
  1,   1,  12,  15,   4
  2,  12,  13,  14,  15
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**
*Solid Section, elset=plate, material=steel
0.1,
*End Part
**
** ASSEMBLY
**
*Assembly, name=Assembly
**
*Instance, name=plate-1, part=plate
*End Instance
*Nset, nset=xsymm, instance=plate-1
   9,  10,  11,  95,  96,  97
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*Nset, nset=ysymm, instance=plate-1
  2,  3,  5, 16, 17, 18
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*Nset, nset=pull, instance=plate-1
  5,  6,  7, 31, 32, 48
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*Elset, elset=_pull_S2, internal, instance=plate-1, generate
 19,  51,  16
*Elset, elset=_pull_S1, internal, instance=plate-1, generate
 52,  67,   1
*Surface, type=ELEMENT, name=pull
_pull_S2, S2
_pull_S1, S1
*End Assembly
**
*Material, name=steel
*Elastic
 1e+07, 0.3
*Plastic
 35000.,0.
**
*Boundary
xsymm, XSYMM
ysymm, YSYMM
**
*Step, name=Step-1, nlgeom=YES
*Static
0.1, 1.
**
*Dsload
pull, P, -40000.
**
***Boundary
**pull, 1, 1, 0.25
**
*End Step
