*Heading
**
** PARTS
**
*Part, name=ball
*End Part
*Part, name=racket
*End Part
**
** ASSEMBLY
**
*Assembly, name=Assembly
**
*Instance, name=racket-1, part=racket
*Node
    105,        -2.16,         -7.3,           0.
    106,        -1.62,       -7.825,           0.
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*Element, type=T3D2, elset=STRINGS
  1,  204,  205
  2,  205,  206
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*Element, type=S4R, elset=FRAME
3001, 10105, 10106,   106,   105
3002, 10106, 10107,   107,   106
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*Solid Section, elset=STRINGS, material=STRING
0.007854,
*Shell Section, elset=FRAME, material=STEEL
0.1, 5
*End Instance
**
*Instance, name=ball-1, part=ball
*Node
  30002,       -0.866,       -0.866,        2.366
  30003,      -0.5859,      -0.9764,        2.476
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*Element, type=S4R, elset=SPHERE
30001, 30002, 30003, 30009, 30008
30002, 30008, 30009, 30015, 30014
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*Shell Section, elset=SPHERE, material=RUBBER
0.2, 3
*End Instance
*Nset, nset=SPHERE, instance=ball-1, generate
 30002,  30153,      1
*End Assembly
**
** MATERIALS
**
*Material, name=RUBBER
*Density
 0.0001,
*Hyperelastic
100.,    25., 0.0001
*Material, name=STEEL
*Elastic
 3e+07, 0.3
*Material, name=STRING
*Density
 0.000107,
*Elastic
 1e+06,0.
** ----------------------------------------------------------------
**
** STEP: Step-1
**
*ELSET,ELSET=QA_TEST_All_ELSETS_AUTO
STRINGS, FRAME, STRINGS, FRAME, SPHERE, SPHERE,
*NSET,NSET=QA_TEST_All_NSETS_AUTO
SPHERE,
*Step, name=Step-1
*Dynamic, Explicit
, 0.015
*OUTPUT,FIELD,VARIABLE=PRESELECT,NUMBER INTERVAL=4,OP=NEW
*OUTPUT,HISTORY,VARIABLE=PRESELECT,TIME INTERVAL=0.00375,OP=NEW
*OUTPUT,FIELD,NUMBER INTERVAL=1,OP=ADD
*NODE OUTPUT, NSET=QA_TEST_All_NSETS_AUTO
U
*ELEMENT OUTPUT, ELSET=QA_TEST_All_ELSETS_AUTO
LE,PEEQ
*End Step
** ----------------------------------------------------------------
**
** STEP: Step-2
**
*Step, name=Step-2
*Dynamic, Explicit
, 0.015
*End Step
** ----------------------------------------------------------------
**
** STEP: Step-3
**
*Step, name=Step-3
*Dynamic, Explicit
, 0.015
*Bulk Viscosity
*End Step
