*Heading
**
** PARTS
**
*Part, name=tire
*End Part
**
** ASSEMBLY
**
*Assembly, name=Assembly
**
*Instance, name=tire-1, part=tire
*Node
      1,           0.,   -0.0645597,      0.18638
      3,           0.,   -0.0763406,      0.18622
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*Element, type=C3D8H
1, 250, 255, 254, 249,  50,  55,  54,  49
2, 245, 250, 249, 244,  45,  50,  49,  44
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*Element, type=C3D6H
4, 227, 231, 230,  27,  31,  30
204, 427, 431, 430, 227, 231, 230
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*ELSET, GEN, ELSET=TREAD
        1,    11801,      200,
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*ELSET, GEN, ELSET=SIDE
       15,    11815,      200,
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*ELSET, GEN, ELSET=BELT
       35,    11835,      200,
       36,    11836,      200,
       37,    11837,      200,
       38,    11838,      200,
*Orientation, name=Ori-1, system=CYLINDRICAL
0., 0., 0., 0., 1., 0.
1, 90.
*Solid Section, elset=TREAD, orientation=Ori-1, material=RUBBER
*Solid Section, elset=SIDE,  orientation=Ori-1, material=RUBBER
*Solid Section, elset=BELT,  orientation=Ori-1, material=RUBBER
*End Instance
*End Assembly
**
** MATERIALS
**
*Material, name=RUBBER
*Hyperelastic,n=1,moduli=long term
 1.0e6,
*Viscoelastic,time=prony
 0.3, 0.0, 0.1
*density
 1100.,
** ----------------------------------------------------------------
**
** STEP: Step-1
**
*Step, name=Step-1, nlgeom
*Static
0.1, 1., 1e-05, 1.
**
** OUTPUT REQUESTS
**
*Restart, write, frequency=0
**
** FIELD OUTPUT: F-Output-1
**
*Output, field, variable=PRESELECT
**
** HISTORY OUTPUT: H-Output-1
**
*Output, history, variable=PRESELECT
*El Print, freq=999999
*Node Print, freq=999999
*End Step
