** NVH: Acoustic mesh surrounding a truck cab and frame assembly for
**      sequentially coupled acoustic-structural analysis
** For import into Abaqus/CAE via the workshop script ws_nvh_STR-ACS_seq.py
**
*Heading
*Preprint, echo=NO, model=NO, history=NO, contact=NO
**
** PARTS
**
*Part, name=PART-1
*Node
 500000,   2450.46509,   368.099792,    823.18457
 500001,   2484.71606,   368.105194,   822.162903
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*Element, type=AC3D4
500000, 502130, 500190, 501581, 500181
500001, 502180, 502096, 501298, 501933
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*Element, type=ASI3D3
738281, 502028, 502050, 502027
738282, 501860, 501979, 501980
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*Elset, elset=INAIR, generate
 500000,  510396,       1
*Elset, elset=EXTAIR, generate
 700000,  714435,       1
*Elset, elset=_SKIN-INAIRASI, internal, generate
 738281,  738892,       1
*Elset, elset=_SKIN-SEATASI, internal, generate
 738893,  740876,       1
*Elset, elset=_SKIN-EXTAIRCABINASI, internal, generate
 740877,  741433,       1
*Elset, elset=_SKIN-EXTAIREGASI, internal, generate
 741434,  741839,       1
** Section: Section-1-INAIR
*Solid Section, elset=INAIR, material=INTAIR

** Section: Section-2-EXTAIR
*Solid Section, elset=EXTAIR, material=EXTAIR

** Section: Section-3-_SKIN-INAIRASI
*Interface, name=Section-3-_SKIN-INAIRASI, elset=_SKIN-INAIRASI
1.
** Section: Section-4-_SKIN-SEATASI
*Interface, name=Section-4-_SKIN-SEATASI, elset=_SKIN-SEATASI
1.
** Section: Section-5-_SKIN-EXTAIRCABINASI
*Interface, name=Section-5-_SKIN-EXTAIRCABINASI, elset=_SKIN-EXTAIRCABINASI
1.
** Section: Section-6-_SKIN-EXTAIREGASI
*Interface, name=Section-6-_SKIN-EXTAIREGASI, elset=_SKIN-EXTAIREGASI
1.
*End Part
**
**
** ASSEMBLY
**
*Assembly, name=Assembly
**
*Instance, name=PART-1-1, part=PART-1
*End Instance
**
*Nset, nset=CABIN_BOTTOM, instance=PART-1-1
 702443,
*Nset, nset=CABIN_FRONT, instance=PART-1-1
 700980,
*Nset, nset=CABIN_REAR, instance=PART-1-1
 700060,
*Nset, nset=CABIN_SIDE, instance=PART-1-1
 702313,
*Nset, nset=CABIN_TOP, instance=PART-1-1
 700970,
*Nset, nset=EG_BOTTOM, instance=PART-1-1
 700720,
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*Nset, nset=OUTPUT, instance=PART-1-1
 501323, 700060, 700720, 700970, 700980, 700982, 701596, 702313, 702401, 702443
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*Elset, elset=_INSIDE_INAIR_S1, internal, instance=PART-1-1
 500283, 500288, 500292, 500654, 500669, 500823
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*Elset, elset=_INSIDE_INAIR_S2, internal, instance=PART-1-1
 500002, 500029, 500074, 500221, 500234, 500277
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*Elset, elset=_INSIDE_INAIR_S4, internal, instance=PART-1-1
 500008, 500010, 500012, 500035, 500048, 500061
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*Elset, elset=_INSIDE_INAIR_S3, internal, instance=PART-1-1
 500017, 500028, 500034, 500047, 500050, 500068
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*Elset, elset=_OUTSIDE_INAIR_S1, internal, instance=PART-1-1
 502540, 505177, 505207, 506858, 506871, 506884
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*Elset, elset=_OUTSIDE_INAIR_S2, internal, instance=PART-1-1
 500280, 500700, 500786, 502626, 504974, 506495
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*Elset, elset=_INSIDE_INAIR_S1_1, internal, instance=PART-1-1
 500283, 500288, 500292, 500654, 500669, 500823
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*Elset, elset=_INSIDE_INAIR_S2_1, internal, instance=PART-1-1
 500002, 500029, 500074, 500221, 500234, 500277
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*Elset, elset=_INSIDE_INAIR_S4_1, internal, instance=PART-1-1
 500008, 500010, 500012, 500035, 500048, 500061
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*Elset, elset=_INSIDE_INAIR_S3_1, internal, instance=PART-1-1
 500017, 500028, 500034, 500047, 500050, 500068
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*Surface, type=ELEMENT, name=INSIDE_INAIR
_INSIDE_INAIR_S1_1, S1
_INSIDE_INAIR_S2_1, S2
_INSIDE_INAIR_S4_1, S4
_INSIDE_INAIR_S3_1, S3
*Elset, elset=_OUTSIDE_INAIR_S1_1, internal, instance=PART-1-1
 502540, 505177, 505207, 506858, 506871, 506884
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*Elset, elset=_OUTSIDE_INAIR_S2_1, internal, instance=PART-1-1
 500280, 500700, 500786, 502626, 504974, 506495
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*Elset, elset=_OUTSIDE_INAIR_S4_1, internal, instance=PART-1-1
 500069, 500128, 500131, 500287, 500289, 500341
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*Elset, elset=_OUTSIDE_INAIR_S3_1, internal, instance=PART-1-1
 500016, 500036, 500104, 500105, 500127, 500128
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*Surface, type=ELEMENT, name=OUTSIDE_INAIR
_OUTSIDE_INAIR_S1_1, S1
_OUTSIDE_INAIR_S2_1, S2
_OUTSIDE_INAIR_S4_1, S4
_OUTSIDE_INAIR_S3_1, S3
*Elset, elset=_RAD_S1_1, internal, instance=PART-1-1
 707368, 707755, 708393, 708737, 709707, 709831
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*Elset, elset=_RAD_S2_1, internal, instance=PART-1-1
 705247, 706618, 709849, 709966, 710018, 710023
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*Elset, elset=_RAD_S4_1, internal, instance=PART-1-1
 700044, 700053, 700081, 700107, 700370, 700383
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*Elset, elset=_RAD_S3_1, internal, instance=PART-1-1
 700252, 700587, 700608, 700698, 700792, 700864
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*Surface, type=ELEMENT, name=INFINITE_EXT
_RAD_S1_1, S1
_RAD_S2_1, S2
_RAD_S4_1, S4
_RAD_S3_1, S3
*Elset, elset=_ROAD_S1_1, internal, instance=PART-1-1
 700424, 710556, 710882, 710909, 710911, 711085
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*Elset, elset=_ROAD_S2_1, internal, instance=PART-1-1
 704065, 708074, 708248, 709735, 710025, 710438
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*Elset, elset=_ROAD_S4_1, internal, instance=PART-1-1
 700264, 700447, 700561, 700570, 701296, 703672
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*Elset, elset=_ROAD_S3_1, internal, instance=PART-1-1
 700161, 700510, 700624, 700772, 700891, 700893
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*Surface, type=ELEMENT, name=ROAD
_ROAD_S1_1, S1
_ROAD_S2_1, S2
_ROAD_S4_1, S4
_ROAD_S3_1, S3
*Elset, elset=_EXT_CABIN_S1_1, internal, instance=PART-1-1
 700034, 700514, 700919, 706297, 707183, 709467
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*Elset, elset=_EXT_CABIN_S2_1, internal, instance=PART-1-1
 700051, 708088, 708294, 708823, 710397, 710795
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*Elset, elset=_EXT_CABIN_S4_1, internal, instance=PART-1-1
 700033, 700269, 700586, 704965, 705844, 705932
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*Elset, elset=_EXT_CABIN_S3_1, internal, instance=PART-1-1
 700211, 700255, 700731, 700899, 700923, 701029
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*Surface, type=ELEMENT, name=EXT_CABIN
_EXT_CABIN_S1_1, S1
_EXT_CABIN_S2_1, S2
_EXT_CABIN_S4_1, S4
_EXT_CABIN_S3_1, S3
*Elset, elset=_EXT_EG_S1_1, internal, instance=PART-1-1
 700469, 700550, 700676, 700688, 700703, 700931
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*Elset, elset=_EXT_EG_S2_1, internal, instance=PART-1-1
 700251, 700313, 700398, 700784, 700931, 700943
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*Elset, elset=_EXT_EG_S4_1, internal, instance=PART-1-1
 700012, 700032, 700108, 700260, 700437, 700511
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*Elset, elset=_EXT_EG_S3_1, internal, instance=PART-1-1
 700012, 700047, 700108, 700110, 700148, 700156
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*Surface, type=ELEMENT, name=EXT_EG
_EXT_EG_S1_1, S1
_EXT_EG_S2_1, S2
_EXT_EG_S4_1, S4
_EXT_EG_S3_1, S3
**
*End Assembly
**
** MATERIALS
**
*Material, name=EXTAIR
*Acoustic Medium
 0.14,
*Density
 1.2e-12,
*Material, name=INTAIR
*Acoustic Medium
 0.14,
*Density
 1.2e-12,
**
** INTERACTION PROPERTIES
**
*Impedance Property, name=ROAD-IMPD
 6.2e-10, 6.4e-05,      5.
 6.2e-10, 6.4e-05,    500.
** ----------------------------------------------------------------
**
** STEP: Step-1
**
*Step, name=SSD_submodel, perturbation
*Steady State Dynamics, direct, frequency scale=LINEAR, friction damping=NO
40., 150., 15, 1.
**
** FIELD OUTPUT: F-Output-1
**
*Output, field
*Node Output
POR, U
**
** HISTORY OUTPUT: H-Output-1
**
*Output, history
*Node Output, nset=OUTPUT
POR
*End Step
