** NVH: Brake squeal analysis
** For import into Abaqus/CAE via the workshop script ws_nvh_brake_squeal.py
**
*Heading
*Preprint, echo=NO, model=NO, history=NO, contact=NO
** ----------------------------------------------------------------
*Node
      1,     39.46315,   85.1925201, 0.0141869998
      2,   49.5086403,   75.1659775,   16.2656593
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*Element, type=C3D8I
    1,  3717,  3715,  3716,  3719,  3701,  3698,  3699,  3700
    2,  1593,  1589,  1598,  1592,  1577,  1573,  1582,  1576
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*Element, type=C3D6
21530,  3199,  2707,  3243,  4304,  6767,  4296
21531,  3100,  3244,  2706,  4350,  4297,  6779
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*Nset, nset=INNER-EAR-CONST
 26556, 26557, 26558, 26573, 26578, 26582
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*Nset, nset=NSC1
   193,  1563,  1579,  1595,  1611,  1627
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*TRANSFORM, TYPE=C, NSET=NSC1
3.746444  , -7.6746   , 24.50679  ,  3.746444  ,  -7.6746   ,  25.50679
*Nset, nset=OUTER-EAR-CONST
 32478, 32668, 32669, 32670, 32671, 32674
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*Nset, nset=ROTOR, generate
     1,  25457,      1
*Nset, nset=ROTOR-CONSTR
 20111, 20157, 20175, 20176, 20259, 20279
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*Elset, elset=BACK-PLATE-SOLID-INNER
 16554, 16555, 16556, 16557, 16558, 16559
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*Elset, elset=INSULATOR-INNER
 20010, 20011, 20012, 20013, 20014, 20015
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*Elset, elset=INSULATOR-LOAD1
 20817, 20818, 20819, 20820, 20821, 20822
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*Elset, elset=INSULATOR-LOAD2
 20010, 20011, 20012, 20013, 20014, 20015
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*Elset, elset=INSULATOR-OUTER
 20770, 20771, 20772, 20773, 20774, 20775
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*Elset, elset=OUTER-BACKPLATE-FEM
 18282, 18283, 18284, 18285, 18286, 18287
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*Elset, elset=OUTER-PAD-FEM
 22510, 22511, 22512, 22513, 22514, 22515
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*Elset, elset=PAD-SOLID-INNER
 22406, 22407, 22408, 22409, 22410, 22411
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*Elset, elset=ROTOR-FEM
     1,     2,     3,     4,     5,     6
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** Section: Section-ROTOR-FEM
*Solid Section, elset=ROTOR-FEM, material=ROT-MAT
1.,
** Section: Section-BACK-PLATE-SOLID-INNER
*Solid Section, elset=BACK-PLATE-SOLID-INNER, material=BACK-PLT-MAT
1.,
** Section: Section-OUTER-BACKPLATE-FEM
*Solid Section, elset=OUTER-BACKPLATE-FEM, material=BACK-PLT-MAT
1.,
** Section: Section-INSULATOR-INNER
*Solid Section, elset=INSULATOR-INNER, material=INSULATOR-MAT
1.,
** Section: Section-INSULATOR-OUTER
*Solid Section, elset=INSULATOR-OUTER, material=INSULATOR-MAT
1.,
*Orientation, name=Ori-2
          1.,           0.,           0.,           0.,           1.,           0.
1, 0.
** Section: Section-PAD-SOLID-INNER
*Solid Section, elset=PAD-SOLID-INNER, orientation=Ori-2, material=PAD-MAT
1.,
*Orientation, name=Ori-1
          1.,           0.,           0.,           0.,           1.,           0.
1, 0.
** Section: Section-OUTER-PAD-FEM
*Solid Section, elset=OUTER-PAD-FEM, orientation=Ori-1, material=PAD-MAT
1.,
*System
*Elset, elset=PADIN-SURF1_S2
 22483, 22484, 22485, 22486, 22489, 22492
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*Surface, type=ELEMENT, name=PADIN-SURF1
PADIN-SURF1_S2, S2
*Elset, elset=PADIN-SURF2_S2
 22431, 22432, 22433, 22434, 22437, 22440
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*Surface, type=ELEMENT, name=PADIN-SURF2
PADIN-SURF2_S2, S2
*Elset, elset=PADOUT-SURF1_S2
 22535, 22536, 22537, 22538, 22541, 22544
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*Surface, type=ELEMENT, name=PADOUT-SURF1
PADOUT-SURF1_S2, S2
*Elset, elset=PADOUT-SURF2_S2
 22587, 22588, 22589, 22590, 22593, 22596
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*Surface, type=ELEMENT, name=PADOUT-SURF2
PADOUT-SURF2_S2, S2
*Elset, elset=ROT-PADIN-SURF_S2
   809,   810,   811,   812,   813,   814
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*Surface, type=ELEMENT, name=ROT-PADIN-SURF
ROT-PADIN-SURF_S2, S2
*Elset, elset=ROT-PADOUT-SURF_S5
   4,  26,  48,  70,  92, 114
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*Elset, elset=ROT-PADOUT-SURF_S2
   720,   721,   722,   723,   724,   725
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*Elset, elset=ROT-PADOUT-SURF_S4
 9090, 9101, 9112, 9130, 9341, 9358
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*Surface, type=ELEMENT, name=ROT-PADOUT-SURF
ROT-PADOUT-SURF_S5, S5
ROT-PADOUT-SURF_S2, S2
ROT-PADOUT-SURF_S4, S4
**
** MATERIALS
**
*Material, name=BACK-PLT-MAT
*Density
 7.82e-06,
*Elastic
 2.07e+08, 0.28
*Material, name=INSULATOR-MAT
*Density
 7.82e-06,
*Elastic
 2.07e+08, 0.29
*Material, name=PAD-MAT
*Density
 2.51e-06,
*Elastic, type=ANISOTROPIC
 5.94e+06,  760000., 5.94e+06,  980000.,  980000., 2.27e+06,       0.,       0.
       0., 2.59e+06,       0.,       0.,       0.,       0., 1.18e+06,       0.
       0.,       0.,       0.,       0., 1.18e+06
*Material, name=ROT-MAT
*Density
 7.2e-06,
*Elastic
 1.25e+08, 0.24
**
*CONTACT PAIR,SMALL SLIDING,INTERACTION=PAD_ROTOR
 Padin-surf1,Rot-Padin-surf
*SURFACE INTERACTION,NAME=PAD_ROTOR
*CONTACT PAIR,SMALL SLIDING,INTERACTION=PAD_ROTOR
 Padin-surf2,Rot-Padin-surf
*CONTACT PAIR,SMALL SLIDING,INTERACTION=PAD_ROTOR
 Padout-surf1,Rot-Padout-surf
*CONTACT PAIR,SMALL SLIDING,INTERACTION=PAD_ROTOR
 Padout-surf2,Rot-Padout-surf
***************
*STEP, INC =  1000, NLGEOM, NAME=PRESSURE
*STATIC
 1.0      ,1.0
*BOUNDARY, OP=NEW
 Outer-ear-const,1,2,0.
 Inner-ear-const,1,2,0.
 Rotor-constr,1,3,0.
*DLOAD, OP=NEW
 Insulator-load1, P1, 0.5E+03
 Insulator-load2, P2, 0.5E+03
*OUTPUT, FIELD, FREQUENCY=4
*NODE OUTPUT
 U,
*ELEMENT OUTPUT
 S,E
*END STEP
***************
***************
*STEP, NAME=FREQ
 Natural frquency extraction
*FREQUENCY, eigensolver=lanczos, acoustic coupling=off
 15,
*OUTPUT, FIELD
*NODE OUTPUT
 U,
*END STEP
***************
***************
