**
** NVH: Truck cab and frame assembly
**      coupled acoustic-structural analysis
**
*Heading
*Preprint, echo=NO, model=NO, history=NO, contact=NO
**
*Node
   3211,   1916.25598,   682.081421,   1822.80298
   3212,   1889.67798,   684.743225,   1817.29846
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*Element, type=C3D8
 587,50000000,50000001,50000004,50000006, 400036, 400037, 400041, 400040
 588,50000001,50000002,50000005,50000004, 400037, 400038, 400042, 400041
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*Element, type=S4
5221,   3211,   3212,  18740,  18411
5223,   3213,   3214,  18767,  18740
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*Element, type=S3R
6454, 5892, 5898, 5891
6492, 5906, 5939, 5907
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*Element, type=C3D6
59553,60000162,9104597,60000008,60000161,9104629,60000009
59554,60000009,60000161,9104629,60000010,60000160,9104599
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*Element, type=AC3D4
500000, 502130, 500190, 501581, 500181
500001, 502180, 502096, 501298, 501933
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*Elset, elset=SEAT-BOTTOM, generate
  587,  1090,     1
*Elset, elset=SEAT-TOP
   1967,   1968,   1969,   1970,   1971,   1972
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*Elset, elset=CABIN-BACK-PILLAR-OUTER-LEFT
  5221,  5223,  5225,  5226,  5264,  5265
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*Elset, elset=CABIN-BACK
  6446,  6447,  6448,  6449,  6450,  6451
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*Elset, elset=CABIN-BOTTOM-CENTER
  7080,  7081,  7082,  7083,  7084,  7085
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*Elset, elset=CABIN-BOTTOM-LEFT
  7933,  7936,  7937,  7938,  7940,  7941
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*Elset, elset=CABIN-FIREWALL
 10526, 10527, 10533, 10534, 10552, 10553
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*Elset, elset=CABIN-ROOF-OUTER
 12671, 12672, 12673, 12674, 12675, 12676
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*Elset, elset=DOOR-OUTER-LEFT
 17933, 17934, 17935, 17936, 17937, 17938
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*Elset, elset=DASHBOARD-INTERIOR
 39680, 39681, 39685, 39707, 39708, 39722
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*Elset, elset=CABIN-DASHBOARD-UP
 48100, 48101, 48103, 48104, 48107, 48108
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*Elset, elset=WINDOW-FRONT
 52607, 52608, 52609, 52610, 52611, 52612
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*Elset, elset=WINDOW-SIDE-LEFT
 53062, 53063, 53064, 53065, 53066, 53067
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*Elset, elset=WINDOW-BACK
 53275, 53276, 53277, 53278, 53279, 53280
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*Elset, elset=ENGINE-GEARBOX
  56249,  56250,  56251,  56255,  56256,  56257
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*Elset, elset=ENGINE-FRONT
 59491, 59492, 59493, 59494, 59497, 59508
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*Elset, elset=SEAT_SUPPORT
110260576,110260577,110260578,110260579,110260580,110260581
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*Elset, elset=FRAME, generate
110260606, 110260877,       1
*Elset, elset=SUBFRAME
110260886,110260887,110260888,110260889,110260890,110260891
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*Elset, elset=INAIR, generate
 500000,  510396,       1
*Elset, elset=EXTAIR, generate
 700000,  714435,       1
*Nset, nset=_PickedSet24
60000079,
*Nset, nset=_PickedSet25
188237034,
*Nset, nset=_PickedSet26
188236977,
*Nset, nset=_PickedSet27
60000174,
** Section: Section-1-SEAT-BOTTOM
*Solid Section, elset=SEAT-BOTTOM, material=SEAT
,
** Section: Section-2-SEAT-TOP
*Solid Section, elset=SEAT-TOP, material=SEAT
,
** Section: Section-3-CABIN-BACK-PILLAR-OUTER-LEFT
*Shell Section, elset=CABIN-BACK-PILLAR-OUTER-LEFT, material=ELASTIC
1.1, 3
** Section: Section-4-CABIN-BACK
*Shell Section, elset=CABIN-BACK, material=ELASTIC
0.9, 3
** Section: Section-5-CABIN-BOTTOM-CENTER
*Shell Section, elset=CABIN-BOTTOM-CENTER, material=ELASTIC
0.9, 3
** Section: Section-6-CABIN-BOTTOM-LEFT
*Shell Section, elset=CABIN-BOTTOM-LEFT, material=ELASTIC
0.8, 3
** Section: Section-7-CABIN-FIREWALL
*Shell Section, elset=CABIN-FIREWALL, material=ELASTIC
1., 3
** Section: Section-8-CABIN-ROOF-OUTER
*Shell Section, elset=CABIN-ROOF-OUTER, material=ELASTIC
1., 3
** Section: Section-9-DOOR-OUTER-LEFT
*Shell Section, elset=DOOR-OUTER-LEFT, material=ELASTIC
1.9, 3
** Section: Section-10-DASHBOARD-INTERIOR
*Shell Section, elset=DASHBOARD-INTERIOR, material=ELASTIC
4., 3
** Section: Section-11-CABIN-DASHBOARD-UP
*Shell Section, elset=CABIN-DASHBOARD-UP, material=ELASTIC
1.1, 3
** Section: Section-12-WINDOW-FRONT
*Shell Section, elset=WINDOW-FRONT, material=ELASTIC
5., 3
** Section: Section-13-WINDOW-SIDE-LEFT
*Shell Section, elset=WINDOW-SIDE-LEFT, material=ELASTIC
4., 3
** Section: Section-14-WINDOW-BACK
*Shell Section, elset=WINDOW-BACK, material=ELASTIC
5., 3
** Section: Section-15-ENGINE-GEARBOX
*Solid Section, elset=ENGINE-GEARBOX, material=ELASTIC
,
** Section: Section-16-ENGINE-FRONT
*Solid Section, elset=ENGINE-FRONT, material=ELASTIC
,
** Section: Section-20-INAIR
*Solid Section, elset=INAIR, material=INTAIR
,
** Section: Section-21-EXTAIR
*Solid Section, elset=EXTAIR, material=EXTAIR
,
** Section: Section-17-SEAT_SUPPORT
*Solid Section, elset=SEAT_SUPPORT, material=ELASTIC
,
** Section: Section-18-FRAME
*Shell Section, elset=FRAME, material=ELASTIC
3., 5
** Section: Section-19-SUBFRAME
*Shell Section, elset=SUBFRAME, material=ELASTIC
3., 5
*Element, type=SpringA, elset=EG_MTG-SPRING-spring
110261043, 60000079, 188237034
110261044, 188236977, 60000174
*Spring, elset=EG_MTG-SPRING-spring

12500.
**
*MPC
BEAM, 8056, 188236830
BEAM, 8156, 188236828
*Nset, nset=CABIN_BOTTOM
 702443,
*Nset, nset=CABIN_FRONT
 700980,
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*Elset, elset=SEAT
    587,    588,    589,    590,    591,    592
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*Elset, elset=_CAB_INTERIOR_STR_SNEG
  5221,  5223,  5225,  5226,  5264,  5265
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*Surface, type=ELEMENT, name=CAB_INTERIOR_STR
_CAB_INTERIOR_STR_SNEG, SNEG
*Elset, elset=_CAB_EXTERIOR_STR_SPOS
  5221,  5223,  5225,  5226,  5264,  5265
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*Surface, type=ELEMENT, name=CAB_EXTERIOR_STR
_CAB_EXTERIOR_STR_SPOS, SPOS
*Elset, elset=_SEAT_STR_S1
    587,    588,    589,    590,    591,    592
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*Elset, elset=_SEAT_STR_S2
    611,    612,    613,    614,    615,    616
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*Elset, elset=_SEAT_STR_S4
    589,    592,    595,    598,    601,    604
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*Elset, elset=_SEAT_STR_S6
    797,    799,    801,    947,    951,    955
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*Elset, elset=_SEAT_STR_S3
    689,    690,    691,    692,    693,    694
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*Elset, elset=_SEAT_STR_S5
    807,    808,    809,    810,   2231,   2232
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*Surface, type=ELEMENT, name=SEAT_STR
_SEAT_STR_S1, S1
_SEAT_STR_S2, S2
_SEAT_STR_S4, S4
_SEAT_STR_S6, S6
_SEAT_STR_S3, S3
_SEAT_STR_S5, S5
*Elset, elset=_EG_STR_S1
 56270, 56271, 56272, 56434, 56435, 56438
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*Elset, elset=_EG_STR_S2
 56530, 56531, 56532, 56533, 56534, 59521
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*Elset, elset=_EG_STR_S4
 56251, 56257, 56263, 56327, 56333, 56339
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*Elset, elset=_EG_STR_S6
 56270, 56275, 56280, 56284, 56288, 56294
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*Elset, elset=_EG_STR_S3
 56249, 56250, 56251, 56270, 56271, 56272
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*Elset, elset=_EG_STR_S5
  56349,  56350,  56351,  56444,  56445,  56458
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*Surface, type=ELEMENT, name=EG_STR
_EG_STR_S1, S1
_EG_STR_S2, S2
_EG_STR_S4, S4
_EG_STR_S6, S6
_EG_STR_S3, S3
_EG_STR_S5, S5
*Elset, elset=_SEAT_ACS_S1
 500283, 500288, 500292, 500654, 500669, 500823
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*Elset, elset=_SEAT_ACS_S2
 500002, 500029, 500074, 500221, 500234, 500277
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*Elset, elset=_SEAT_ACS_S4
 500008, 500010, 500012, 500035, 500048, 500061
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*Elset, elset=_SEAT_ACS_S3
 500017, 500028, 500034, 500047, 500050, 500068
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*Surface, type=ELEMENT, name=SEAT_ACS
_SEAT_ACS_S1, S1
_SEAT_ACS_S2, S2
_SEAT_ACS_S4, S4
_SEAT_ACS_S3, S3
*Elset, elset=_CAB_INTERIOR_ACS_S1
 502540, 505177, 505207, 506858, 506871, 506884
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*Elset, elset=_CAB_INTERIOR_ACS_S2
 500280, 500700, 500786, 502626, 504974, 506495
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*Elset, elset=_CAB_INTERIOR_ACS_S4
 500069, 500128, 500131, 500287, 500289, 500341
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*Elset, elset=_CAB_INTERIOR_ACS_S3
 500016, 500036, 500104, 500105, 500127, 500128
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*Surface, type=ELEMENT, name=CAB_INTERIOR_ACS
_CAB_INTERIOR_ACS_S1, S1
_CAB_INTERIOR_ACS_S2, S2
_CAB_INTERIOR_ACS_S4, S4
_CAB_INTERIOR_ACS_S3, S3
*Elset, elset=_INFINITE_EXT_S1
 707368, 707755, 708393, 708737, 709707, 709831
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*Elset, elset=_INFINITE_EXT_S2
 705247, 706618, 709849, 709966, 710018, 710023
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*Elset, elset=_INFINITE_EXT_S4
 700044, 700053, 700081, 700107, 700370, 700383
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*Elset, elset=_INFINITE_EXT_S3
 700252, 700587, 700608, 700698, 700792, 700864
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*Surface, type=ELEMENT, name=INFINITE_EXT
_INFINITE_EXT_S1, S1
_INFINITE_EXT_S2, S2
_INFINITE_EXT_S4, S4
_INFINITE_EXT_S3, S3
*Elset, elset=_ROAD_S1
 700424, 710556, 710882, 710909, 710911, 711085
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*Elset, elset=_ROAD_S2
 704065, 708074, 708248, 709735, 710025, 710438
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*Elset, elset=_ROAD_S4
 700264, 700447, 700561, 700570, 701296, 703672
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*Elset, elset=_ROAD_S3
 700161, 700510, 700624, 700772, 700891, 700893
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*Surface, type=ELEMENT, name=ROAD
_ROAD_S1, S1
_ROAD_S2, S2
_ROAD_S4, S4
_ROAD_S3, S3
*Elset, elset=_CAB_EXTERIOR_ACS_S1
 700034, 700514, 700919, 706297, 707183, 709467
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*Elset, elset=_CAB_EXTERIOR_ACS_S2
 700051, 708088, 708294, 708823, 710397, 710795
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*Elset, elset=_CAB_EXTERIOR_ACS_S4
 700033, 700269, 700586, 704965, 705844, 705932
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*Elset, elset=_CAB_EXTERIOR_ACS_S3
 700211, 700255, 700731, 700899, 700923, 701029
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*Surface, type=ELEMENT, name=CAB_EXTERIOR_ACS
_CAB_EXTERIOR_ACS_S1, S1
_CAB_EXTERIOR_ACS_S2, S2
_CAB_EXTERIOR_ACS_S4, S4
_CAB_EXTERIOR_ACS_S3, S3
*Elset, elset=_EG_ACS_S1
 700469, 700550, 700676, 700688, 700703, 700931
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*Elset, elset=_EG_ACS_S2
 700251, 700313, 700398, 700784, 700931, 700943
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*Elset, elset=_EG_ACS_S4
 700012, 700032, 700108, 700260, 700437, 700511
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*Elset, elset=_EG_ACS_S3
 700012, 700047, 700108, 700110, 700148, 700156
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*Surface, type=ELEMENT, name=EG_ACS
_EG_ACS_S1, S1
_EG_ACS_S2, S2
_EG_ACS_S4, S4
_EG_ACS_S3, S3
**
** MATERIALS
**
*Material, name=ELASTIC
*Density
 7.82e-09,
*Elastic
210000., 0.3
*Material, name=EXTAIR
*Acoustic Medium
 0.14,
*Density
 1.2e-12,
*Material, name=INTAIR
*Acoustic Medium
 0.14,
*Density
 1.2e-12,
*Material, name=SEAT
*Density
 2.5e-10,
*Elastic
2100., 0.3
**
** INTERACTION PROPERTIES
**
*Impedance Property, name=ROAD-IMPD
 6.2e-10, 6.4e-05,      5.
 6.2e-10, 6.4e-05,    500.
**
** ---------------------------------
**
**	ADD TIE CONSTRAINTS
**
** ---------------------------------
**
**	ADD STRUCTURAL BOUNDARY CONDITIONS
**
**
** ----------------------------------------------------------------
**
**	ADD STEP: SSD
**
** ----------------------------------------------------------------
