*Heading
**
*Part, name=WING
*Node
      1,  0.361427993, 0.0987646878,           0.
      2,  0.361427993,  0.088764444,           0.
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*Element, type=C3D8R
   1, 6272, 2063,  215, 1951, 1967,  262,    1,  232
   2, 2015,  269,    2,  216, 6272, 2063,  215, 1951
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*Element, type=C3D6
6743, 4928, 4940, 4939, 7332, 7344, 7343
6744, 7332, 7344, 7343, 7354, 7366, 7365
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*Elset, elset=NOSE
 5291, 5292, 5293, 5294, 5295, 5296
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*Elset, elset=TAIL
 3631, 3632, 3633, 3634, 3635, 3636
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*Elset, elset=TOP, generate
 3169,  3630,     1
*Elset, elset=VERTICAL, generate
 2769,  3048,     1
*Elset, elset=BASE
    1,    2,    3,    4,    5,    6
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*Elset, elset=ISOTROPIC, generate
 3631,  6902,     1
*End Part
**
**
** ASSEMBLY
**
*Assembly, name=Assembly
**
*Instance, name=WING-1, part=WING
*End Instance
**
*Nset, nset=fix, instance=WING-1
   10,   11,   13,   14,   33,   34
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*Nset, nset=pull, instance=WING-1
    1,    2,    3,    4,   27,   28
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*End Assembly
**
*Step, name=STATIC, nlgeom=YES
*Static
0.1, 1.
**
*Boundary
pull, 2, 2, 0.0025
fix, ENCASTRE
**
*End Step
