** ----------------------------------------------------------------
** PART INSTANCE: UPPER_JAW
**
*Element, type=S3R, elset=UPPER_JAW_ALL
1, 84, 63, 64
2, 86, 4, 60
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*shellgeneralsection, elset=UPPER_JAW_ALL, material=STEEL
1.,
** ----------------------------------------------------------------
** PART INSTANCE: LOWER_JAW
**
*Element, type=S3R, ELSET=LOWER_JAW_ALL
940, 521, 566, 524
941, 566, 567, 568
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*shellgeneralsection, elset=LOWER_JAW_ALL, material=STEEL
1.,
** ----------------------------------------------------------------
** PART INSTANCE: RIVET
**
*Element, type=S3R, elset=RIVET_ALL
1768, 941, 949, 940
1769, 940, 949, 948
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*shellgeneralsection, elset=RIVET_ALL, material=STEEL
1.,
***
***  Ref node base node definitions
***
*Nset, nset=UPPER_JAW_REFPT
520
*Nset, nset=LOWER_JAW_REFPT
939
*NODE, NSET=UPPER_JAW_CONN
4500, 0., 0., 0.
*NODE, NSET=LOWER_JAW_CONN
4501, 0., 0., 0.
***
***  Definition of Transformed coordinate systems to define BC
***
**
** Dummy material definition
**
*material, name=STEEL
*elastic
200000., 0.3
*density
8e-9
