*Heading
** ----------------------------------------------------------------
** PART INSTANCE: BODY-1
**
*Node
1, 60, 0, 0
2, 60, 0, 50
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*Element, type=R3D4
1, 1, 29, 282, 78
2, 29, 30, 283, 282
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*Nset, nset=ASSEMBLY_BODY-1_BODY-1-REFPT_
1037
*Nset, nset=REFPT
1037
*Nset, nset=ASSEMBLY_BODY-1_TIENODES
1038, 1039, 1040, 1041
*Elset, elset=ASSEMBLY_BODY-1_BODY-1
1, 2, 3, 4, 5, 6
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** ----------------------------------------------------------------
** PART INSTANCE: WHEEL-1
**
*Node
1238, 70, -5, -2.5
1239, 78, -5, -2.5
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*Element, type=R3D4
1189, 1243, 1242, 1286, 1285
1190, 1242, 1238, 1277, 1286
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*Nset, nset=ASSEMBLY_WHEEL-1_WHEEL-1-REFPT_
1336
*Elset, elset=ASSEMBLY_WHEEL-1_WHEEL-1
1189, 1190, 1191, 1192, 1193, 1194
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** ----------------------------------------------------------------
** PART INSTANCE: WHEEL-2
**
*Node
1337, -30, -5, -2.5
1338, -22, -5, -2.5
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*Element, type=R3D4
1285, 1342, 1341, 1385, 1384
1286, 1341, 1337, 1376, 1385
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*Nset, nset=ASSEMBLY_WHEEL-2_WHEEL-2-REFPT_
1435
*Elset, elset=ASSEMBLY_WHEEL-2_WHEEL-2
1285, 1286, 1287, 1288, 1289, 1290
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** ----------------------------------------------------------------
** PART INSTANCE: WHEEL-3
**
*Node
1436, 70, -5, 47.5
1437, 78, -5, 47.5
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*Element, type=R3D4
1381, 1441, 1440, 1484, 1483
1382, 1440, 1436, 1475, 1484
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*Nset, nset=ASSEMBLY_WHEEL-3_WHEEL-3-REFPT_
1534
*Elset, elset=ASSEMBLY_WHEEL-3_WHEEL-3
1381, 1382, 1383, 1384, 1385, 1386
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** ----------------------------------------------------------------
** PART INSTANCE: WHEEL-4
**
*Node
1535, -30, -5, 47.5
1536, -22, -5, 47.5
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*Element, type=R3D4
1477, 1540, 1539, 1583, 1582
1478, 1539, 1535, 1574, 1583
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*Nset, nset=ASSEMBLY_WHEEL-4_WHEEL-4-REFPT_
1633
*Elset, elset=ASSEMBLY_WHEEL-4_WHEEL-4
1477, 1478, 1479, 1480, 1481, 1482
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** ----------------------------------------------------------------
** PART INSTANCE: ROADLEFT-1
**
*Node
1044, -234.331, -69.1265, -3.726900408829e-014
1045, -30, -13, -1.22465e-014
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*Element, type=RB3D2
999, 1044, 1047
1000, 1047, 1048
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*Nset, nset=ASSEMBLY_ROADLEFT-1_ROADLEFT-1-REFPT_
1149
*Elset, elset=ASSEMBLY_ROADLEFT-1_ROADLEFT-1
999, 1000, 1001, 1002, 1003, 1004
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** ----------------------------------------------------------------
** PART INSTANCE: ROADRIGHT-1
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*Nset, nset=ASSEMBLY_ROADRIGHT-1_ROADRIGHT-1-REFPT_
1237
*Elset, elset=ASSEMBLY_ROADRIGHT-1_ROADRIGHT-1
1103, 1104, 1105, 1106, 1107, 1108
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** ----------------------------------------------------------------
** PART INSTANCE: RIGSURFLEFT-1
**
*Node
1042, -162.594, -27.6159, -2.909634548787e-014
*Nset, nset=ASSEMBLY_RIGSURFLEFT-1_RIGSURFLEFT-1-REFPT_
1042
*surface, type=CYLINDER, name=ASSEMBLY_RIGSURFLEFT-1_RIGIDSURFACE_
-30, -5, -1.28588E-14, -31, -5, -1.29812606353822E-14
-30, -5, 0.999999999999987
START, -105., 0.
LINE, -100., 0.
LINE, 0., 0.
CIRCL, 132.594398005024, -22.6159441395473, 0., -399.999999999999
*rigidbody, refnode=ASSEMBLY_RIGSURFLEFT-1_RIGSURFLEFT-1-REFPT_, analyticalsurface=ASSEMBLY_RIGSURFLEFT-1_RIGIDSURFACE_
** ----------------------------------------------------------------
** PART INSTANCE: RIGSURFRIGHT-1
**
*Node
1043, -155.717, -32.6122, 50
*Nset, nset=ASSEMBLY_RIGSURFRIGHT-1_RIGSURFRIGHT-1-REFPT_
1043
*surface, type=CYLINDER, name=ASSEMBLY_RIGSURFRIGHT-1_RIGIDSURFACE_
-30, -5, 50, -31, -5, 50
-30, -5, 51
START, -105., 0.
LINE, -100., 0.
LINE, 0., 0.
CIRCL, 125.717453238524, -27.6121846498645, 0., -300.
*rigidbody, refnode=ASSEMBLY_RIGSURFRIGHT-1_RIGSURFRIGHT-1-REFPT_, analyticalsurface=ASSEMBLY_RIGSURFRIGHT-1_RIGIDSURFACE_
*surface, type=NODE, name=ASSEMBLY__G38_CNS_
ASSEMBLY__G38, 1.
*surface, type=NODE, name=ASSEMBLY__G40_CNS_
ASSEMBLY__G40, 1.
*rigidbody, refnode=ASSEMBLY_BODY-1_BODY-1-REFPT_, tienset=ASSEMBLY_BODY-1_TIENODES, position=CENTEROFMASS,
elset=ASSEMBLY_BODY-1_BODY-1
*rigidbody, refnode=ASSEMBLY_WHEEL-1_WHEEL-1-REFPT_, elset=ASSEMBLY_WHEEL-1_WHEEL-1
*rigidbody, refnode=ASSEMBLY_WHEEL-2_WHEEL-2-REFPT_, elset=ASSEMBLY_WHEEL-2_WHEEL-2
*rigidbody, refnode=ASSEMBLY_WHEEL-3_WHEEL-3-REFPT_, elset=ASSEMBLY_WHEEL-3_WHEEL-3
*rigidbody, refnode=ASSEMBLY_WHEEL-4_WHEEL-4-REFPT_, elset=ASSEMBLY_WHEEL-4_WHEEL-4
*rigidbody, refnode=ASSEMBLY_ROADLEFT-1_ROADLEFT-1-REFPT_, elset=ASSEMBLY_ROADLEFT-1_ROADLEFT-1
*rigidbody, refnode=ASSEMBLY_ROADRIGHT-1_ROADRIGHT-1-REFPT_, elset=ASSEMBLY_ROADRIGHT-1_ROADRIGHT-1
**
** Assembly Nsets
**
*Nset, nset=ASSEMBLY__G38
1336, 1435
*Nset, nset=ASSEMBLY__G40
1534, 1633
*contactpair, interaction=NOFRIC, adjust=0.1
ASSEMBLY__G38_CNS_, ASSEMBLY_RIGSURFLEFT-1_RIGIDSURFACE_
ASSEMBLY__G40_CNS_, ASSEMBLY_RIGSURFRIGHT-1_RIGIDSURFACE_
*surfaceinteraction, name=NOFRIC
*friction
0.2,
*boundary
ASSEMBLY_ROADLEFT-1_ROADLEFT-1-REFPT_, 1, 6
ASSEMBLY_ROADRIGHT-1_ROADRIGHT-1-REFPT_, 1, 6
ASSEMBLY_BODY-1_BODY-1-REFPT_, 1, 1
ASSEMBLY_BODY-1_BODY-1-REFPT_, 3, 3
ASSEMBLY_BODY-1_BODY-1-REFPT_, 4, 6
ASSEMBLY_RIGSURFRIGHT-1_RIGSURFRIGHT-1-REFPT_, 1, 6
ASSEMBLY_RIGSURFLEFT-1_RIGSURFLEFT-1-REFPT_, 1, 6
**
**
*******************************************
**          Define Orientations          **
*******************************************


*******************************************
**    Define Connector Elements          **
*******************************************


*******************************************
**    Define Connector Behavior          **
*******************************************


*Step, nlgeom, name=Step-1, inc=1000,Convert Sdi=No
Apply Weight
*static
1., 1.
*cload
ASSEMBLY_BODY-1_BODY-1-REFPT_, 2, -9810
*******************************************
**    Define Connector Motion            **
*******************************************


*******************************************
**        Output Requests                **
*******************************************


*******************************************
*endstep
*Step, nlgeom, name=Step-2, inc=1000,Convert Sdi=No
Apply Motion
*static
1., 125.0, , 5.
*boundary, op=NEW
ASSEMBLY_BODY-1_BODY-1-REFPT_, 3, 3, 0.
ASSEMBLY_ROADLEFT-1_ROADLEFT-1-REFPT_, 1, 6, 0.
ASSEMBLY_ROADRIGHT-1_ROADRIGHT-1-REFPT_, 1, 6, 0.
ASSEMBLY_RIGSURFRIGHT-1_RIGSURFRIGHT-1-REFPT_, 1, 6, 0.
ASSEMBLY_RIGSURFLEFT-1_RIGSURFLEFT-1-REFPT_, 1, 6, 0.
*******************************************
**     Additional *BOUNDARY Data         **
*******************************************


*******************************************
*endstep
