*Heading
Full Swing
** ----------------------------------------------------------------
** PART INSTANCE: ARM-1
**
*Node
1, 0.85, 0, -0.0125
2, 0, 0, -0.0125
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*Element, type=S4R
1, 1, 17, 73, 26
2, 17, 18, 74, 73
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*Nset, nset=ASSEMBLY_ARM-1_ARM-1-REFPT
105
*Elset, elset=ASSEMBLY_ARM-1_ARM-1
1, 2, 3, 4, 5, 6
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*shellsection, elset=ASSEMBLY_ARM-1_ARM-1, material=STEEL
3.0E-3,
** ----------------------------------------------------------------
** PART INSTANCE: GRIP-1
**
*Node
106, 0.85, 0.0125, 0.03
107, 1.1, 0.0075, 0.03
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*Element, type=S4R
103, 106, 116, 143, 123
104, 116, 117, 144, 143
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*Nset, nset=ASSEMBLY_GRIP-1_GRIP-1-REFPT
184
*Elset, elset=ASSEMBLY_GRIP-1_GRIP-1
103, 104, 105, 106, 107, 108
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*shellsection, elset=ASSEMBLY_GRIP-1_GRIP-1, material=STEEL
2.0E-3,
** ----------------------------------------------------------------
** PART INSTANCE: SHAFT-1
**
*Node
884, 1.88, -2.23881594925e-016, 0.03
885, 1.88, -2.23667279425e-016, 0.0265
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*Element, type=S4R
875, 894, 884, 895, 935
876, 935, 895, 896, 934
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*Nset, nset=ASSEMBLY_SHAFT-1_SHAFT-1-REFPT
974
*Elset, elset=ASSEMBLY_SHAFT-1_SHAFT-1
875, 876, 877, 878, 879, 880
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*shellsection, elset=ASSEMBLY_SHAFT-1_SHAFT-1, material=STEEL
1.0E-3,
** ----------------------------------------------------------------
** PART INSTANCE: HEAD-1
**
*Node
185, 1.879997409758, 0.002500398013056, 0.02550054252398
186, 1.879997402627, 3.980130679716e-007, 0.02550053989611
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*Element, type=S4R
179, 185, 186, 235, 551
180, 235, 236, 552, 551
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*Nset, nset=ASSEMBLY_HEAD-1_HEAD-1-REFPT
883
*Elset, elset=ASSEMBLY_HEAD-1_HEAD-1
179, 180, 181, 182, 183, 184
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*shellsection, elset=ASSEMBLY_HEAD-1_HEAD-1, material=STEEL
3.0E-3,
*rigidbody, refnode=ASSEMBLY_ARM-1_ARM-1-REFPT, position=CENTEROFMASS, elset=ASSEMBLY_ARM-1_ARM-1
*rigidbody, refnode=ASSEMBLY_GRIP-1_GRIP-1-REFPT, position=CENTEROFMASS, elset=ASSEMBLY_GRIP-1_GRIP-1
*rigidbody, refnode=ASSEMBLY_SHAFT-1_SHAFT-1-REFPT, position=CENTEROFMASS, elset=ASSEMBLY_SHAFT-1_SHAFT-1
*rigidbody, refnode=ASSEMBLY_HEAD-1_HEAD-1-REFPT, position=CENTEROFMASS, elset=ASSEMBLY_HEAD-1_HEAD-1
**
** Assembly Nsets
**
*Nset, nset=ASSEMBLY_JOINTNODES
2, 6, 187, 114, 115, 884, 893
*material, name=STEEL
*elastic
210.0E9, 0.3
*density
7800.0,
**
********************************************************
**                 Define Orientations                **
********************************************************


********************************************************
**            Define Connectors and Sections          **
********************************************************


********************************************************
**   Define Amplitude Curves for Prescribed Motion    **
********************************************************


*Step, name=Swing, nlgeom, inc=100
Full Swing
*static
0.1, 2.0, , 0.05
********************************************************
**               Define Connector Motions             **
********************************************************


*output, field, frequency=1
*nodeoutput
U,
*output, history, frequency=1
*elementoutput, elset=SHOULDER
CP, CU
*elementoutput, elset=WRIST
CP, CU
*elprint, frequency=0
*nodeprint, frequency=0
*endstep
