** ----------------------------------------------------------------
** PART INSTANCE: CROSSPIN
**
*Element, type=S4R
1, 29, 1, 30, 133
2, 30, 2, 31, 133
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*Elset, elset=ALL_CROSSPIN
1, 2, 3, 4, 5, 6
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*shellsection, elset=ALL_CROSSPIN, material=STEEL
1., 5
** ----------------------------------------------------------------
** PART INSTANCE: VERT-FORK
**
*Element, type=S4R
217, 214, 215, 272, 277
218, 277, 272, 273, 276
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*Elset, elset=VERT_FORK_ALL
217, 218, 219, 220, 221, 222
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*shellsection, elset=VERT_FORK_ALL, material=STEEL
1., 5
** ----------------------------------------------------------------
** PART INSTANCE: INCL-FORK
**
*Element, type=S4R
561, 545, 546, 603, 608
562, 608, 603, 604, 607
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*Elset, elset=INCL_FORK_ALL
561, 562, 563, 564, 565, 566
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*shellsection, elset=INCL_FORK_ALL, material=STEEL
1., 5
***
***  Ref node and base node definitions
***
*Nset, nset=CROSSPIN_CONN
213
*Nset, nset=VERT_FORK_CONN
544
*Nset, nset=INCL_FORK_CONN
875
*NODE, NSET=VERT_FORK_BASE
4500, 0, -0.34, 0.
*NODE, NSET=INCL_FORK_BASE
4501, 0.2404163056034, 0.2404163056034, 0
*NSET, NSET=FORK_BASES
VERT_FORK_BASE, INCL_FORK_BASE
***
***  Definition of Transformed coordinate systems to define BC
***
*transform, nset=INCL_FORK_BASE
-0.707107, 0.707107, 0., 0., 0., 1.
*transform, nset=VERT_FORK_BASE
0., 0., -1., 0., 1., 0.
**
** Dummy material definition
**
*material, name=STEEL
*elastic
200000., 0.3
**
**  Cardan element definitions to measure rotations
**
*ORIENTATION, NAME=MEASAXIS1
0.,0.,-1,0.,1.,0.
1, -90.
*ORIENTATION, NAME=MEASAXIS2
0.,1.,0.,0.,0.,1.
2,45.
**
**
*ELEMENT, TYPE=CONN3D2, ELSET=MEAS1
3000, , 4500
*ELEMENT, TYPE=CONN3D2, ELSET=MEAS2
3001, , 4501
*ELSET, ELSET=MEASURE
MEAS1, MEAS2
**
**
*CONNECTOR SECTION, ELSET=MEAS1
CARDAN
MEASAXIS1, MEASAXIS1
*CONNECTOR SECTION, ELSET=MEAS2
CARDAN
MEASAXIS2, MEASAXIS2
