*heading
disk forging - isothermal - frictionless - rigid surface
note: incomplete input file for use with contact in abaqus/standard
      lecture series. not to be used as an example problem.
********************
*restart, write, freq=5
********************
**
** blank definition
**
*node, nset=blank
      1,           0.,           0.
      2, 0.00400000019,           0.
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*nset, nset=axis, generate
   1,  169,   21
*nset, nset=bottom, generate
  1,  21,   1
*element, type=cax4, elset=blank
  1,   1,   2,  23,  22
  2,   2,   3,  24,  23
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*element, type=cax3, elset=blank
160, 167, 189, 188
161, 189, 167, 168
*elset, elset=blank-top-side, generate
  20,  160,   20
 141,  159,    1
 161,  161,    1
*solid section, elset=blank, material=plastic
*material, name=plastic
*elastic
200.e9, 0.3
*plastic
7.e8,     0.00
2.9989e9, 9.9965
********************
**
** die definition
**
*node
3001, 0.04, 0.06
*nset, nset=die
3001,
********************
**
** enter the *rigid body and *surface options with all appropriate parameters.
**
********************
start,  0.1500,  0.02500
line,   0.1100,  0.02500
line,   0.1100,  0.04525
line,   0.0795,  0.04525
circl,  0.0660,  0.03175  ,  0.066,  0.04525
line,  -0.0100,  0.03175
********************
**
** fill in contact definition here
**
********************
**
** boundary conditions
**
*boundary
die, 1
die, 6
axis, 1
bottom, 2
********************
**
** step definition
**
*step, inc=200, nlgeom
*static
1.e-2, 1.0,  , 0.1
*boundary
die,2, ,-0.02223
*print, contact=yes
*contact file
*contact print
*el print, elset=blank, freq=10
s, mises
e, peeq
*node print, freq=5
u, rf
*node file, freq=2, nset=die
u, rf
*output, field, frequency=10, variable=preselect
*output, history, frequency=1
*node output, nset=die
u,rf
*end step
