*Heading
**
** PARTS
**
*Part, name=plate
*Node, nset=All
      1,           9.,           2.,          1.5
      2,           9.,           2.,           0.
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*Element, type=C3D8I, elset=All
 1,  62, 273, 548, 223,   1,  29, 213,  40
 2, 273,  68, 248, 548,  29,   2,  30, 213
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*Solid Section, elset=All, material=aluminum
*End Part
**
*Part, name=rivet
*Node, nset=All
      1,           0.,         1.25,          2.5
      2,          2.5,         1.25,           0.
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*Element, type=C3D8R, elset=All
 1,   1,  45, 430,  64,   8,  73, 439,  84
 2,  45,  46, 431, 430,  73,  72, 440, 439
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*Solid Section, elset=All, material=titanium
*End Part
**
**
** ASSEMBLY
**
*Assembly, name=Assembly
**
*Instance, name=plate-1, part=plate
*End Instance
**
*Instance, name=plate-2, part=plate
 15.,  0.,  0.
 15.,  0.,  0.,  15.,  1.,  0.,  180.
*End Instance
**
*Instance, name=rivet-1, part=rivet
 7.5,  0.,  1.0
 7.5,  0.,  1.0,  7.5,  0.707106781186548,  1.70710678118655,  180.
*End Instance
**
*Nset, nset=symm, instance=plate-1
   3,   4,   6,   7,  21,  22
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*Nset, nset=symm, instance=plate-2
   3,   4,   6,   7,  21,  22
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*Nset, nset=symm, instance=rivet-1
    2,    3,    5,    6,    9,   10
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*Nset, nset=pull, instance=plate-1
  19,  20,  22,  23, 131, 151
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*Nset, nset=fix, instance=plate-2
  19,  20,  22,  23, 131, 151
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*Nset, nset=corner, instance=plate-2
 22,
**
*Elset, elset=bot-plate-1-S3, instance=plate-1
  73,  74,  75,  76,  77,  78
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*Elset, elset=bot-plate-1-S4, instance=plate-1, generate
  2,  72,   2
*Elset, elset=bot-plate-1-S2, instance=plate-1
 121, 122, 123, 124, 125, 126
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*Elset, elset=bot-plate-1-S6, instance=plate-1, generate
 169,  323,    2
*Surface, type=ELEMENT, name=bot-plate-1
bot-plate-1-S3, S3
bot-plate-1-S4, S4
bot-plate-1-S2, S2
bot-plate-1-S6, S6
**
*Elset, elset=top-plate-2-S3, instance=plate-2
  73,  74,  75,  76,  77,  78
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*Elset, elset=top-plate-2-S4, instance=plate-2, generate
  2,  72,   2
*Elset, elset=top-plate-2-S2, instance=plate-2
 121, 122, 123, 124, 125, 126
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*Elset, elset=top-plate-2-S6, instance=plate-2, generate
 169,  323,    2
*Surface, type=ELEMENT, name=top-plate-2
top-plate-2-S3, S3
top-plate-2-S4, S4
top-plate-2-S2, S2
top-plate-2-S6, S6
**
*Elset, elset=shank-rivet-S4, instance=rivet-1
  653,  654,  655,  656,  657,  658
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*Elset, elset=shank-rivet-S3, instance=rivet-1
  641,  642,  643,  644,  645,  646
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*Elset, elset=shank-rivet-S2, instance=rivet-1
  755,  756,  757,  758,  759,  760
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*Surface, type=ELEMENT, name=shank-rivet
shank-rivet-S4, S4
shank-rivet-S3, S3
shank-rivet-S2, S2
**
*Elset, elset=hole-plate-1-S2, instance=plate-1, generate
  1,  12,   1
*Elset, elset=hole-plate-1-S4, instance=plate-1
 126, 132, 138, 144, 150, 156, 162, 168, 330, 336, 342, 348, 354, 360, 366, 372
*Elset, elset=hole-plate-1-S6, instance=plate-1, generate
  73,  115,    6
*Surface, type=ELEMENT, name=hole-plate-1
hole-plate-1-S2, S2
hole-plate-1-S4, S4
hole-plate-1-S6, S6
**
*Elset, elset=top-rivet-S2, instance=rivet-1
  237,  238,  239,  240,  241,  242
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*Elset, elset=top-rivet-S5, instance=rivet-1, generate
 559,  568,    1
*Surface, type=ELEMENT, name=top-rivet
top-rivet-S2, S2
top-rivet-S5, S5
**
*Elset, elset=top-plate-1-S5, instance=plate-1
  79,  80,  81,  82,  83,  84
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*Elset, elset=top-plate-1-S1, instance=plate-1
 145, 146, 147, 148, 149, 150
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*Elset, elset=top-plate-1-S4, instance=plate-1, generate
 170,  324,    2
*Elset, elset=top-plate-1-S6, instance=plate-1, generate
  1,  71,   2
*Surface, type=ELEMENT, name=top-plate-1
top-plate-1-S5, S5
top-plate-1-S1, S1
top-plate-1-S4, S4
top-plate-1-S6, S6
**
*Elset, elset=hole-plate-2-S2, instance=plate-2, generate
  1,  12,   1
*Elset, elset=hole-plate-2-S4, instance=plate-2
 126, 132, 138, 144, 150, 156, 162, 168, 330, 336, 342, 348, 354, 360, 366, 372
*Elset, elset=hole-plate-2-S6, instance=plate-2, generate
  73,  115,    6
*Surface, type=ELEMENT, name=hole-plate-2
hole-plate-2-S2, S2
hole-plate-2-S4, S4
hole-plate-2-S6, S6
**
*Elset, elset=bot-rivet-S2, instance=rivet-1
  419,  420,  421,  422,  423,  424
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*Surface, type=ELEMENT, name=bot-rivet
bot-rivet-S2, S2
**
*Elset, elset=bot-plate-2-S5, instance=plate-2
  79,  80,  81,  82,  83,  84
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*Elset, elset=bot-plate-2-S1, instance=plate-2
 145, 146, 147, 148, 149, 150
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*Elset, elset=bot-plate-2-S4, instance=plate-2, generate
 170,  324,    2
*Elset, elset=bot-plate-2-S6, instance=plate-2, generate
  1,  71,   2
*Surface, type=ELEMENT, name=bot-plate-2
bot-plate-2-S5, S5
bot-plate-2-S1, S1
bot-plate-2-S4, S4
bot-plate-2-S6, S6
**
*End Assembly
**
** MATERIALS
**
*Material, name=aluminum
*Density
 0.0028,
*Elastic
71700., 0.33
*Plastic
   350.,    0.
 368.71, 0.001
  376.5, 0.002
 391.98, 0.005
 403.15, 0.008
 412.36, 0.011
 422.87, 0.015
 444.17, 0.025
  461.5, 0.035
  507.9,  0.07
  581.5,  0.15
 649.17,  0.25
 704.22,  0.35
 728.78,   0.4
 751.85,  0.45
 773.68,   0.5
 794.44,  0.55
 814.28,   0.6
*Material, name=titanium
*Density
 0.0044,
*Elastic
112000., 0.34
*Plastic
   907.,    0.
 934.86, 0.001
 944.28, 0.002
 961.77, 0.005
 973.73, 0.008
 983.28, 0.011
 993.89, 0.015
 1014.7, 0.025
 1023.3,  0.03
 1051.1,  0.05
 1099.8,   0.1
  1129.,  0.14
 1164.9,   0.2
 1190.2,  0.25
 1212.8,   0.3
**
** INTERACTION PROPERTIES
**
** INTERACTIONS
**
** ----------------------------------------------------------------
**
** STEP: Step-1
**
** BOUNDARY CONDITIONS
**
** OUTPUT REQUESTS
**
*End Step
