*Heading
Analysis of pipe-reeling
Finite-sliding, node-to-surface contact formulation is used.
**
** PARTS
**
*Part, name=pipe
*Node, nset=pipe
      1,        -100.,           0.,           0.
      2,         -95.,           0.,           0.
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*Element, type=B31, elset=pipe
 1,  1,  2
 2,  2,  3
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*Beam Section, elset=pipe, material=Steel, temperature=GRADIENTS, section=PIPE
0.15, 0.01
0.,0.,-1.
*End Part
**
*Part, name=reel
*End Part
**
*Part, name=wheel
*Node
      1,   3.03695464,   7.15834141,           4.
      2,   3.85075593,   9.38931847,           4.
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*Element, type=S3
   1,    2,    1,    4
   2,    4,    1,    3
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*Nset, nset=refPt
 1,
*End Part
**
**
** ASSEMBLY
**
*Assembly, name=Assembly
**
*Instance, name=reel-1, part=reel
 0., 0., 0.
 0., 0., 0., 0.577350269189626, 0.577350269189626, 0.577350269189626, 120.
*Node
 1,           0.,           0.,           0.
*Surface, type=REVOLUTION, name=reel
START,          14.,           3.
 LINE,         12.5,           3.
 LINE,         12.5,          -3.
 LINE,          14.,          -3.
*Rigid Body, ref node=1, analytical surface=reel
*End Instance
**
*Instance, name=pipe-1, part=pipe
 -100., 12.5, 0.
*End Instance
**
*Instance, name=wheel-1, part=wheel
 0., 0., -3.
*End Instance
**
*Display Body, instance=wheel-1
reel-1.1,
*Nset, nset=freeEnd, instance=pipe-1
 1,
*Nset, nset=reelEnd, instance=pipe-1
 41,
*Nset, nset=pipe, instance=pipe-1, generate
 1, 40, 1
*Elset, elset=pipe, instance=pipe-1, generate
 1, 40, 1
*Nset, nset=refPt, instance=reel-1
 1,
**
*Element, type=CONN3D2, elset=Conn
 1, reel-1.1, pipe-1.41
*Connector Section, elset=Conn
 Beam,
**
*Surface, type=NODE, name=pipe
 pipe, 1.
**
*End Assembly
**
** MATERIALS
**
*Material, name=Steel
*Elastic
 2.09e+11, 0.3
*Plastic
  3.5e+08,          0.
 3.65e+08, 6.56189e-05
  3.8e+08, 0.000137266
 3.95e+08, 0.000279054
  4.1e+08, 0.000552493
 4.25e+08,  0.00106735
  4.4e+08,  0.00201541
 4.48e+08,  0.00280395
  4.5e+08,  0.00304244
 4.55e+08,  0.00372535
  4.6e+08,  0.00455145
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    6e+08,     0.59272
**
** INTERACTION PROPERTIES
**
** INTERACTIONS
**
** ----------------------------------------------------------------
**
** STEP: tension
**
** BOUNDARY CONDITIONS
**
** LOADS
**
** OUTPUT REQUESTS
**
*End Step
** ----------------------------------------------------------------
**
** STEP: reel
**
** BOUNDARY CONDITIONS
**
*End Step
** ----------------------------------------------------------------
**
** STEP: unreel
**
** BOUNDARY CONDITIONS
**
*End Step
