*Heading
*Preprint, echo=NO, model=NO, history=NO, contact=NO
**
*Part, name=bot
*End Part
**
*Part, name=cover
*Node, nset=cover
      1,           0.,         6.25
      2,           0.,           6.
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*Element, elset=cover, type=CPE4
 1,   1,   7, 116,  62
 2,   7,   2,   8, 116
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*Nset, nset=center
 1, 2, 7
*Elset, elset=cover_S2, generate
   2,  110,    2
*Elset, elset=cover_S3
  55,  56, 109, 110
*Elset, elset=cover_S4, generate
   1,  109,    2
*Solid Section, elset=cover, material=Poly
1.,
*End Part
**
*Part, name=seal
*Node
      1,          -5.,          -3.
      2,          -5.,          -4.
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*Element, elset=seal, type=CPE4H
  1,   1,  19, 361,  72
  2,  19,  20, 362, 361
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*Element, elset=seal, type=CPE3H
101,  81, 442,  80
102, 450, 443, 441
*Nset, nset=center
   3,   4,  15,  16,  46,  47,  48, 169, 170, 171
*Elset, elset=sealInner_S4
   1,   5,   9,  13,  17,  21
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*Elset, elset=sealInner_S2
 232, 236, 240, 244, 248, 252
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*Elset, elset=sealOuter_S2
   4,   8,  12,  16,  20,  24
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*Elset, elset=sealOuter_S3
 101, 106, 107, 109, 114, 118, 119, 271, 277
*Elset, elset=sealOuter_S4
 113, 229, 233, 237, 241, 245
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*Solid Section, elset=seal, material=Santoprene
1.,
*End Part
**
*Part, name=top
*End Part
**
**
*Assembly, name=Assembly
**
*Instance, name=seal-1, part=seal
*End Instance
**
*Instance, name=cover-1, part=cover
 0., -1.0, 0.
*End Instance
**
*Instance, name=top-1, part=top
   0., 5.25, 0.
*Node, nset=RefPt
      1,          0.,           0.,           0.
*Surface, type=SEGMENTS, name=Top
START,          10.,           0.
 LINE,         -10.,           0.
*Rigid Body, ref node=RefPt, analytical surface=Top
*End Instance
**
*Instance, name=bot-1, part=bot
   0., -4., 0.
*Node, nset=RefPt
      1,          0.,           0.,           0.
*Surface, type=SEGMENTS, name=Bottom
START,        -10.0,           0.
 LINE,         10.0,           0.
*Rigid Body, ref node=RefPt, analytical surface=Bottom
*End Instance
**
*Nset, nset=fix1
cover-1.center, seal-1.center
**
*Surface, type=ELEMENT, name=cover
 cover-1.cover_S2, S2
 cover-1.cover_S3, S3
 cover-1.cover_S4, S4
*Surface, type=ELEMENT, name=sealInner
 seal-1.sealInner_S4, S4
 seal-1.sealInner_S2, S2
*Surface, type=ELEMENT, name=sealOuter
 seal-1.sealOuter_S2, S2
 seal-1.sealOuter_S3, S3
 seal-1.sealOuter_S4, S4
**
*Nset, nset=botRP, instance=bot-1
 1,
*Nset, nset=topRP, instance=top-1
 1,
*End Assembly
**
*Material, name=Poly
*Elastic
240000., 0.4
*Material, name=Santoprene
*Hyperelastic, mooney-rivlin
120.,30., 0.
**
*Surface Interaction, name=frictionless
1.,
*Friction
0.,
*Surface Behavior, penalty
**
*Boundary
botRP, 1, 6
topRP, 1, 6
fix1,  1, 1
**
**----------------------------------------------
** Add contact definition
**
**
******************
** History data
******************
**----------------------------------------------
** Add step definition
**
**
**----------------------------------------------
** Add boundary condition definition
**
**
*Output, field, variable=PRESELECT
**
**----------------------------------------------
** Add an element output request of NE
**
**
*Output, history, variable=PRESELECT
**
**----------------------------------------------
** Add an history output request of RF2 and U2
**
*End Step
