*Heading
**
*Part, name=barrel
*Node, nset=barrel
      1,           0.,  -2.65517235,   82.0892715
      2,    1.8774904,   -1.8774904,   82.0892715
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*Element, type=C3D8R, elset=barrel
 1,   8,  48, 285,  55,   1,  33, 277,  44
 2,  48,  47, 286, 285,  33,  34, 278, 277
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*Solid Section, elset=barrel, controls=EC-1, material=plastic
*End Part
**
*Part, name=plunger
*Node, nset=plunger
      1,  0.720000029,  -7.16390944,   74.2663116
      2,  0.720000029,  -2.26638126,   74.2663116
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*Element, type=C3D8R, elset=plunger
1, 10,  7,  8,  9,  1, 33, 34,  4
2,  7, 35, 36,  8, 33,  2,  3, 34
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*Element, type=C3D6, elset=plunger
82,   2, 182,   5, 184, 183, 185
83, 182,  22,   5, 183,  23, 185
88, 184, 183, 185, 273, 272, 191
89, 183,  23, 185, 272, 192, 191
94,   2,   5, 182,  35,  11, 275
95, 182,   5,  22, 275,  11, 195
*Solid Section, elset=plunger, controls=EC-1, material=plastic
*End Part
**
*Part, name=stopper
*Node, nset=stopper
      1,   4.98510265,  -4.98510265,   77.7663116
      2,   5.16187954,  -5.16187954,   77.7663116
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*Element, type=C3D8RH, elset=stopper
   1,   92,   88,   26,   25,  422,  418,  360,  359
   2,   92,   95,   89,   88,  422,  425,  419,  418
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*Element, type=C3D6H, elset=stopper
2593,    6,   65,  395,   64,  109,  439
2594,   64,  109,  439,   63,  110,  440
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*Solid Section, elset=stopper, material=rubber
*End Part
**
**
** ASSEMBLY
**
*Assembly, name=Assembly
**
*Instance, name=barrel-1, part=barrel
*End Instance
**
*Instance, name=plunger-1, part=plunger
*End Instance
**
*Instance, name=stopper-1, part=stopper
*End Instance
**
*Nset, nset=symm, instance=barrel-1
   1,   2,   3,   4,   5,   6
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*Nset, nset=symm, instance=plunger-1
   3,   4,   5,   8,   9,  11
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*Nset, nset=symm, instance=stopper-1
    1,    2,    3,    4,    7,    8
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*Nset, nset=axis, instance=plunger-1
   6,  12,  16,  19,  25,  29
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*Nset, nset=axis, instance=stopper-1
  5,  6, 61, 62, 63, 64
*Nset, nset=top-barrel, instance=barrel-1
  23,  25,  27,  28,  31,  32
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*Nset, nset=top-plunger, instance=plunger-1
  20,  21, 173, 174, 175, 176
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*Nset, nset=center, instance=plunger-1
 19,
*Nset, nset=cylindrical
symm,
top-barrel,
top-plunger,
*Transform, nset=cylindrical, type=C
0., 0., -9.82969058766174, 0., 0., -8.82969058766174
**
*Equation
2
top-plunger, 3,  1.
center,      3, -1.
*End Assembly
**
*Section Controls, name=EC-1, hourglass=ENHANCED
**
*Material, name=plastic
*Elastic
1500., 0.35
**
*Material, name=rubber
*Hyperelastic, mooney-rivlin
 0.56,   0.14, 0.0143
**
** Define surface interaction properties
**
** Define contact initialization
**
** Define contact
**
*Step, name=Step-1, nlgeom=YES, unsymm=YES
*Static
0.1, 1., 1e-05, 1.
*Boundary
axis, 1, 2
symm, 2, 2
top-barrel, 3, 3
center, 3, 3
*End Step
**
*Step, name=Step-2, nlgeom=YES
*Static
1., 1.
** Change friction properties
**
*End Step
**
*Step, name=Step-3, nlgeom=YES
*Static
0.1, 1.
** pull plunger out
**
*End Step
**
*Step, name=Step-4, nlgeom=YES
*Static
0.1, 1.
** push plunger back in
**
*End Step
