*Heading
*Preprint, echo=NO, model=NO, history=NO, contact=NO
**
** PARTS
**
*Part, name=inner
*Node, nset=inner
      1,  -6.09921885,   7.92461538
      2,    -7.349473,   9.54922771
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*Element, type=CPE4, elset=inner
  1,   1,  13, 291,  52
  2,  13,  14, 292, 291
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*Solid Section, elset=inner, material=Material-1
1.,
*End Part
**
*Part, name=outer
*Node, nset=outer
      1,           0.,          14.
      2,           0.,          12.
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*Element, type=CPE4, elset=outer
  1,   1,   9, 225,  64
  2,   9,  10, 226, 225
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*Solid Section, elset=outer, material=Material-1
1.,
*End Part
**
**
** ASSEMBLY
**
*Assembly, name=Assembly
**
*Instance, name=inner-1, part=inner
*End Instance
**
*Instance, name=outer-1, part=outer
*End Instance
**
*Node
      1,           0.,           0.,           0.
*Nset, nset=fix-y, instance=outer-1
 4, 5
*Nset, nset=fix-x, instance=outer-1
 1,
*Nset, nset=refPt
 1,
*Elset, elset=_rot_inner_S4, internal, instance=inner-1
   1,   5,   9,  13,  17,  21
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*Elset, elset=_rot_inner_S2, internal, instance=inner-1, generate
 212,  400,    4
*Surface, type=ELEMENT, name=rot_inner
_rot_inner_S4, S4
_rot_inner_S2, S2
*Elset, elset=_cp-outer_S2, internal, instance=outer-1, generate
   3,  162,    3
*Elset, elset=_cp-outer_S4, internal, instance=outer-1, generate
 163,  322,    3
*Surface, type=ELEMENT, name=cp-outer
_cp-outer_S2, S2
_cp-outer_S4, S4
*Elset, elset=_cp-inner_S2, internal, instance=inner-1
   4,   8,  12,  16,  20,  24
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*Elset, elset=_cp-inner_S4, internal, instance=inner-1, generate
 209,  397,    4
*Surface, type=ELEMENT, name=cp-inner
_cp-inner_S2, S2
_cp-inner_S4, S4
** Constraint: Constraint-1
*Coupling, constraint name=Constraint-1, ref node=refPt, surface=rot_inner
*Distributing, weighting method=UNIFORM
*End Assembly
**
** MATERIALS
**
*Material, name=Material-1
*Elastic
 1e+06, 0.3
**
** INTERACTION PROPERTIES
**
**
** BOUNDARY CONDITIONS
**
**
** INTERACTIONS
**
** ----------------------------------------------------------------
**
** STEP: Step-1
**
** ----------------------------------------------------------------
**
** STEP: Step-2
**
