*Heading
**
*Part, name=bore
*Node, nset=refPt
      1,   25.575,   1.70710683,           0.
*Surface, type=SEGMENTS, name=bore
START,       26.075, 0.5
 LINE, 25.2214466094067, 1.35355339059328
 CIRCL,       25.075, 1.70710678118655,       25.575, 1.70710678118655
 LINE,       25.075,          14.
 LINE,       18.575,          14.
*Rigid Body, ref node=refPt, analytical surface=bore
*End Part
**
*Part, name=seal
*Node
      1,       23.625,   4.41191435
      2,       24.375,   4.41191387
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*Element, type=CAX4R
  1,   1,  29, 559,  68
  2,  29,  30, 560, 559
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*Element, type=CAX3H
633, 3386, 3318, 3308
634, 2950, 2983, 3234
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*Element, type=CAX4H
 725, 1401, 1761, 1758, 3227
 726, 3191, 3257, 3636, 3347
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*Elset, elset=rubber, generate
  633,  3617,     1
*Elset, elset=steel, generate
   1,  632,    1
*Solid Section, elset=steel, material=steel
*Solid Section, elset=rubber, material=rubber
**
*Elset, elset=_seal_S2, internal
  733,  734,  735,  754,  788,  789
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*Elset, elset=_seal_S4, internal
  753,  759,  800,  801,  846,  858
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*Elset, elset=_seal_S3, internal
  916,  917,  918,  919,  927,  936
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*Elset, elset=_seal_S1, internal
  911,  912,  913,  914,  915,  921
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*Surface, type=ELEMENT, name=seal
_seal_S2, S2
_seal_S4, S4
_seal_S3, S3
_seal_S1, S1
*End Part
**
*Part, name=shaft
*Node, nset=refPt
      1,       17.375,   12.5857868,           0.
*Surface, type=SEGMENTS, name=shaft
START,       16.375,          15.
 LINE, 18.0821067811865, 13.2928932188135
 CIRCL,       18.375, 12.5857864376269,       17.375, 12.5857864376269
 LINE,       18.375,          0.5
*Rigid Body, ref node=refPt, analytical surface=shaft
*End Part
**
*Part, name=spring
*Node
      1,     20.39254,   8.54281807
      2,   20.3062019,   8.45242596
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*Node, nset=refPt
     89,   19.875,       8.
*Element, type=CAX4R, elset=all
 1,  1,  2, 13, 22
 2, 22, 13, 14, 21
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*Solid Section, elset=all, material=steel
**
*Elset, elset=_spring_S4, internal
  1,  2,  3,  4,  5,  6
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*Elset, elset=_spring_S2, internal, generate
 12,  28,   1
*Surface, type=ELEMENT, name=spring
_spring_S4, S4
_spring_S2, S2
*Rigid Body, ref node=refPt, elset=all
**
*Element, type=Spring1, elset=radial-spring
45, 89
*Spring, elset=radial-spring
1
13.2345
*End Part
**
*Part, name=tool
*Node, nset=refPt
      1,        21.75,         13.5,           0.
*Surface, type=SEGMENTS, name=tool
START,       20.625,         9.25
 LINE,       20.625,         13.5
 CIRCL,       21.125,          14.,       21.125,         13.5
 LINE,       22.375,          14.
 CIRCL,       22.875,         13.5,       22.375,         13.5
 LINE,       22.875,         9.75
 CIRCL,       23.375,         9.25,       23.375,         9.75
 LINE,       25.625,         9.25
*Rigid Body, ref node=refPt, analytical surface=tool
*End Part
**
*Assembly, name=Assembly
**
*Instance, name=bore-1, part=bore
          0.,     5.058361,           0.
*End Instance
**
*Instance, name=seal-1, part=seal
*End Instance
**
*Instance, name=shaft-1, part=shaft
          0.,    -1.088086,           0.
*End Instance
**
*Instance, name=spring-1, part=spring
          0.,    -6.338086,           0.
*End Instance
**
*Instance, name=tool-1, part=tool
          0.,    -9.838086,           0.
*End Instance
**
*Nset, nset=boreRefPt,instance=bore-1
 1,
*Nset, nset=fix-springback, instance=seal-1
 5,
*Nset, nset=shaftRefPt,instance=shaft-1
 1,
*Nset, nset=springRefPt, instance=spring-1
 89,
*Nset, nset=toolRefPt,instance=tool-1
 1,
*End Assembly
**
** MATERIALS
**
*Material, name=rubber
*Hyperelastic, ogden, test data input
*Biaxial Test Data
       0.,       0.
 0.049647, 0.002247
 0.107969,  0.00528
 0.167149, 0.008538
 0.228591, 0.011909
  0.28897,  0.01528
 0.347017, 0.018762
  0.40383, 0.022246
 0.461398, 0.025953
  0.51492, 0.029885
  0.56899, 0.033593
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  13.9265,       1.
*Planar Test Data
       0.,       0.
 0.072765, 0.004042
 0.129187, 0.008719
 0.195459, 0.012682
 0.249578, 0.016962
 0.297236, 0.021717
  0.35097, 0.025522
 0.398628, 0.030119
 0.447564, 0.034399
 0.492727, 0.038204
 0.538115, 0.042643
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    11.14,       1.
*Uniaxial Test Data
       0.,       0.
 0.077593, 0.004784
 0.140347, 0.011188
 0.196163, 0.017033
  0.24673, 0.022298
 0.295183, 0.026814
 0.340009, 0.031413
 0.382455, 0.036677
 0.423915, 0.041669
 0.463503,  0.04798
 0.501165, 0.054141
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  8.35593,       1.
*Material, name=steel
*Elastic
205000., 0.3
**
