*HEADING
Tube1 - 2D plane strain - cpe8r, linear analysis
*NODE, SYSTEM=R
          1, 5.5020690E-02, 2.7075212E-02, 0.0000000E+00
          2, 5.5020690E-02, 3.1075213E-02, 0.0000000E+00
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*ELEMENT, TYPE=CPE8R, ELSET=TUBE
  10042,    166,     82,     81,    165,   7263,   5299,   5312,   7262
  10044,    167,     83,     82,    166,   7265,   5300,   7263,   7264
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*NSET,NSET=GR000005
    81,    82,    83,    84,   165,   166
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*NSET,NSET=XSYMM
  3927,  4327,  4348,  4369,  4390,  4411,  5279,  5280,  5281,  5282,  5283
*NSET,NSET=YSYMM
   921,   922,   923,   924,  1869,  1995
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*ELSET,ELSET=GR000002
 10042, 10044, 10046, 10088, 10090, 10092
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*ELSET,ELSET=PRESS3
 10042, 10088, 10134, 10180, 10226, 10272, 10318, 10364, 10410, 10514
*ELSET,ELSET=PRESS2
 10522, 10544, 10566, 10588, 10610, 10632
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*ELSET,ELSET=GR000005
 10042, 10044, 10046, 10088, 10090, 10092
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*SOLID SECTION,ELSET=TUBE,MATERIAL=AL3102
*MATERIAL,NAME=AL3102
*DENSITY
 2.531E-04,
*ELASTIC,TYPE=ISOTROPIC
 10.0E+06, 0.33
******************************************************************
*STEP
*static
*RESTART, WRITE, FREQ=5
*BOUNDARY
XSYMM, XSYMM
YSYMM, YSYMM
*DLOAD
PRESS3, P3, 2000.
PRESS2, P2, 2000.
*NSET, NSET=NHIST
3919,
*FILE FORMAT, ZERO INCREMENT
*OUTPUT,FIELD,FREQ=1
*NODE OUTPUT,NSET=NHIST
U,
*ELSET, ELSET=EHIST
10522,
*OUTPUT,FIELD,FREQ=1
*ELEMENT OUTPUT,ELSET=EHIST
LOADS,
*NODE PRINT, NSET=NHIST, FREQ=1
U,
*EL PRINT, ELSET=EHIST, FREQ=1
LOADS,
*MONITOR, NODE=3919, DOF=2
*END STEP
