*Heading
Simulation of the snap file of a clip
**
** PARTS
**
*Part, name=Clip
*Node, nset=All
      1,          -4.,        -0.25,          -2.
      2,          -4.,        -0.25,           2.
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*Element, type=C3D8R, elset=All
  1,    1,   49,  645,   68,   94,  717, 2823,  687
  2,   49,   50,  646,  645,  717,  718, 2824, 2823
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*Solid Section, elset=All, controls=EC-1, material=Duracon
*End Part
**
*Part, name=Holder
*Node, nset=All
      1,          -2.,           0.,        -4.25
      2,          -2.,          -2.,        -4.25
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*Element, type=C3D8R, elset=All
 1, 251, 252, 984, 976,  25,  26, 234, 233
 2, 252, 253, 985, 984,  26,  27, 235, 234
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*Solid Section, elset=All, controls=EC-1, material=Duracon
*End Part
**
**
** ASSEMBLY
**
*Assembly, name=Assembly
**
*Instance, name=Clip-1, part=Clip
*End Instance
**
*Instance, name=Holder-1, part=Holder
*End Instance
**
*Nset, nset=Fix, instance=Holder-1
   9,  10,  12,  13,  17,  18
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*Nset, nset=Push, instance=Clip-1
   18,   19,   20,   21,   22,   23
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*Elset, elset=Clip-S2, instance=Clip-1, generate
 3297,  3344,     1
*Elset, elset=Clip-S5, instance=Clip-1
  25,  26,  27,  28,  29,  30
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*Surface, type=ELEMENT, name=Clip
Clip-S2, S2
Clip-S5, S5
*Elset, elset=Holder-S6, instance=Holder-1, generate
  169,  1125,     4
*Elset, elset=Holder-S2, instance=Holder-1, generate
 197,  236,    1
*Surface, type=ELEMENT, name=Holder
Holder-S6, S6
Holder-S2, S2
*Nset, nset=leadingEdge, instance=Holder-1
   3,  15, 123, 124, 125, 126, 127, 128, 129, 130, 131
*Surface, type=NODE, name=leadingEdge
leadingEdge, 1.
*End Assembly
**
*Section Controls, name=EC-1, hourglass=ENHANCED
**
** MATERIALS
**
*Material, name=Duracon
*Elastic
1567., 0.45
**
** INTERACTION PROPERTIES
**
** INTERACTIONS
**
** ----------------------------------------------------------------
**
** STEP: Step-1
**
** BOUNDARY CONDITIONS
**
** OUTPUT REQUESTS
**
*End Step
