**
** ///////////////////////  M O D E L     S E C T I O N  ///////////////////////
**
**
*HEADING
Side curtain airbag deployment test
**
** --------------------  N O D A L    P O I N T    D A T A  --------------------
**
*Node, NSET=NSET1
         1,   4.866140e+02,  -5.216643e+02,   9.435117e+02
         2,   4.862254e+02,  -5.279949e+02,   9.472341e+02
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**
** --------  T R A N S F O R M E D    N O D A L    P O I N T    D A T A  -------
**
** Transformation: Transformation Platte
**
*Node, Nset=Transform_Block_1
  50000001,   1.811000e+03,  -5.880001e+02,   1.562000e+03
  50000002,   1.761000e+03,  -5.880001e+02,   1.562000e+03
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**
** -------  G E N E R A T E D    N O D A L     P O I N T    D A T A  -----------
**
*Node, NSET=NSET2
 100000000,   0.000000e+00,   0.000000e+00,   0.000000e+00
 100000001,   2.030069e+03,  -5.150977e+02,   1.253397e+03
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**
** ------------------------  E L E M E N T     D A T A  ------------------------
**
*Element, Type=SFM3D3, Elset=P20;Durchstromoeffnung_1
   11007,     2448,     6391,    10334
   11009,    10335,     6392,     2449
**
*Element, Type=SFM3D4R, Elset=P20;Durchstromoeffnung_1
   11008,    10334,     6391,     6392,    10335
**
*Surface section, Elset=P20;Durchstromoeffnung_1, Density=  2.349000e-10
**
*Element, Type=SFM3D3, Elset=P21;Durchstromoeffnung_2
   11010,     1880,     6651,     2708
   11012,     2709,     6652,     1881
**
*Element, Type=SFM3D4R, Elset=P21;Durchstromoeffnung_2
   11011,     2708,     6651,     6652,     2709
**
*Surface section, Elset=P21;Durchstromoeffnung_2, Density=  2.349000e-10
**
*Element, Type=SFM3D3, Elset=P22;Wall_22
   11013,     2442,     6382,    10325
   11027,     9827,     5884,     2376
**
*Element, Type=SFM3D4R, Elset=P22;Wall_22
   11014,    10325,     6382,     6362,    10305
   11015,    10305,     6362,     6331,    10274
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**
*Surface section, Elset=P22;Wall_22, Density=  2.349000e-10
**
*Element, Type=SFM3D3, Elset=P23;Wall_23
   11028,     2369,     5785,     9728
   11045,     5220,     2288,     9163
**
*Element, Type=SFM3D4R, Elset=P23;Wall_23
   11030,     5785,     5761,     9704,     9728
   11031,     5761,     5734,     9677,     9704
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**
*Surface section, Elset=P23;Wall_23, Density=  2.349000e-10
**
*Element, Type=SFM3D3, Elset=P24;Wall_24
   11046,     2434,     6373,    10316
   11062,     5788,     2352,     9731
**
*Element, Type=SFM3D4R, Elset=P24;Wall_24
   11047,     6373,     6342,    10285,    10316
   11048,     6342,     6305,    10248,    10285
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**
*Surface section, Elset=P24;Wall_24, Density=  2.349000e-10
**
*Element, Type=SFM3D3, Elset=P25;Wall_25
   11063,     2336,     5714,     9657
   11078,     5173,     2264,     9116
**
*Element, Type=SFM3D4R, Elset=P25;Wall_25
   11064,     5714,     5675,     9618,     9657
   11065,     5675,     5635,     9578,     9618
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**
*Surface section, Elset=P25;Wall_25, Density=  2.349000e-10
**
*Element, Type=SFM3D3, Elset=P26;Wall_26
   11079,     2284,     9128,     5185
   11084,     5189,     9132,     2285
**
*Element, Type=SFM3D4R, Elset=P26;Wall_26
   11080,     5185,     9128,     9129,     5186
   11081,     5186,     9129,     9130,     5187
   11082,     5187,     9130,     9131,     5188
   11083,     5188,     9131,     9132,     5189
**
*Surface section, Elset=P26;Wall_26, Density=  2.349000e-10
**
*Element, Type=SFM3D3, Elset=P27;Wall_27
   11085,     2303,     9225,     5282
   11087,     9226,     2304,     5283
**
*Element, Type=SFM3D4R, Elset=P27;Wall_27
   11086,     9225,     9226,     5283,     5282
**
*Surface section, Elset=P27;Wall_27, Density=  2.349000e-10
**
*Element, Type=SFM3D3, Elset=P28;Wall_28
   11088,     2132,     8565,     4622
   11100,     8576,     2133,     4633
**
*Element, Type=SFM3D4R, Elset=P28;Wall_28
   11089,     8565,     8566,     4623,     4622
   11090,     8566,     8567,     4624,     4623
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**
*Surface section, Elset=P28;Wall_28, Density=  2.349000e-10
**
*Element, Type=SFM3D3, Elset=P29;Wall_29
   11101,     2206,     4999,     8942
   11109,     8685,     4742,     2161
**
*Element, Type=SFM3D4R, Elset=P29;Wall_29
   11102,     8942,     4999,     4974,     8917
   11103,     8917,     4974,     4943,     8886
   11104,     8886,     4943,     4905,     8848
   11105,     8848,     4905,     4865,     8808
   11106,     8808,     4865,     4824,     8767
   11107,     8767,     4824,     4783,     8726
   11108,     8726,     4783,     4742,     8685
**
*Surface section, Elset=P29;Wall_29, Density=  2.349000e-10
**
*Element, Type=SFM3D3, Elset=P30;Wall_30
   11110,     2195,     4957,     8900
   11117,     8658,     4715,     2157
**
*Element, Type=SFM3D4R, Elset=P30;Wall_30
   11111,     8900,     4957,     4919,     8862
   11112,     8862,     4919,     4879,     8822
   11113,     8822,     4879,     4838,     8781
   11114,     8781,     4838,     4797,     8740
   11115,     8740,     4797,     4756,     8699
   11116,     8699,     4756,     4715,     8658
**
*Surface section, Elset=P30;Wall_30, Density=  2.349000e-10
**
*Element, Type=SFM3D3, Elset=P31;Wall_31
   11118,     2069,     8115,     4172
   11121,     4174,     8117,     2070
**
*Element, Type=SFM3D4R, Elset=P31;Wall_31
   11119,     4172,     8115,     8116,     4173
   11120,     4173,     8116,     8117,     4174
**
*Surface section, Elset=P31;Wall_31, Density=  2.349000e-10
**
*Element, Type=SFM3D3, Elset=P32;Wall_32
   11122,     2070,     8118,     4175
   11135,     4070,     8013,     2059
**
*Element, Type=SFM3D4R, Elset=P32;Wall_32
   11123,     4175,     8118,     8078,     4135
   11124,     4135,     8078,     8079,     4136
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**
*Surface section, Elset=P32;Wall_32, Density=  2.349000e-10
**
*Element, Type=SFM3D3, Elset=P33;Wall_33
   11136,     2120,     4541,     8484
   11148,     8089,     4146,     2063
**
*Element, Type=SFM3D4R, Elset=P33;Wall_33
   11137,     8484,     4541,     4519,     8462
   11138,     8462,     4519,     4490,     8433
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**
*Surface section, Elset=P33;Wall_33, Density=  2.349000e-10
**
*Element, Type=SFM3D3, Elset=P34;Wall_34
   11149,     2112,     4503,     8446
   11165,     7881,     3938,     2028
**
*Element, Type=SFM3D4R, Elset=P34;Wall_34
   11150,     8446,     4503,     4468,     8411
   11151,     8411,     4468,     4429,     8372
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**
*Surface section, Elset=P34;Wall_34, Density=  2.349000e-10
**
*Element, Type=SFM3D3, Elset=P35;Wall_35
   11166,     1943,     6812,     2869
   11177,     6821,     1944,     2878
**
*Element, Type=SFM3D4R, Elset=P35;Wall_35
   11168,     6812,     6813,     2870,     2869
   11169,     6813,     6814,     2871,     2870
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**
*Surface section, Elset=P35;Wall_35, Density=  2.349000e-10
**
*Element, Type=SFM3D3, Elset=P36;Wall_36
   11178,     2050,     7909,     3966
   11205,     6892,     1954,     2949
**
*Element, Type=SFM3D4R, Elset=P36;Wall_36
   11179,     7909,     7876,     3933,     3966
   11180,     7876,     7847,     3904,     3933
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**
*Surface section, Elset=P36;Wall_36, Density=  2.349000e-10
**
*Element, Type=SFM3D3, Elset=P37;Wall_37
   11206,     2013,     3858,     7801
   11232,     6799,     2856,     1928
**
*Element, Type=SFM3D4R, Elset=P37;Wall_37
   11207,     7801,     3858,     3820,     7763
   11208,     7763,     3820,     3780,     7723
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**
*Surface section, Elset=P37;Wall_37, Density=  2.349000e-10
**
*Element, Type=SFM3D3, Elset=P38;Wall_38
   11233,     1919,     6754,     2811
   11244,     6441,     1851,     2498
**
*Element, Type=SFM3D4R, Elset=P38;Wall_38
   11234,     6754,     6729,     2786,     2811
   11235,     6729,     6696,     2753,     2786
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**
*Surface section, Elset=P38;Wall_38, Density=  2.349000e-10
**
*Element, Type=SFM3D3, Elset=P39;Wall_39
   11245,     1906,     6740,     2797
   11257,     6412,     1833,     2469
**
*Element, Type=SFM3D4R, Elset=P39;Wall_39
   11246,     6740,     6707,     2764,     2797
   11247,     6707,     6673,     2730,     2764
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**
*Surface section, Elset=P39;Wall_39, Density=  2.349000e-10
**
*Element, Type=SFM3D3, Elset=P40;Wall_40
   11258,     2403,    10226,     6283
   11279,     9788,     2369,     5845
**
*Element, Type=SFM3D4R, Elset=P40;Wall_40
   11259,    10226,    10227,     6284,     6283
   11260,    10227,    10186,     6243,     6284
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**
*Surface section, Elset=P40;Wall_40, Density=  2.349000e-10
**
*Element, Type=SFM3D3, Elset=P201;Lanze
   36541,    17012,    17015,    17011
   36542,    17012,    17004,    17003
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**
*Element, Type=SFM3D4R, Elset=P201;Lanze
   36480,    17116,    17117,    17127,    17126
   36481,    17117,    17118,    17128,    17127
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**
*Surface section, Elset=P201;Lanze, Density=  4.698000e-09
**
**
*Element, Type=SFM3D4R, Elset=P50000001;Platte
50000001, 50000115, 50000116, 50000135, 50000134
50000002, 50000116, 50000117, 50000136, 50000135
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**
*Surface section, Elset=P50000001;Platte, Density=  2.340000e-10
**
*Element, Type=SFM3D4R, Elset=P80000000;Rahmen
80000001, 80000044, 80000043, 80000083, 80000045
80000002, 80000043, 80000042, 80000041, 80000083
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**
*Surface section, Elset=P80000000;Rahmen, Density=  1.080000e-09
**
*Element, Type=SFM3D4R, Elset=P80000005;Halterungen
80003377, 80003360, 80003409, 80003412, 80000794
80003378, 80000794, 80003412, 80003408, 80001279
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**
*Surface section, Elset=P80000005;Halterungen, Density=  1.080000e-09
**
*Element, Type=SFM3D3, Elset=P80000010;U-Halter
80003454, 80003438, 80003457, 80003460
80003481, 80003468, 80003691, 80003467
80003628, 80003452, 80003447, 80003586
80003629, 80003586, 80003577, 80003452
80003631, 80003471, 80003554, 80003454
80003642, 80003441, 80003439, 80003690
80003648, 80003512, 80003533, 80003691
**
*Element, Type=SFM3D4R, Elset=P80000010;U-Halter
80003449, 80003477, 80003478, 80003479, 80003468
80003450, 80003440, 80003441, 80003472, 80003654
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**
*Surface section, Elset=P80000010;U-Halter, Density=  2.340000e-10
**
*Element, Type=M3D3, Elset=P1;Chamber_1
     202,     2286,     5218,     2297
     206,     2301,     5284,     2305
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**
*Membrane section, controls=sc1-rampStress, Elset=P1;Chamber_1, Material=fabric
  3.500000e-01,
**
*Element, Type=M3D3, Elset=P2;Chamber_2
     232,     2370,     5846,     2377
     255,     2443,     6383,     2425
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**
*Membrane section, controls=sc1-rampStress, Elset=P2;Chamber_2, Material=fabric
  3.500000e-01,
**
*Element, Type=M3D3, Elset=P3;Chamber_3
     188,     2262,     5171,     2280
     196,     2274,     5190,     2291
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**
*Membrane section, controls=sc1-rampStress, Elset=P3;Chamber_3, Material=fabric
  3.500000e-01,
**
*Element, Type=M3D3, Elset=P4;Chamber_4
     138,     2141,     4670,     2137
     148,     2160,     4709,     2151
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**
*Membrane section, controls=sc1-rampStress, Elset=P4;Chamber_4, Material=fabric
  3.500000e-01,
**
*Element, Type=M3D3, Elset=P5;Chamber_5
     149,     2152,     4710,     2169
     162,     2204,     4983,     2191
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**
*Membrane section, controls=sc1-rampStress, Elset=P5;Chamber_5, Material=fabric
  3.500000e-01,
**
*Element, Type=M3D3, Elset=P6;Chamber_6
     104,     2063,     4107,     2059
     108,     2073,     4174,     2070
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**
*Membrane section, controls=sc1-rampStress, Elset=P6;Chamber_6, Material=fabric
  3.500000e-01,
**
*Element, Type=M3D3, Elset=P7;Chamber_7
     101,     2051,     4035,     2056
     105,     2060,     4108,     2065
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**
*Membrane section, controls=sc1-rampStress, Elset=P7;Chamber_7, Material=fabric
  3.500000e-01,
**
*Element, Type=M3D3, Elset=P8;Chamber_8
      88,     2031,     3915,     2021
      90,     2040,     3948,     2032
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**
*Membrane section, controls=sc1-rampStress, Elset=P8;Chamber_8, Material=fabric
  3.500000e-01,
**
*Element, Type=M3D3, Elset=P9;Chamber_9
      70,     1950,     2899,     1942
      98,     2055,     3999,     2049
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**
*Membrane section, controls=sc1-rampStress, Elset=P9;Chamber_9, Material=fabric
  3.500000e-01,
**
*Element, Type=M3D3, Elset=P10;Chamber_10
      71,     1945,     2910,     1955
      94,     2050,     3966,     2042
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**
*Membrane section, controls=sc1-rampStress, Elset=P10;Chamber_10, Material=fabric
  3.500000e-01,
**
*Element, Type=M3D3, Elset=P11;Chamber_11
      60,     1930,     2840,     1915
      68,     1940,     2866,     1930
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**
*Membrane section, controls=sc1-rampStress, Elset=P11;Chamber_11, Material=fabric
  3.500000e-01,
**
*Element, Type=M3D3, Elset=P12;Chamber_12
      23,     1850,     2497,     1855
      28,     1854,     2521,     1857
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**
*Membrane section, controls=sc1-rampStress, Elset=P12;Chamber_12, Material=fabric
  3.500000e-01,
**
*Element, Type=M3D3, Elset=P13;Chamber_13
      13,     1830,     2466,     1846
      18,     1841,     2477,     1852
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**
*Membrane section, controls=sc1-rampStress, Elset=P13;Chamber_13, Material=fabric
  3.500000e-01,
**
*Element, Type=M3D3, Elset=P14;Chamber_14
      16,     1847,     2476,     1840
      21,     1853,     2496,     1849
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**
*Membrane section, controls=sc1-rampStress, Elset=P14;Chamber_14, Material=fabric
  3.500000e-01,
**
*Element, Type=M3D3, Elset=P15;Chamber_15
     139,     2138,     4671,     2148
     141,     2138,     2139,     4672
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**
*Membrane section, controls=sc1-rampStress, Elset=P15;Chamber_15, Material=fabric
  3.500000e-01,
**
*Element, Type=M3D3, Elset=P16;Chamber_16
     219,     2356,     5768,     2342
     225,     2367,     5796,     2357
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**
*Membrane section, controls=sc1-rampStress, Elset=P16;Chamber_16, Material=fabric
  3.500000e-01,
**
*Element, Type=M3D3, Elset=P17;Chamber_17
     180,     2254,     5159,     2267
     183,     2268,     5162,     2257
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**
*Membrane section, controls=sc1-rampStress, Elset=P17;Chamber_17, Material=fabric
  3.500000e-01,
**
*Element, Type=M3D3, Elset=P18;Chamber_18
     231,     2375,     5845,     2369
     242,     2405,     6323,     2410
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**
*Membrane section, controls=sc1-rampStress, Elset=P18;Chamber_18, Material=fabric
  3.500000e-01,
**
*Element, Type=M3D3, Elset=P19;Saum
       1,        1,        4,        3
       2,        6,        5,        2
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**
*Membrane section, controls=sc1-rampStress, Elset=P19;Saum, Material=fabric
  3.500000e-01,
**
*Element, Type=M3D3, Elset=P51;Gewebe_Lanzenende
     589,     1859,     2548,     2578
     590,     2548,     2549,     2579
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**
*Membrane section, controls=sc1-rampStress, Elset=P51;Gewebe_Lanzenende, Material=fabric
  3.500000e-01,
**
*Element, Type=M3D3, Elset=P52;Gewebe_Lanzenende
    6531,     1859,     1864,     6521
    6532,     6491,     6521,     6522
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**
*Membrane section, controls=sc1-rampStress, Elset=P52;Gewebe_Lanzenende, Material=fabric
  3.500000e-01,
**
*Element, Type=CONN3D2, Elset=P50;BAR___PID________7_&_MID________2
   11001,     2464,    11001
   11002,    10350,    11002
   11003,     6407,    11003
   11004,    10351,    11004
   11005,     6408,    11005
   11006,     2465,    11006
**
*Connector section, Elset=P50;BAR___PID________7_&_MID________2, Behavior=Bar_M203_50
Axial,
**
***********************************************************
** COMPLETE SECTION CONTROLS
**
*SECTION CONTROLS,NAME=sc1-rampStress,HOURGLASS=STIFFNESS,RAMP INITIAL STRESS=
,,,3.0
**
**
** -----------------------  M A T E R I A L     D A T A  -----------------------
*Material, Name=Fabric
*Density
  7.830000e-10,
*Damping, Beta=1.e-6
*Fabric, stress free initial slack=yes
*Uniaxial, Component=1
*Loading data, regularize=off
 -2.220000e+01,  -1.000000e+00
 -1.776000e+01,  -9.000000e-01
 -2.220000e-03,  -5.000000e-01
  0.000000e+00,   0.000000e+00
  1.776000e+01,   1.000000e-01
*Uniaxial, Component=2
*Loading data, regularize=off
 -2.810000e+01,  -1.000000e+00
 -2.248000e+01,  -9.000000e-01
 -2.810000e-03,  -5.000000e-01
  0.000000e+00,   0.000000e+00
  2.248000e+01,   1.000000e-01
*Uniaxial, Component=shear
*Loading data, regularize=off
   0.000000,    0.0000000
   4.942772,    0.5235988
  54.370496,    1.5707963
**
** Durchstromoeffnung 1
**
*Material, Name=Elastic_M100_20
*Density
  7.830000e-10,
*Elastic
  2.500000e+02,   3.000000e-01
**
** Durchstromoeffnung 2
**
*Material, Name=Elastic_M100_21
*Density
  7.830000e-10,
*Elastic
  2.500000e+02,   3.000000e-01
**
** Wall 22
**
*Material, Name=Elastic_M100_22
*Density
  7.830000e-10,
*Elastic
  2.500000e+02,   3.000000e-01
**
** Wall 23
**
*Material, Name=Elastic_M100_23
*Density
  7.830000e-10,
*Elastic
  2.500000e+02,   3.000000e-01
**
** Wall 24
**
*Material, Name=Elastic_M100_24
*Density
  7.830000e-10,
*Elastic
  2.500000e+02,   3.000000e-01
**
** Wall 25
**
*Material, Name=Elastic_M100_25
*Density
  7.830000e-10,
*Elastic
  2.500000e+02,   3.000000e-01
**
** Wall 26
**
*Material, Name=Elastic_M100_26
*Density
  7.830000e-10,
*Elastic
  2.500000e+02,   3.000000e-01
**
** Wall 27
**
*Material, Name=Elastic_M100_27
*Density
  7.830000e-10,
*Elastic
  2.500000e+02,   3.000000e-01
**
** Wall 28
**
*Material, Name=Elastic_M100_28
*Density
  7.830000e-10,
*Elastic
  2.500000e+02,   3.000000e-01
**
** Wall 29
**
*Material, Name=Elastic_M100_29
*Density
  7.830000e-10,
*Elastic
  2.500000e+02,   3.000000e-01
**
** Wall 30
**
*Material, Name=Elastic_M100_30
*Density
  7.830000e-10,
*Elastic
  2.500000e+02,   3.000000e-01
**
** Wall 31
**
*Material, Name=Elastic_M100_31
*Density
  7.830000e-10,
*Elastic
  2.500000e+02,   3.000000e-01
**
** Wall 32
**
*Material, Name=Elastic_M100_32
*Density
  7.830000e-10,
*Elastic
  2.500000e+02,   3.000000e-01
**
** Wall 33
**
*Material, Name=Elastic_M100_33
*Density
  7.830000e-10,
*Elastic
  2.500000e+02,   3.000000e-01
**
** Wall 34
**
*Material, Name=Elastic_M100_34
*Density
  7.830000e-10,
*Elastic
  2.500000e+02,   3.000000e-01
**
** Wall 35
**
*Material, Name=Elastic_M100_35
*Density
  7.830000e-10,
*Elastic
  2.500000e+02,   3.000000e-01
**
** Wall 36
**
*Material, Name=Elastic_M100_36
*Density
  7.830000e-10,
*Elastic
  2.500000e+02,   3.000000e-01
**
** Wall 37
**
*Material, Name=Elastic_M100_37
*Density
  7.830000e-10,
*Elastic
  2.500000e+02,   3.000000e-01
**
** Wall 38
**
*Material, Name=Elastic_M100_38
*Density
  7.830000e-10,
*Elastic
  2.500000e+02,   3.000000e-01
**
** Wall 39
**
*Material, Name=Elastic_M100_39
*Density
  7.830000e-10,
*Elastic
  2.500000e+02,   3.000000e-01
**
** Wall 40
**
*Material, Name=Elastic_M100_40
*Density
  7.830000e-10,
*Elastic
  2.500000e+02,   3.000000e-01
**
** BAR   PID        7 & MID        2
**
*Connector behavior, Name=Bar_M203_50
*Connector elasticity, Component=1, Nonlinear
  0.000000e+00,   0.000000e+00
  2.000000e+01,   5.000000e+01
  3.000000e+04,   5.100000e+01
**
**
** Lanze
**
*Material, Name=Elastic_M100_201
*Density
  7.830000e-09,
*Elastic
  2.500000e+02,   3.000000e-01
**
** Adapter -Alukonstruktion
**
*Material, Name=Elastic_M100_20000001
*Density
  2.800000e-09,
*Elastic
  7.000000e+04,   3.000000e-01
**
** Kohlefaser-Holm
**
*Material, Name=Elastic_M100_20000002
*Density
  1.014800e-09,
*Elastic
  7.000000e+04,   3.000000e-01
**
** Fuehrung
**
*Material, Name=Elastic_M100_30000001
*Density
  7.800000e-09,
*Elastic
  2.000000e+05,   3.000000e-01
**
** KOPF SCHALE INNEN
**
*Material, Name=Elastic_M100_40000001
*Density
  7.800000e-09,
*Elastic
  7.000000e+04,   3.000000e-01
**
** KOPF-SOLID
**
*Material, Name=Elastic_M99_40000002
*Density
  2.197800e-09,
*Elastic
  2.100000e+05,   3.000000e-01
**
** KOPF SCHALE AUSSEN
**
*Material, Name=Elastic_M100_40000003
*Density
  2.800000e-09,
*Elastic
  7.000000e+04,   3.000000e-01
**
** KOPF SCHALE FUER SOLIDS
**
*Material, Name=Elastic_M100_40000004
*Density
  2.800000e-09,
*Elastic
  7.000000e+04,   3.000000e-01
**
** KOPF ZUSATZSCHALE
**
*Material, Name=Elastic_M100_40000005
*Density
  2.800000e-09,
*Elastic
  7.000000e+04,   3.000000e-01
**
** Anschraub-Aluplatte
**
*Material, Name=Elastic_M100_40000006
*Density
  2.800000e-09,
*Elastic
  7.000000e+04,   3.000000e-01
**
** Platte
**
*Material, Name=Elastic_M100_50000001
*Density
  7.800000e-10,
*Elastic
  2.500000e+02,   3.000000e-01
**
** Rahmen
**
*Material, Name=Elastic_M100_80000000
*Density
  2.700000e-10,
*Elastic
  7.000000e+04,   3.300000e-01
**
** Halterungen
**
*Material, Name=Elastic_M100_80000005
*Density
  2.700000e-10,
*Elastic
  7.000000e+04,   3.300000e-01
**
** U-Halter
**
*Material, Name=Elastic_M100_80000010
*Density
  7.800000e-10,
*Elastic
  1.250000e+02,   3.300000e-01
**
** ---------------------  R I G I D    B O D Y    D A T A  ---------------------
**
** RigidBody_1000004
**
*Elset, Elset=RBody_1000004_Type0_Elset
P80000000;Rahmen,
P80000005;Halterungen,
P80000010;U-Halter,
**
*Nset, Nset=RBody_1000004_Type0_RefNode
99999999,
**
*Rigid body, Ref node=99999999, Position=CENTER OF MASS, Elset=RBody_1000004_Type0_Elset
**
** Platte
**
*Elset, Elset=RBody_500000_Type4_Elset
P50000001;Platte,
**
*Nset, Nset=RBody_500000_Type4_RefNode
50005000,
**
*Rigid body, Ref node=50005000, Elset=RBody_500000_Type4_Elset
**
** Lanze
**
*Elset, Elset=RBody_1_Type4_Elset
P201;Lanze,
**
*Nset, Nset=RBody_1_Type4_RefNode
   30999,
**
*Rigid body, Ref node=30999, Elset=RBody_1_Type4_Elset
**
** ----------------  C O N T A C T    S U R F A C E    D A T A  ----------------
**
** AIRBAG-U_Halter-Kontakt
**
*Surface, Name=Contact_1000005_Self, Type=ELEMENT
P1;Chamber_1,
P4;Chamber_4,
P6;Chamber_6,
P9;Chamber_9,
P12;Chamber_12,
P18;Chamber_18,
P80000010;U-Halter,
**
** Platte gegen IC
**
*Surface, Name=Contact_1000004_Main, Type=ELEMENT
P50000001;Platte,
**
*Surface, Name=Contact_1000004_Secondary, Type=ELEMENT
P1;Chamber_1,
P2;Chamber_2,
P3;Chamber_3,
P4;Chamber_4,
P5;Chamber_5,
P6;Chamber_6,
P7;Chamber_7,
P8;Chamber_8,
P9;Chamber_9,
P10;Chamber_10,
P11;Chamber_11,
P12;Chamber_12,
P13;Chamber_13,
P14;Chamber_14,
P15;Chamber_15,
P16;Chamber_16,
P17;Chamber_17,
P18;Chamber_18,
**
*Surface Interaction, Name=Contact_1000004_Prop
*Friction
  1.000000e-01,
**
**
** AIRBAG-Selbst-Kontakt
**
*Surface, Name=Contact_1000010_Self, Type=ELEMENT
P1;Chamber_1,
P2;Chamber_2,
P3;Chamber_3,
P4;Chamber_4,
P5;Chamber_5,
P6;Chamber_6,
P7;Chamber_7,
P8;Chamber_8,
P9;Chamber_9,
P10;Chamber_10,
P11;Chamber_11,
P12;Chamber_12,
P13;Chamber_13,
P14;Chamber_14,
P15;Chamber_15,
P16;Chamber_16,
P17;Chamber_17,
P18;Chamber_18,
P19;Saum,
P51;Gewebe_Lanzenende,
P52;Gewebe_Lanzenende,
**
*Surface Interaction, Name=Contact_1000010_Prop
*Friction
  1.000000e-01,
**
** AIRBAG-Selbst-Kontakt
**
*Surface, Name=Contact_1000011_Self, Type=ELEMENT
P51;Gewebe_Lanzenende,
P52;Gewebe_Lanzenende,
P201;Lanze,
**
** AIRBAG-Rest-Kontakt
**
*Surface, Name=Contact_1000003_Main, Type=ELEMENT
P201;Lanze,
**
*Surface, Name=Contact_1000003_Secondary, Type=ELEMENT
P1;Chamber_1,
P4;Chamber_4,
P6;Chamber_6,
P9;Chamber_9,
**
*Surface Interaction, Name=Contact_1000003_Prop
*Friction
  1.000000e-01,
**
** ----------  A I R B A G    F L U I D / C H A M B E R S    D A T A  ----------
**
** Inflatable Curtain - Bag1
**
*Physical constants, Universal gas constant=  8.314410e+03, Absolute zero=  0.000000e+00
**
** Chamber external skin
**
**  chamber1-infl.37.5%
**
*Nset, Nset=Ch1_refNode_Bag1
100000001,
**
*Surface, Name=Ch1_Surface_Bag1, Type=ELEMENT
P1;Chamber_1, SNEG
P20;Durchstromoeffnung_1, SNEG
P40;Wall_40, SPOS
P23;Wall_23, SNEG
P26;Wall_26, SNEG
P27;Wall_27, SNEG
**
***********************************************************
** ADD FLUID CAVITY DEFINITION Ch1_Bag1
**
**
**
**
**  chamber2
**
*Nset, Nset=Ch2_refNode_Bag1
100000002,
**
*Surface, Name=Ch2_Surface_Bag1, Type=ELEMENT
P2;Chamber_2, SNEG
P22;Wall_22, SPOS
P24;Wall_24, SNEG
**
*Fluid cavity, Name=Ch2_Bag1, Ambient pressure=  1.013250e-01,
   Ref node=Ch2_refNode_Bag1, Ambient temperature=  2.950000e+02,
   Surface=Ch2_Surface_Bag1, Minimum volume=INITIAL VOLUME,
   Behavior=AIR, Adiabatic

**
**  chamber3
**
*Nset, Nset=Ch3_refNode_Bag1
100000003,
**
*Surface, Name=Ch3_Surface_Bag1, Type=ELEMENT
P3;Chamber_3, SNEG
P23;Wall_23, SPOS
P25;Wall_25, SNEG
**
*Fluid cavity, Name=Ch3_Bag1, Ambient pressure=  1.013250e-01,
   Ref node=Ch3_refNode_Bag1, Ambient temperature=  2.950000e+02,
   Surface=Ch3_Surface_Bag1, Minimum volume=INITIAL VOLUME,
   Behavior=AIR, Adiabatic

**
**  chamber4
**
*Nset, Nset=Ch4_refNode_Bag1
100000004,
**
*Surface, Name=Ch4_Surface_Bag1, Type=ELEMENT
P4;Chamber_4, SNEG
P26;Wall_26, SPOS
P27;Wall_27, SPOS
P28;Wall_28, SNEG
P29;Wall_29, SNEG
**
*Fluid cavity, Name=Ch4_Bag1, Ambient pressure=  1.013250e-01,
   Ref node=Ch4_refNode_Bag1, Ambient temperature=  2.950000e+02,
   Surface=Ch4_Surface_Bag1, Minimum volume=INITIAL VOLUME,
   Behavior=AIR, Adiabatic

**
**  chamber5
**
*Nset, Nset=Ch5_refNode_Bag1
100000005,
**
*Surface, Name=Ch5_Surface_Bag1, Type=ELEMENT
P5;Chamber_5, SNEG
P29;Wall_29, SPOS
P30;Wall_30, SNEG
**
*Fluid cavity, Name=Ch5_Bag1, Ambient pressure=  1.013250e-01,
   Ref node=Ch5_refNode_Bag1, Ambient temperature=  2.950000e+02,
   Surface=Ch5_Surface_Bag1, Minimum volume=INITIAL VOLUME,
   Behavior=AIR, Adiabatic

**
**  chamber6-infl.17.5%
**
*Nset, Nset=Ch6_refNode_Bag1
100000006,
**
*Surface, Name=Ch6_Surface_Bag1, Type=ELEMENT
P6;Chamber_6, SNEG
P28;Wall_28, SPOS
P31;Wall_31, SNEG
P32;Wall_32, SNEG
P33;Wall_33, SNEG
**
*Fluid cavity, Name=Ch6_Bag1, Ambient pressure=  1.013250e-01,
   Ref node=Ch6_refNode_Bag1, Ambient temperature=  2.950000e+02,
   Surface=Ch6_Surface_Bag1, Minimum volume=INITIAL VOLUME,
   Behavior=AIR, Adiabatic

**
**  chamber7
**
*Nset, Nset=Ch7_refNode_Bag1
100000007,
**
*Surface, Name=Ch7_Surface_Bag1, Type=ELEMENT
P7;Chamber_7, SNEG
P33;Wall_33, SPOS
P34;Wall_34, SNEG
**
*Fluid cavity, Name=Ch7_Bag1, Ambient pressure=  1.013250e-01,
   Ref node=Ch7_refNode_Bag1, Ambient temperature=  2.950000e+02,
   Surface=Ch7_Surface_Bag1, Minimum volume=INITIAL VOLUME,
   Behavior=AIR, Adiabatic

**
**  chamber8
**
*Nset, Nset=Ch8_refNode_Bag1
100000008,
**
*Surface, Name=Ch8_Surface_Bag1, Type=ELEMENT
P8;Chamber_8, SNEG
P34;Wall_34, SPOS
**
*Fluid cavity, Name=Ch8_Bag1, Ambient pressure=  1.013250e-01,
   Ref node=Ch8_refNode_Bag1, Ambient temperature=  2.950000e+02,
   Surface=Ch8_Surface_Bag1, Minimum volume=INITIAL VOLUME,
   Behavior=AIR, Adiabatic

**
**  chamber9-infl.45%
**
*Nset, Nset=Ch9_refNode_Bag1
100000009,
**
*Surface, Name=Ch9_Surface_Bag1, Type=ELEMENT
P9;Chamber_9, SNEG
P21;Durchstromoeffnung_2, SNEG
P31;Wall_31, SPOS
P32;Wall_32, SPOS
P35;Wall_35, SNEG
P36;Wall_36, SPOS
**
*Fluid cavity, Name=Ch9_Bag1, Ambient pressure=  1.013250e-01,
   Ref node=Ch9_refNode_Bag1, Ambient temperature=  2.950000e+02,
   Surface=Ch9_Surface_Bag1, Minimum volume=INITIAL VOLUME,
   Behavior=AIR, Adiabatic

**
**  chamber10
**
*Nset, Nset=Ch10_refNode_Bag1
100000010,
**
*Surface, Name=Ch10_Surface_Bag1, Type=ELEMENT
P10;Chamber_10, SNEG
P36;Wall_36, SNEG
P37;Wall_37, SNEG
**
*Fluid cavity, Name=Ch10_Bag1, Ambient pressure=  1.013250e-01,
   Ref node=Ch10_refNode_Bag1, Ambient temperature=  2.950000e+02,
   Surface=Ch10_Surface_Bag1, Minimum volume=INITIAL VOLUME,
   Behavior=AIR, Adiabatic

**
**  chamber11
**
*Nset, Nset=Ch11_refNode_Bag1
100000011,
**
*Surface, Name=Ch11_Surface_Bag1, Type=ELEMENT
P11;Chamber_11, SNEG
P37;Wall_37, SPOS
**
*Fluid cavity, Name=Ch11_Bag1, Ambient pressure=  1.013250e-01,
   Ref node=Ch11_refNode_Bag1, Ambient temperature=  2.950000e+02,
   Surface=Ch11_Surface_Bag1, Minimum volume=INITIAL VOLUME,
   Behavior=AIR, Adiabatic

**
**  chamber12
**
*Nset, Nset=Ch12_refNode_Bag1
100000012,
**
*Surface, Name=Ch12_Surface_Bag1, Type=ELEMENT
P12;Chamber_12, SNEG
P35;Wall_35, SPOS
P38;Wall_38, SPOS
**
*Fluid cavity, Name=Ch12_Bag1, Ambient pressure=  1.013250e-01,
   Ref node=Ch12_refNode_Bag1, Ambient temperature=  2.950000e+02,
   Surface=Ch12_Surface_Bag1, Minimum volume=INITIAL VOLUME,
   Behavior=AIR, Adiabatic

**
**  chamber13
**
*Nset, Nset=Ch13_refNode_Bag1
100000013,
**
*Surface, Name=Ch13_Surface_Bag1, Type=ELEMENT
P13;Chamber_13, SNEG
P38;Wall_38, SNEG
P39;Wall_39, SPOS
**
*Fluid cavity, Name=Ch13_Bag1, Ambient pressure=  1.013250e-01,
   Ref node=Ch13_refNode_Bag1, Ambient temperature=  2.950000e+02,
   Surface=Ch13_Surface_Bag1, Minimum volume=INITIAL VOLUME,
   Behavior=AIR, Adiabatic

**
**  chamber14
**
*Nset, Nset=Ch14_refNode_Bag1
100000014,
**
*Surface, Name=Ch14_Surface_Bag1, Type=ELEMENT
P14;Chamber_14, SNEG
P39;Wall_39, SNEG
**
*Fluid cavity, Name=Ch14_Bag1, Ambient pressure=  1.013250e-01,
   Ref node=Ch14_refNode_Bag1, Ambient temperature=  2.950000e+02,
   Surface=Ch14_Surface_Bag1, Minimum volume=INITIAL VOLUME,
   Behavior=AIR, Adiabatic

**
**  chamber15
**
*Nset, Nset=Ch15_refNode_Bag1
100000015,
**
*Surface, Name=Ch15_Surface_Bag1, Type=ELEMENT
P15;Chamber_15, SNEG
P30;Wall_30, SPOS
**
*Fluid cavity, Name=Ch15_Bag1, Ambient pressure=  1.013250e-01,
   Ref node=Ch15_refNode_Bag1, Ambient temperature=  2.950000e+02,
   Surface=Ch15_Surface_Bag1, Minimum volume=INITIAL VOLUME,
   Behavior=AIR, Adiabatic

**
**  chamber16
**
*Nset, Nset=Ch16_refNode_Bag1
100000016,
**
*Surface, Name=Ch16_Surface_Bag1, Type=ELEMENT
P16;Chamber_16, SNEG
P24;Wall_24, SPOS
**
*Fluid cavity, Name=Ch16_Bag1, Ambient pressure=  1.013250e-01,
   Ref node=Ch16_refNode_Bag1, Ambient temperature=  2.950000e+02,
   Surface=Ch16_Surface_Bag1, Minimum volume=INITIAL VOLUME,
   Behavior=AIR, Adiabatic

**
**  chamber17
**
*Nset, Nset=Ch17_refNode_Bag1
100000017,
**
*Surface, Name=Ch17_Surface_Bag1, Type=ELEMENT
P17;Chamber_17, SNEG
P25;Wall_25, SPOS
**
*Fluid cavity, Name=Ch17_Bag1, Ambient pressure=  1.013250e-01,
   Ref node=Ch17_refNode_Bag1, Ambient temperature=  2.950000e+02,
   Surface=Ch17_Surface_Bag1, Minimum volume=INITIAL VOLUME,
   Behavior=AIR, Adiabatic

**
**  chamber18
**
*Nset, Nset=Ch18_refNode_Bag1
100000018,
**
*Surface, Name=Ch18_Surface_Bag1, Type=ELEMENT
P18;Chamber_18, SNEG
P40;Wall_40, SNEG
P22;Wall_22, SNEG
**
*Fluid cavity, Name=Ch18_Bag1, Ambient pressure=  1.013250e-01,
   Ref node=Ch18_refNode_Bag1, Ambient temperature=  2.950000e+02,
   Surface=Ch18_Surface_Bag1, Minimum volume=INITIAL VOLUME,
   Behavior=AIR, Adiabatic

**
** External skin surfaces for all chambers
**
*Surface, Name=Ch1_Ext_Skin_Surf_Bag1, Type=ELEMENT
P1;Chamber_1, SNEG
P20;Durchstromoeffnung_1, SNEG
**
*Surface, Name=Ch2_Ext_Skin_Surf_Bag1, Type=ELEMENT
P2;Chamber_2, SNEG
**
*Surface, Name=Ch3_Ext_Skin_Surf_Bag1, Type=ELEMENT
P3;Chamber_3, SNEG
**
*Surface, Name=Ch4_Ext_Skin_Surf_Bag1, Type=ELEMENT
P4;Chamber_4, SNEG
**
*Surface, Name=Ch5_Ext_Skin_Surf_Bag1, Type=ELEMENT
P5;Chamber_5, SNEG
**
*Surface, Name=Ch6_Ext_Skin_Surf_Bag1, Type=ELEMENT
P6;Chamber_6, SNEG
**
*Surface, Name=Ch7_Ext_Skin_Surf_Bag1, Type=ELEMENT
P7;Chamber_7, SNEG
**
*Surface, Name=Ch8_Ext_Skin_Surf_Bag1, Type=ELEMENT
P8;Chamber_8, SNEG
**
*Surface, Name=Ch9_Ext_Skin_Surf_Bag1, Type=ELEMENT
P9;Chamber_9, SNEG
P21;Durchstromoeffnung_2, SNEG
**
*Surface, Name=Ch10_Ext_Skin_Surf_Bag1, Type=ELEMENT
P10;Chamber_10, SNEG
**
*Surface, Name=Ch11_Ext_Skin_Surf_Bag1, Type=ELEMENT
P11;Chamber_11, SNEG
**
*Surface, Name=Ch12_Ext_Skin_Surf_Bag1, Type=ELEMENT
P12;Chamber_12, SNEG
**
*Surface, Name=Ch13_Ext_Skin_Surf_Bag1, Type=ELEMENT
P13;Chamber_13, SNEG
**
*Surface, Name=Ch14_Ext_Skin_Surf_Bag1, Type=ELEMENT
P14;Chamber_14, SNEG
**
*Surface, Name=Ch15_Ext_Skin_Surf_Bag1, Type=ELEMENT
P15;Chamber_15, SNEG
**
*Surface, Name=Ch16_Ext_Skin_Surf_Bag1, Type=ELEMENT
P16;Chamber_16, SNEG
**
*Surface, Name=Ch17_Ext_Skin_Surf_Bag1, Type=ELEMENT
P17;Chamber_17, SNEG
**
*Surface, Name=Ch18_Ext_Skin_Surf_Bag1, Type=ELEMENT
P18;Chamber_18, SNEG
**
** Wall opening surfaces for all chambers
**
*Surface, Name=Wall_Opening_P22_Bag1, Type=ELEMENT
P22;Wall_22, SPOS
**
*Surface, Name=Wall_Opening_P23_Bag1, Type=ELEMENT
P23;Wall_23, SPOS
**
*Surface, Name=Wall_Opening_P24_Bag1, Type=ELEMENT
P24;Wall_24, SPOS
**
*Surface, Name=Wall_Opening_P25_Bag1, Type=ELEMENT
P25;Wall_25, SPOS
**
*Surface, Name=Wall_Opening_P26_Bag1, Type=ELEMENT
P26;Wall_26, SPOS
**
*Surface, Name=Wall_Opening_P27_Bag1, Type=ELEMENT
P27;Wall_27, SPOS
**
*Surface, Name=Wall_Opening_P28_Bag1, Type=ELEMENT
P28;Wall_28, SPOS
**
*Surface, Name=Wall_Opening_P29_Bag1, Type=ELEMENT
P29;Wall_29, SPOS
**
*Surface, Name=Wall_Opening_P30_Bag1, Type=ELEMENT
P30;Wall_30, SPOS
**
*Surface, Name=Wall_Opening_P31_Bag1, Type=ELEMENT
P31;Wall_31, SPOS
**
*Surface, Name=Wall_Opening_P32_Bag1, Type=ELEMENT
P32;Wall_32, SPOS
**
*Surface, Name=Wall_Opening_P33_Bag1, Type=ELEMENT
P33;Wall_33, SPOS
**
*Surface, Name=Wall_Opening_P34_Bag1, Type=ELEMENT
P34;Wall_34, SPOS
**
*Surface, Name=Wall_Opening_P35_Bag1, Type=ELEMENT
P35;Wall_35, SPOS
**
*Surface, Name=Wall_Opening_P36_Bag1, Type=ELEMENT
P36;Wall_36, SPOS
**
*Surface, Name=Wall_Opening_P37_Bag1, Type=ELEMENT
P37;Wall_37, SPOS
**
*Surface, Name=Wall_Opening_P38_Bag1, Type=ELEMENT
P38;Wall_38, SPOS
**
*Surface, Name=Wall_Opening_P39_Bag1, Type=ELEMENT
P39;Wall_39, SPOS
**
*Surface, Name=Wall_Opening_P40_Bag1, Type=ELEMENT
P40;Wall_40, SPOS
**
** Chamber wall openings
**
** Wall opening: Chamber 1 and Chamber 3 exchange
**
**
***********************************************************
** ADD FLUID EXCHANGE DEFINITION
**
**
**
**
** Wall opening: Chamber 1 and Chamber 4 exchange
**
*Fluid exchange, Name=WO_1_4_P26_Bag1, Property=Orifice_P26,
   Surface=Wall_Opening_P26_Bag1
Ch1_refNode_Bag1, Ch4_refNode_Bag1
**
*Fluid exchange property, Name=Orifice_P26, Type=ORIFICE
  1.000000e+00,
**
** Wall opening: Chamber 1 and Chamber 4 exchange
**
*Fluid exchange, Name=WO_1_4_P27_Bag1, Property=Orifice_P27,
   Surface=Wall_Opening_P27_Bag1
Ch1_refNode_Bag1, Ch4_refNode_Bag1
**
*Fluid exchange property, Name=Orifice_P27, Type=ORIFICE
  1.000000e+00,
**
** Wall opening: Chamber 2 and Chamber 16 exchange
**
*Fluid exchange, Name=WO_2_16_P24_Bag1, Property=Orifice_P24,
   Surface=Wall_Opening_P24_Bag1
Ch2_refNode_Bag1, Ch16_refNode_Bag1
**
*Fluid exchange property, Name=Orifice_P24, Type=ORIFICE
  1.000000e+00,
**
** Wall opening: Chamber 3 and Chamber 17 exchange
**
*Fluid exchange, Name=WO_3_17_P25_Bag1, Property=Orifice_P25,
   Surface=Wall_Opening_P25_Bag1
Ch3_refNode_Bag1, Ch17_refNode_Bag1
**
*Fluid exchange property, Name=Orifice_P25, Type=ORIFICE
  1.000000e+00,
**
** Wall opening: Chamber 4 and Chamber 6 exchange
**
*Fluid exchange, Name=WO_4_6_P28_Bag1, Property=Orifice_P28,
   Surface=Wall_Opening_P28_Bag1
Ch4_refNode_Bag1, Ch6_refNode_Bag1
**
*Fluid exchange property, Name=Orifice_P28, Type=ORIFICE
  1.000000e+00,
**
** Wall opening: Chamber 4 and Chamber 5 exchange
**
*Fluid exchange, Name=WO_4_5_P29_Bag1, Property=Orifice_P29,
   Surface=Wall_Opening_P29_Bag1
Ch4_refNode_Bag1, Ch5_refNode_Bag1
**
*Fluid exchange property, Name=Orifice_P29, Type=ORIFICE
  1.000000e+00,
**
** Wall opening: Chamber 5 and Chamber 15 exchange
**
*Fluid exchange, Name=WO_5_15_P30_Bag1, Property=Orifice_P30,
   Surface=Wall_Opening_P30_Bag1
Ch5_refNode_Bag1, Ch15_refNode_Bag1
**
*Fluid exchange property, Name=Orifice_P30, Type=ORIFICE
  1.000000e+00,
**
** Wall opening: Chamber 6 and Chamber 9 exchange
**
*Fluid exchange, Name=WO_6_9_P31_Bag1, Property=Orifice_P31,
   Surface=Wall_Opening_P31_Bag1
Ch6_refNode_Bag1, Ch9_refNode_Bag1
**
*Fluid exchange property, Name=Orifice_P31, Type=ORIFICE
  1.000000e-01,
**
** Wall opening: Chamber 6 and Chamber 9 exchange
**
*Fluid exchange, Name=WO_6_9_P32_Bag1, Property=Orifice_P32,
   Surface=Wall_Opening_P32_Bag1
Ch6_refNode_Bag1, Ch9_refNode_Bag1
**
*Fluid exchange property, Name=Orifice_P32, Type=ORIFICE
  5.000000e-01,
**
** Wall opening: Chamber 6 and Chamber 7 exchange
**
*Fluid exchange, Name=WO_6_7_P33_Bag1, Property=Orifice_P33,
   Surface=Wall_Opening_P33_Bag1
Ch6_refNode_Bag1, Ch7_refNode_Bag1
**
*Fluid exchange property, Name=Orifice_P33, Type=ORIFICE
  1.000000e+00,
**
** Wall opening: Chamber 7 and Chamber 8 exchange
**
*Fluid exchange, Name=WO_7_8_P34_Bag1, Property=Orifice_P34,
   Surface=Wall_Opening_P34_Bag1
Ch7_refNode_Bag1, Ch8_refNode_Bag1
**
*Fluid exchange property, Name=Orifice_P34, Type=ORIFICE
  1.000000e+00,
**
** Wall opening: Chamber 9 and Chamber 12 exchange
**
*Fluid exchange, Name=WO_9_12_P35_Bag1, Property=Orifice_P35,
   Surface=Wall_Opening_P35_Bag1
Ch9_refNode_Bag1, Ch12_refNode_Bag1
**
*Fluid exchange property, Name=Orifice_P35, Type=ORIFICE
  5.000000e-01,
**
** Wall opening: Chamber 10 and Chamber 9 exchange
**
*Fluid exchange, Name=WO_10_9_P36_Bag1, Property=Orifice_P36,
   Surface=Wall_Opening_P36_Bag1
Ch10_refNode_Bag1, Ch9_refNode_Bag1
**
*Fluid exchange property, Name=Orifice_P36, Type=ORIFICE
  1.000000e+00,
**
** Wall opening: Chamber 10 and Chamber 11 exchange
**
*Fluid exchange, Name=WO_10_11_P37_Bag1, Property=Orifice_P37,
   Surface=Wall_Opening_P37_Bag1
Ch10_refNode_Bag1, Ch11_refNode_Bag1
**
*Fluid exchange property, Name=Orifice_P37, Type=ORIFICE
  1.000000e+00,
**
** Wall opening: Chamber 13 and Chamber 12 exchange
**
*Fluid exchange, Name=WO_13_12_P38_Bag1, Property=Orifice_P38,
   Surface=Wall_Opening_P38_Bag1
Ch13_refNode_Bag1, Ch12_refNode_Bag1
**
*Fluid exchange property, Name=Orifice_P38, Type=ORIFICE
  1.000000e+00,
**
** Wall opening: Chamber 14 and Chamber 13 exchange
**
*Fluid exchange, Name=WO_14_13_P39_Bag1, Property=Orifice_P39,
   Surface=Wall_Opening_P39_Bag1
Ch14_refNode_Bag1, Ch13_refNode_Bag1
**
*Fluid exchange property, Name=Orifice_P39, Type=ORIFICE
  1.000000e+00,
**
** Wall opening: Chamber 18 and Chamber 1 exchange
**
*Fluid exchange, Name=WO_18_1_P40_Bag1, Property=Orifice_P40,
   Surface=Wall_Opening_P40_Bag1
Ch18_refNode_Bag1, Ch1_refNode_Bag1
**
*Fluid exchange property, Name=Orifice_P40, Type=ORIFICE
  1.000000e+00,
**
** Wall opening: Chamber 18 and Chamber 2 exchange
**
*Fluid exchange, Name=WO_18_2_P22_Bag1, Property=Orifice_P22,
   Surface=Wall_Opening_P22_Bag1
Ch18_refNode_Bag1, Ch2_refNode_Bag1
**
*Fluid exchange property, Name=Orifice_P22, Type=ORIFICE
  1.000000e+00,
**
** Chamber leakages
**
** Chamber 1 - Leakage 1
**
*Fluid exchange, Name=Ch1_Leak1_RLeak_Bag1,
   Surface=Ch1_Ext_Skin_Surf_Bag1,
   Property=Ch1_Leak1_RLeak_Prop_Bag1
Ch1_refNode_Bag1,
**
*Fluid exchange property, Name=Ch1_Leak1_RLeak_Prop_Bag1,
   Type=ORIFICE
  3.000000e-04,
**
** Chamber 2 - Leakage 1
**
*Fluid exchange, Name=Ch2_Leak1_RLeak_Bag1,
   Surface=Ch2_Ext_Skin_Surf_Bag1,
   Property=Ch2_Leak1_RLeak_Prop_Bag1
Ch2_refNode_Bag1,
**
*Fluid exchange property, Name=Ch2_Leak1_RLeak_Prop_Bag1,
   Type=ORIFICE
  3.000000e-04,
**
** Chamber 3 - Leakage 1
**
*Fluid exchange, Name=Ch3_Leak1_RLeak_Bag1,
   Surface=Ch3_Ext_Skin_Surf_Bag1,
   Property=Ch3_Leak1_RLeak_Prop_Bag1
Ch3_refNode_Bag1,
**
*Fluid exchange property, Name=Ch3_Leak1_RLeak_Prop_Bag1,
   Type=ORIFICE
  3.000000e-04,
**
** Chamber 4 - Leakage 1
**
*Fluid exchange, Name=Ch4_Leak1_RLeak_Bag1,
   Surface=Ch4_Ext_Skin_Surf_Bag1,
   Property=Ch4_Leak1_RLeak_Prop_Bag1
Ch4_refNode_Bag1,
**
*Fluid exchange property, Name=Ch4_Leak1_RLeak_Prop_Bag1,
   Type=ORIFICE
  3.000000e-04,
**
** Chamber 5 - Leakage 1
**
*Fluid exchange, Name=Ch5_Leak1_RLeak_Bag1,
   Surface=Ch5_Ext_Skin_Surf_Bag1,
   Property=Ch5_Leak1_RLeak_Prop_Bag1
Ch5_refNode_Bag1,
**
*Fluid exchange property, Name=Ch5_Leak1_RLeak_Prop_Bag1,
   Type=ORIFICE
  3.000000e-04,
**
** Chamber 6 - Leakage 1
**
*Fluid exchange, Name=Ch6_Leak1_RLeak_Bag1,
   Surface=Ch6_Ext_Skin_Surf_Bag1,
   Property=Ch6_Leak1_RLeak_Prop_Bag1
Ch6_refNode_Bag1,
**
*Fluid exchange property, Name=Ch6_Leak1_RLeak_Prop_Bag1,
   Type=ORIFICE
  3.000000e-04,
**
** Chamber 7 - Leakage 1
**
*Fluid exchange, Name=Ch7_Leak1_RLeak_Bag1,
   Surface=Ch7_Ext_Skin_Surf_Bag1,
   Property=Ch7_Leak1_RLeak_Prop_Bag1
Ch7_refNode_Bag1,
**
*Fluid exchange property, Name=Ch7_Leak1_RLeak_Prop_Bag1,
   Type=ORIFICE
  3.000000e-04,
**
** Chamber 8 - Leakage 1
**
*Fluid exchange, Name=Ch8_Leak1_RLeak_Bag1,
   Surface=Ch8_Ext_Skin_Surf_Bag1,
   Property=Ch8_Leak1_RLeak_Prop_Bag1
Ch8_refNode_Bag1,
**
*Fluid exchange property, Name=Ch8_Leak1_RLeak_Prop_Bag1,
   Type=ORIFICE
  3.000000e-04,
**
** Chamber 9 - Leakage 1
**
*Fluid exchange, Name=Ch9_Leak1_RLeak_Bag1,
   Surface=Ch9_Ext_Skin_Surf_Bag1,
   Property=Ch9_Leak1_RLeak_Prop_Bag1
Ch9_refNode_Bag1,
**
*Fluid exchange property, Name=Ch9_Leak1_RLeak_Prop_Bag1,
   Type=ORIFICE
  3.000000e-04,
**
** Chamber 10 - Leakage 1
**
*Fluid exchange, Name=Ch10_Leak1_RLeak_Bag1,
   Surface=Ch10_Ext_Skin_Surf_Bag1,
   Property=Ch10_Leak1_RLeak_Prop_Bag1
Ch10_refNode_Bag1,
**
*Fluid exchange property, Name=Ch10_Leak1_RLeak_Prop_Bag1,
   Type=ORIFICE
  3.000000e-04,
**
** Chamber 11 - Leakage 1
**
*Fluid exchange, Name=Ch11_Leak1_RLeak_Bag1,
   Surface=Ch11_Ext_Skin_Surf_Bag1,
   Property=Ch11_Leak1_RLeak_Prop_Bag1
Ch11_refNode_Bag1,
**
*Fluid exchange property, Name=Ch11_Leak1_RLeak_Prop_Bag1,
   Type=ORIFICE
  3.000000e-04,
**
** Chamber 12 - Leakage 1
**
*Fluid exchange, Name=Ch12_Leak1_RLeak_Bag1,
   Surface=Ch12_Ext_Skin_Surf_Bag1,
   Property=Ch12_Leak1_RLeak_Prop_Bag1
Ch12_refNode_Bag1,
**
*Fluid exchange property, Name=Ch12_Leak1_RLeak_Prop_Bag1,
   Type=ORIFICE
  3.000000e-04,
**
** Chamber 13 - Leakage 1
**
*Fluid exchange, Name=Ch13_Leak1_RLeak_Bag1,
   Surface=Ch13_Ext_Skin_Surf_Bag1,
   Property=Ch13_Leak1_RLeak_Prop_Bag1
Ch13_refNode_Bag1,
**
*Fluid exchange property, Name=Ch13_Leak1_RLeak_Prop_Bag1,
   Type=ORIFICE
  3.000000e-04,
**
** Chamber 14 - Leakage 1
**
*Fluid exchange, Name=Ch14_Leak1_RLeak_Bag1,
   Surface=Ch14_Ext_Skin_Surf_Bag1,
   Property=Ch14_Leak1_RLeak_Prop_Bag1
Ch14_refNode_Bag1,
**
*Fluid exchange property, Name=Ch14_Leak1_RLeak_Prop_Bag1,
   Type=ORIFICE
  3.000000e-04,
**
** Chamber 15 - Leakage 1
**
*Fluid exchange, Name=Ch15_Leak1_RLeak_Bag1,
   Surface=Ch15_Ext_Skin_Surf_Bag1,
   Property=Ch15_Leak1_RLeak_Prop_Bag1
Ch15_refNode_Bag1,
**
*Fluid exchange property, Name=Ch15_Leak1_RLeak_Prop_Bag1,
   Type=ORIFICE
  3.000000e-04,
**
** Chamber 16 - Leakage 1
**
*Fluid exchange, Name=Ch16_Leak1_RLeak_Bag1,
   Surface=Ch16_Ext_Skin_Surf_Bag1,
   Property=Ch16_Leak1_RLeak_Prop_Bag1
Ch16_refNode_Bag1,
**
*Fluid exchange property, Name=Ch16_Leak1_RLeak_Prop_Bag1,
   Type=ORIFICE
  3.000000e-04,
**
** Chamber 17 - Leakage 1
**
*Fluid exchange, Name=Ch17_Leak1_RLeak_Bag1,
   Surface=Ch17_Ext_Skin_Surf_Bag1,
   Property=Ch17_Leak1_RLeak_Prop_Bag1
Ch17_refNode_Bag1,
**
*Fluid exchange property, Name=Ch17_Leak1_RLeak_Prop_Bag1,
   Type=ORIFICE
  3.000000e-04,
**
** Chamber 18 - Leakage 1
**
*Fluid exchange, Name=Ch18_Leak1_RLeak_Bag1,
   Surface=Ch18_Ext_Skin_Surf_Bag1,
   Property=Ch18_Leak1_RLeak_Prop_Bag1
Ch18_refNode_Bag1,
**
*Fluid exchange property, Name=Ch18_Leak1_RLeak_Prop_Bag1,
   Type=ORIFICE
  3.000000e-04,
**
** Chamber heat loss
**
** Chamber 1 - Energy leakage
**
*Fluid exchange, Name=Ch1_Energy_Leak_Bag1,
   Surface=Ch1_Ext_Skin_Surf_Bag1,
   Property=Ch1_Energy_Leak_Prop_Bag1
Ch1_refNode_Bag1,
**
*Fluid exchange property, Name=Ch1_Energy_Leak_Prop_Bag1,
   Type=ENERGY RATE LEAKAGE
  0.000000e+00,   0.000000e+00
  2.500000e+02,   5.000000e+03
**
** Chamber 2 - Energy leakage
**
*Fluid exchange, Name=Ch2_Energy_Leak_Bag1,
   Surface=Ch2_Ext_Skin_Surf_Bag1,
   Property=Ch2_Energy_Leak_Prop_Bag1
Ch2_refNode_Bag1,
**
*Fluid exchange property, Name=Ch2_Energy_Leak_Prop_Bag1,
   Type=ENERGY RATE LEAKAGE
  0.000000e+00,   0.000000e+00
  2.500000e+02,   5.000000e+03
**
** Chamber 3 - Energy leakage
**
*Fluid exchange, Name=Ch3_Energy_Leak_Bag1,
   Surface=Ch3_Ext_Skin_Surf_Bag1,
   Property=Ch3_Energy_Leak_Prop_Bag1
Ch3_refNode_Bag1,
**
*Fluid exchange property, Name=Ch3_Energy_Leak_Prop_Bag1,
   Type=ENERGY RATE LEAKAGE
  0.000000e+00,   0.000000e+00
  2.500000e+02,   5.000000e+03
**
** Chamber 4 - Energy leakage
**
*Fluid exchange, Name=Ch4_Energy_Leak_Bag1,
   Surface=Ch4_Ext_Skin_Surf_Bag1,
   Property=Ch4_Energy_Leak_Prop_Bag1
Ch4_refNode_Bag1,
**
*Fluid exchange property, Name=Ch4_Energy_Leak_Prop_Bag1,
   Type=ENERGY RATE LEAKAGE
  0.000000e+00,   0.000000e+00
  2.500000e+02,   5.000000e+03
**
** Chamber 5 - Energy leakage
**
*Fluid exchange, Name=Ch5_Energy_Leak_Bag1,
   Surface=Ch5_Ext_Skin_Surf_Bag1,
   Property=Ch5_Energy_Leak_Prop_Bag1
Ch5_refNode_Bag1,
**
*Fluid exchange property, Name=Ch5_Energy_Leak_Prop_Bag1,
   Type=ENERGY RATE LEAKAGE
  0.000000e+00,   0.000000e+00
  2.500000e+02,   5.000000e+03
**
** Chamber 6 - Energy leakage
**
*Fluid exchange, Name=Ch6_Energy_Leak_Bag1,
   Surface=Ch6_Ext_Skin_Surf_Bag1,
   Property=Ch6_Energy_Leak_Prop_Bag1
Ch6_refNode_Bag1,
**
*Fluid exchange property, Name=Ch6_Energy_Leak_Prop_Bag1,
   Type=ENERGY RATE LEAKAGE
  0.000000e+00,   0.000000e+00
  2.500000e+02,   5.000000e+03
**
** Chamber 7 - Energy leakage
**
*Fluid exchange, Name=Ch7_Energy_Leak_Bag1,
   Surface=Ch7_Ext_Skin_Surf_Bag1,
   Property=Ch7_Energy_Leak_Prop_Bag1
Ch7_refNode_Bag1,
**
*Fluid exchange property, Name=Ch7_Energy_Leak_Prop_Bag1,
   Type=ENERGY RATE LEAKAGE
  0.000000e+00,   0.000000e+00
  2.500000e+02,   5.000000e+03
**
** Chamber 8 - Energy leakage
**
*Fluid exchange, Name=Ch8_Energy_Leak_Bag1,
   Surface=Ch8_Ext_Skin_Surf_Bag1,
   Property=Ch8_Energy_Leak_Prop_Bag1
Ch8_refNode_Bag1,
**
*Fluid exchange property, Name=Ch8_Energy_Leak_Prop_Bag1,
   Type=ENERGY RATE LEAKAGE
  0.000000e+00,   0.000000e+00
  2.500000e+02,   5.000000e+03
**
** Chamber 9 - Energy leakage
**
*Fluid exchange, Name=Ch9_Energy_Leak_Bag1,
   Surface=Ch9_Ext_Skin_Surf_Bag1,
   Property=Ch9_Energy_Leak_Prop_Bag1
Ch9_refNode_Bag1,
**
*Fluid exchange property, Name=Ch9_Energy_Leak_Prop_Bag1,
   Type=ENERGY RATE LEAKAGE
  0.000000e+00,   0.000000e+00
  2.500000e+02,   5.000000e+03
**
** Chamber 10 - Energy leakage
**
*Fluid exchange, Name=Ch10_Energy_Leak_Bag1,
   Surface=Ch10_Ext_Skin_Surf_Bag1,
   Property=Ch10_Energy_Leak_Prop_Bag1
Ch10_refNode_Bag1,
**
*Fluid exchange property, Name=Ch10_Energy_Leak_Prop_Bag1,
   Type=ENERGY RATE LEAKAGE
  0.000000e+00,   0.000000e+00
  2.500000e+02,   5.000000e+03
**
** Chamber 11 - Energy leakage
**
*Fluid exchange, Name=Ch11_Energy_Leak_Bag1,
   Surface=Ch11_Ext_Skin_Surf_Bag1,
   Property=Ch11_Energy_Leak_Prop_Bag1
Ch11_refNode_Bag1,
**
*Fluid exchange property, Name=Ch11_Energy_Leak_Prop_Bag1,
   Type=ENERGY RATE LEAKAGE
  0.000000e+00,   0.000000e+00
  2.500000e+02,   5.000000e+03
**
** Chamber 12 - Energy leakage
**
*Fluid exchange, Name=Ch12_Energy_Leak_Bag1,
   Surface=Ch12_Ext_Skin_Surf_Bag1,
   Property=Ch12_Energy_Leak_Prop_Bag1
Ch12_refNode_Bag1,
**
*Fluid exchange property, Name=Ch12_Energy_Leak_Prop_Bag1,
   Type=ENERGY RATE LEAKAGE
  0.000000e+00,   0.000000e+00
  2.500000e+02,   5.000000e+03
**
** Chamber 13 - Energy leakage
**
*Fluid exchange, Name=Ch13_Energy_Leak_Bag1,
   Surface=Ch13_Ext_Skin_Surf_Bag1,
   Property=Ch13_Energy_Leak_Prop_Bag1
Ch13_refNode_Bag1,
**
*Fluid exchange property, Name=Ch13_Energy_Leak_Prop_Bag1,
   Type=ENERGY RATE LEAKAGE
  0.000000e+00,   0.000000e+00
  2.500000e+02,   5.000000e+03
**
** Chamber 14 - Energy leakage
**
*Fluid exchange, Name=Ch14_Energy_Leak_Bag1,
   Surface=Ch14_Ext_Skin_Surf_Bag1,
   Property=Ch14_Energy_Leak_Prop_Bag1
Ch14_refNode_Bag1,
**
*Fluid exchange property, Name=Ch14_Energy_Leak_Prop_Bag1,
   Type=ENERGY RATE LEAKAGE
  0.000000e+00,   0.000000e+00
  2.500000e+02,   5.000000e+03
**
** Chamber 15 - Energy leakage
**
*Fluid exchange, Name=Ch15_Energy_Leak_Bag1,
   Surface=Ch15_Ext_Skin_Surf_Bag1,
   Property=Ch15_Energy_Leak_Prop_Bag1
Ch15_refNode_Bag1,
**
*Fluid exchange property, Name=Ch15_Energy_Leak_Prop_Bag1,
   Type=ENERGY RATE LEAKAGE
  0.000000e+00,   0.000000e+00
  2.500000e+02,   5.000000e+03
**
** Chamber 16 - Energy leakage
**
*Fluid exchange, Name=Ch16_Energy_Leak_Bag1,
   Surface=Ch16_Ext_Skin_Surf_Bag1,
   Property=Ch16_Energy_Leak_Prop_Bag1
Ch16_refNode_Bag1,
**
*Fluid exchange property, Name=Ch16_Energy_Leak_Prop_Bag1,
   Type=ENERGY RATE LEAKAGE
  0.000000e+00,   0.000000e+00
  2.500000e+02,   5.000000e+03
**
** Chamber 17 - Energy leakage
**
*Fluid exchange, Name=Ch17_Energy_Leak_Bag1,
   Surface=Ch17_Ext_Skin_Surf_Bag1,
   Property=Ch17_Energy_Leak_Prop_Bag1
Ch17_refNode_Bag1,
**
*Fluid exchange property, Name=Ch17_Energy_Leak_Prop_Bag1,
   Type=ENERGY RATE LEAKAGE
  0.000000e+00,   0.000000e+00
  2.500000e+02,   5.000000e+03
**
** Chamber 18 - Energy leakage
**
*Fluid exchange, Name=Ch18_Energy_Leak_Bag1,
   Surface=Ch18_Ext_Skin_Surf_Bag1,
   Property=Ch18_Energy_Leak_Prop_Bag1
Ch18_refNode_Bag1,
**
*Fluid exchange property, Name=Ch18_Energy_Leak_Prop_Bag1,
   Type=ENERGY RATE LEAKAGE
  0.000000e+00,   0.000000e+00
  2.500000e+02,   5.000000e+03
**
** Chamber inflators
**
** Chamber 1 - Inflator 1
**
**
***********************************************************
** ADD FLUID INFLATOR DEFINITION
**
**
**
**
*Fluid inflator property, Name=Ch1_Inflator1_Prop_Bag1,
   Type=TEMPERATURE AND MASS
**
  0.000000e+00,   0.000000e+00,   0.000000e+00
  1.000000e-04,   0.000000e+00,   0.000000e+00
  2.000000e-04,   0.000000e+00,   0.000000e+00
  3.000000e-04,   0.000000e+00,   0.000000e+00
  4.000000e-04,   0.000000e+00,   0.000000e+00
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  1.000000e+00,   1.665000e+02,   0.000000e+00
**
*Fluid inflator mixture, Number species=6, Type=MOLAR FRACTION
O2, CO2, AR, N2, HE, N2O
**
  0.000000e+00,   1.000000e+00,   0.000000e+00,   0.000000e+00,   0.000000e+00,   0.000000e+00,   0.000000e+00
  1.000000e-04,   1.000000e+00,   0.000000e+00,   0.000000e+00,   0.000000e+00,   0.000000e+00,   0.000000e+00
  2.000000e-04,   1.000000e+00,   0.000000e+00,   0.000000e+00,   0.000000e+00,   0.000000e+00,   0.000000e+00
  3.000000e-04,   1.000000e+00,   0.000000e+00,   0.000000e+00,   0.000000e+00,   0.000000e+00,   0.000000e+00
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  1.000000e+00,   2.400000e-02,   7.810000e-02,   6.283000e-01,   4.820000e-02,   8.980000e-02,   1.316000e-01
**
** Chamber 6 - Inflator 1
**
*Fluid inflator, Name=Ch6_Inflator1_Bag1,
   Property=Ch6_Inflator1_Prop_Bag1
100000006,
**
*Fluid inflator property, Name=Ch6_Inflator1_Prop_Bag1,
   Type=TEMPERATURE AND MASS
**
  0.000000e+00,   0.000000e+00,   0.000000e+00
  1.000000e-04,   0.000000e+00,   0.000000e+00
  2.000000e-04,   0.000000e+00,   0.000000e+00
  3.000000e-04,   0.000000e+00,   0.000000e+00
  4.000000e-04,   0.000000e+00,   0.000000e+00
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  1.000000e+00,   1.665000e+02,   0.000000e+00
**
*Fluid inflator mixture, Number species=6, Type=MOLAR FRACTION
O2, CO2, AR, N2, HE, N2O
**
  0.000000e+00,   1.000000e+00,   0.000000e+00,   0.000000e+00,   0.000000e+00,   0.000000e+00,   0.000000e+00
  1.000000e-04,   1.000000e+00,   0.000000e+00,   0.000000e+00,   0.000000e+00,   0.000000e+00,   0.000000e+00
  2.000000e-04,   1.000000e+00,   0.000000e+00,   0.000000e+00,   0.000000e+00,   0.000000e+00,   0.000000e+00
  3.000000e-04,   1.000000e+00,   0.000000e+00,   0.000000e+00,   0.000000e+00,   0.000000e+00,   0.000000e+00
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  1.000000e+00,   2.400000e-02,   7.810000e-02,   6.283000e-01,   4.820000e-02,   8.980000e-02,   1.316000e-01
**
*Amplitude, Name=Amp_Ch6_Inflator1_Bag1
  0.000000e+00,   0.000000e+00,   6.999990e-03,   0.000000e+00,   7.000000e-03,   1.000000e+00
**
** Chamber 9 - Inflator 1
**
*Fluid inflator, Name=Ch9_Inflator1_Bag1,
   Property=Ch9_Inflator1_Prop_Bag1
100000009,
**
*Fluid inflator property, Name=Ch9_Inflator1_Prop_Bag1,
   Type=TEMPERATURE AND MASS
**
  0.000000e+00,   0.000000e+00,   0.000000e+00
  1.000000e-04,   0.000000e+00,   0.000000e+00
  2.000000e-04,   0.000000e+00,   0.000000e+00
  3.000000e-04,   0.000000e+00,   0.000000e+00
  4.000000e-04,   0.000000e+00,   0.000000e+00
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  1.000000e+00,   1.665000e+02,   0.000000e+00
**
*Fluid inflator mixture, Number species=6, Type=MOLAR FRACTION
O2, CO2, AR, N2, HE, N2O
**
  0.000000e+00,   1.000000e+00,   0.000000e+00,   0.000000e+00,   0.000000e+00,   0.000000e+00,   0.000000e+00
  1.000000e-04,   1.000000e+00,   0.000000e+00,   0.000000e+00,   0.000000e+00,   0.000000e+00,   0.000000e+00
  2.000000e-04,   1.000000e+00,   0.000000e+00,   0.000000e+00,   0.000000e+00,   0.000000e+00,   0.000000e+00
  3.000000e-04,   1.000000e+00,   0.000000e+00,   0.000000e+00,   0.000000e+00,   0.000000e+00,   0.000000e+00
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  1.000000e+00,   2.400000e-02,   7.810000e-02,   6.283000e-01,   4.820000e-02,   8.980000e-02,   1.316000e-01
**
*Amplitude, Name=Amp_Ch9_Inflator1_Bag1
  0.000000e+00,   0.000000e+00,   7.999990e-03,   0.000000e+00,   8.000000e-03,   1.000000e+00
**
** Reference node set for all chambers
**
*Nset, Nset=RefNodes_Bag1
Ch1_refNode_Bag1,
Ch2_refNode_Bag1,
Ch3_refNode_Bag1,
Ch4_refNode_Bag1,
Ch5_refNode_Bag1,
Ch6_refNode_Bag1,
Ch7_refNode_Bag1,
Ch8_refNode_Bag1,
Ch9_refNode_Bag1,
Ch10_refNode_Bag1,
Ch11_refNode_Bag1,
Ch12_refNode_Bag1,
Ch13_refNode_Bag1,
Ch14_refNode_Bag1,
Ch15_refNode_Bag1,
Ch16_refNode_Bag1,
Ch17_refNode_Bag1,
Ch18_refNode_Bag1,
**
** Reference node set for all airbags
**
*Nset, Nset=Airbags_RefNodes
RefNodes_Bag1,
**
** Chamber wall openings for all airbags
**
*Surface, Name=Wall_Opening_Exclusions, Type=ELEMENT
P22;Wall_22,
P23;Wall_23,
P24;Wall_24,
P25;Wall_25,
P26;Wall_26,
P27;Wall_27,
P28;Wall_28,
P29;Wall_29,
P30;Wall_30,
P31;Wall_31,
P32;Wall_32,
P33;Wall_33,
P34;Wall_34,
P35;Wall_35,
P36;Wall_36,
P37;Wall_37,
P38;Wall_38,
P39;Wall_39,
P40;Wall_40,
P20;Durchstromoeffnung_1
P21;Durchstromoeffnung_2
**
** --------------------  G A S    S P E C I E S    D A T A  --------------------
**
** Fluid Cavity Behavior Definitions
**
** Gas species: 'AIR'
**
*Fluid behavior, Name=AIR
**
*Capacity, Type=POLYNOMIAL
  2.811000e+04,   1.967000e+00,   4.802000e-03,   0.000000e+00,   0.000000e+00
**
*Molecular weight
  2.897000e-05,
**
** Gas species: 'O2'
**
*Fluid behavior, Name=O2
**
*Capacity, Type=POLYNOMIAL
  2.572300e+04,   1.298000e+01,  -3.860000e-03,   0.000000e+00,   0.000000e+00
**
*Molecular weight
  3.200000e-05,
**
** Gas species: 'CO2'
**
*Fluid behavior, Name=CO2
**
*Capacity, Type=POLYNOMIAL
  2.599900e+04,   4.350000e+01,  -1.480000e-02,   0.000000e+00,   0.000000e+00
**
*Molecular weight
  4.401000e-05,
**
** Gas species: 'H2O'
**
*Fluid behavior, Name=H2O
**
*Capacity, Type=POLYNOMIAL
  3.220000e+04,   1.900000e+00,   1.060000e-02,   0.000000e+00,   0.000000e+00
**
*Molecular weight
  1.802000e-05,
**
** Gas species: 'AR'
**
*Fluid behavior, Name=AR
**
*Capacity, Type=POLYNOMIAL
  2.078500e+04,   0.000000e+00,   0.000000e+00,   0.000000e+00,   0.000000e+00
**
*Molecular weight
  3.995000e-05,
**
** Gas species: 'N2'
**
*Fluid behavior, Name=N2
**
*Capacity, Type=POLYNOMIAL
  2.729600e+04,   5.230000e+00,   0.000000e+00,   0.000000e+00,   0.000000e+00
**
*Molecular weight
  2.801000e-05,
**
** Gas species: 'HE'
**
*Fluid behavior, Name=HE
**
*Capacity, Type=POLYNOMIAL
  2.078500e+04,   0.000000e+00,   0.000000e+00,   0.000000e+00,   0.000000e+00
**
*Molecular weight
  4.003000e-06,
**
** Gas species: 'N2O'
**
*Fluid behavior, Name=N2O
**
*Capacity, Type=POLYNOMIAL
  2.518800e+04,   5.210000e+01,  -2.000000e-02,   0.000000e+00,   0.000000e+00
**
*Molecular weight
  4.401000e-05,
**
** -------------  B O U N D A R Y    C O N D I T I O N    D A T A  -------------
**
** Displacement Boundary Condition 2
**
*Boundary, Type=DISPLACEMENT
99999999,        1,        6
**
** Displacement Boundary Condition 4
**
*Boundary, Type=DISPLACEMENT
50005000,        1,        6
**
**
** Displacement Boundary Condition 10
**
*Boundary, Type=DISPLACEMENT
   30999,        1,        6
**
** fixierung
**
*Boundary, Type=DISPLACEMENT
   11003,        1,        3
**
** Displacement Boundary Condition 12
**
*Boundary, Type=DISPLACEMENT
   11001,        1,        3
**
** Displacement Boundary Condition 13
**
*Boundary, Type=DISPLACEMENT
   11005,        1,        3
**
** Displacement Boundary Condition 14
**
*Boundary, Type=DISPLACEMENT
   11002,        1,        3
**
** Displacement Boundary Condition 15
**
*Boundary, Type=DISPLACEMENT
   11006,        1,        3
**
** Displacement Boundary Condition 16
**
*Boundary, Type=DISPLACEMENT
   11004,        1,        3
**
** Displacement Boundary Condition 17
**
*Boundary, Type=DISPLACEMENT
    1873,        1,        3
**
** Displacement Boundary Condition 18
**
*Boundary, Type=DISPLACEMENT
    1877,        1,        3
**
** Displacement Boundary Condition 19
**
*Boundary, Type=DISPLACEMENT
    2643,        1,        3
**
** Displacement Boundary Condition 20
**
*Boundary, Type=DISPLACEMENT
    2676,        1,        3
**
** Displacement Boundary Condition 21
**
*Boundary, Type=DISPLACEMENT
    2642,        1,        3
**
** Displacement Boundary Condition 22
**
*Boundary, Type=DISPLACEMENT
    2675,        1,        3
**
** Displacement Boundary Condition 23
**
*Boundary, Type=DISPLACEMENT
    1872,        1,        3
**
** Displacement Boundary Condition 24
**
*Boundary, Type=DISPLACEMENT
    1876,        1,        3
**
** Displacement Boundary Condition 25
**
*Boundary, Type=DISPLACEMENT
    6586,        1,        3
**
** Displacement Boundary Condition 26
**
*Boundary, Type=DISPLACEMENT
    6585,        1,        3
**
** Displacement Boundary Condition 27
**
*Boundary, Type=DISPLACEMENT
    6618,        1,        3
**
** Displacement Boundary Condition 28
**
*Boundary, Type=DISPLACEMENT
    6619,        1,        3
**
** Displacement Boundary Condition 29
**
*Boundary, Type=DISPLACEMENT
     418,        1,        3
**
** Displacement Boundary Condition 30
**
*Boundary, Type=DISPLACEMENT
     410,        1,        3
**
** Displacement Boundary Condition 31
**
*Boundary, Type=DISPLACEMENT
     419,        1,        3
**
** Displacement Boundary Condition 32
**
*Boundary, Type=DISPLACEMENT
     411,        1,        3
**
** Displacement Boundary Condition 33
**
*Boundary, Type=DISPLACEMENT
     426,        1,        3
**
** Displacement Boundary Condition 34
**
*Boundary, Type=DISPLACEMENT
     420,        1,        3
**
** Displacement Boundary Condition 35
**
*Boundary, Type=DISPLACEMENT
    1182,        1,        3
**
** Displacement Boundary Condition 36
**
*Boundary, Type=DISPLACEMENT
    1146,        1,        3
**
** Displacement Boundary Condition 37
**
*Boundary, Type=DISPLACEMENT
    1147,        1,        3
**
** Displacement Boundary Condition 38
**
*Boundary, Type=DISPLACEMENT
    1183,        1,        3
**
** Displacement Boundary Condition 39
**
*Boundary, Type=DISPLACEMENT
       5,        1,        3
**
** Displacement Boundary Condition 40
**
*Boundary, Type=DISPLACEMENT
       8,        1,        3
**
** Displacement Boundary Condition 41
**
*Boundary, Type=DISPLACEMENT
       9,        1,        3
**
** Displacement Boundary Condition 42
**
*Boundary, Type=DISPLACEMENT
       4,        1,        3
**
** ------------------  N O D A L    D A M P I N G    D A T A  ------------------
**
** Contact 1 - type 37
**
*Amplitude, Name=Amp_Damping_1_VBF
   0.000000e+00,   1.000000e+04,   9.999999e-04,   1.000000e+04,   1.000000e-03,   0.000000e+00
**
** Contact 1 - type 37
**
*Amplitude, Name=Amp_Damping_2_VBF
  0.000000e+00,   0.000000e+00,   9.999999e-04,   0.000000e+00,   1.000000e-03,   1.000000e+02,   9.999999e-03,   1.000000e+02,
  1.000000e-02,   0.000000e+00
**
**
**
** -----------------  I N I T I A L    A I R B A G    D A T A  -----------------
**
*Initial conditions, Type=FLUID PRESSURE
Ch1_refNode_Bag1,   0.000000e+00
Ch2_refNode_Bag1,   0.000000e+00
Ch3_refNode_Bag1,   0.000000e+00
Ch4_refNode_Bag1,   0.000000e+00
Ch5_refNode_Bag1,   0.000000e+00
Ch6_refNode_Bag1,   0.000000e+00
Ch7_refNode_Bag1,   0.000000e+00
Ch8_refNode_Bag1,   0.000000e+00
Ch9_refNode_Bag1,   0.000000e+00
Ch10_refNode_Bag1,   0.000000e+00
Ch11_refNode_Bag1,   0.000000e+00
Ch12_refNode_Bag1,   0.000000e+00
Ch13_refNode_Bag1,   0.000000e+00
Ch14_refNode_Bag1,   0.000000e+00
Ch15_refNode_Bag1,   0.000000e+00
Ch16_refNode_Bag1,   0.000000e+00
Ch17_refNode_Bag1,   0.000000e+00
Ch18_refNode_Bag1,   0.000000e+00
**
*Initial conditions, Type=TEMPERATURE
Ch1_refNode_Bag1,   2.950000e+02
Ch2_refNode_Bag1,   2.950000e+02
Ch3_refNode_Bag1,   2.950000e+02
Ch4_refNode_Bag1,   2.950000e+02
Ch5_refNode_Bag1,   2.950000e+02
Ch6_refNode_Bag1,   2.950000e+02
Ch7_refNode_Bag1,   2.950000e+02
Ch8_refNode_Bag1,   2.950000e+02
Ch9_refNode_Bag1,   2.950000e+02
Ch10_refNode_Bag1,   2.950000e+02
Ch11_refNode_Bag1,   2.950000e+02
Ch12_refNode_Bag1,   2.950000e+02
Ch13_refNode_Bag1,   2.950000e+02
Ch14_refNode_Bag1,   2.950000e+02
Ch15_refNode_Bag1,   2.950000e+02
Ch16_refNode_Bag1,   2.950000e+02
Ch17_refNode_Bag1,   2.950000e+02
Ch18_refNode_Bag1,   2.950000e+02
**
** ---------  I N I T I A L    R E F E R E N C E - M E S H    D A T A  ---------
**
*Initial conditions, Type=REF COORDINATE, Input=w_sidecurtain_airbag_refmesh.inp
****
**------------------ramping initial stresses------------------**********
*AMPLITUDE, NAME = RampStress, DEFINITION = Smooth Step,time=total time
0.0, 0.0,      0.005, 1.0,       1.0, 1.0
***********
*AMPLITUDE, NAME=inflator_activation_delay, DEFINITION=TABULAR
      0.0, 0.0,4.99999e-3,0.0,5.0e-3,1.0,    1.0, 1.0
**
** /////////////////////  H I S T O R Y     S E C T I O N  /////////////////////
**
*Step
Step-1
**
*Dynamic, Explicit, Element by element
 ,  1.001000e-01
**
** ------------  C O N T A C T    I N T E R A C T I O N    D A T A  ------------
**
*Contact
**
*Contact inclusions, All exterior
**
**
*Contact exclusions
Wall_Opening_Exclusions,
 , Wall_Opening_Exclusions
**
*Contact property assignment
Contact_1000004_Secondary, Contact_1000004_Main, Contact_1000004_Prop
Contact_1000010_Self, Contact_1000010_Self, Contact_1000010_Prop
Contact_1000003_Secondary, Contact_1000003_Main, Contact_1000003_Prop
**
*Surface property assignment, Property=THICKNESS
Contact_1000005_Self,     1.500000e+00, 1.
Contact_1000004_Secondary,    8.000000e-01, 1.
Contact_1000004_Main,   8.000000e-01, 1.
Contact_1000011_Self,     8.000000e-01, 1.
Contact_1000003_Secondary,    8.000000e-01, 1.
Contact_1000003_Main,   8.000000e-01, 1.
Contact_1000010_Self,     8.000000e-01, 1.
**
***********************************************************
** ADD ADDITIONAL SURFACE PROPERTY ASSIGNMENT DEFINITION
**
**
**
***********************************************************
** ADD CONTACT CONTROLS ASSIGNMENT DEFINITIONS
**
**
**
**
** --------------  F L U I D    I N T E R A C T I O N    D A T A  --------------
**
** Inflatable Curtain Autoliv
**
** Fluid exchange between chambers
**
*Fluid exchange activation
WO_1_3_P23_Bag1,
WO_1_4_P26_Bag1,
WO_1_4_P27_Bag1,
WO_2_16_P24_Bag1,
WO_3_17_P25_Bag1,
WO_4_6_P28_Bag1,
WO_4_5_P29_Bag1,
WO_5_15_P30_Bag1,
WO_6_9_P31_Bag1,
WO_6_9_P32_Bag1,
WO_6_7_P33_Bag1,
WO_7_8_P34_Bag1,
WO_9_12_P35_Bag1,
WO_10_9_P36_Bag1,
WO_10_11_P37_Bag1,
WO_13_12_P38_Bag1,
WO_14_13_P39_Bag1,
WO_18_1_P40_Bag1,
WO_18_2_P22_Bag1,
**
** Fluid exchange due to leakage from the airbag
**
*Fluid exchange activation
Ch1_Leak1_RLeak_Bag1,
Ch2_Leak1_RLeak_Bag1,
Ch3_Leak1_RLeak_Bag1,
Ch4_Leak1_RLeak_Bag1,
Ch5_Leak1_RLeak_Bag1,
Ch6_Leak1_RLeak_Bag1,
Ch7_Leak1_RLeak_Bag1,
Ch8_Leak1_RLeak_Bag1,
Ch9_Leak1_RLeak_Bag1,
Ch10_Leak1_RLeak_Bag1,
Ch11_Leak1_RLeak_Bag1,
Ch12_Leak1_RLeak_Bag1,
Ch13_Leak1_RLeak_Bag1,
Ch14_Leak1_RLeak_Bag1,
Ch15_Leak1_RLeak_Bag1,
Ch16_Leak1_RLeak_Bag1,
Ch17_Leak1_RLeak_Bag1,
Ch18_Leak1_RLeak_Bag1,
**
** Chamber heat loss
**
*Fluid exchange activation
Ch1_Energy_Leak_Bag1,
Ch2_Energy_Leak_Bag1,
Ch3_Energy_Leak_Bag1,
Ch4_Energy_Leak_Bag1,
Ch5_Energy_Leak_Bag1,
Ch6_Energy_Leak_Bag1,
Ch7_Energy_Leak_Bag1,
Ch8_Energy_Leak_Bag1,
Ch9_Energy_Leak_Bag1,
Ch10_Energy_Leak_Bag1,
Ch11_Energy_Leak_Bag1,
Ch12_Energy_Leak_Bag1,
Ch13_Energy_Leak_Bag1,
Ch14_Energy_Leak_Bag1,
Ch15_Energy_Leak_Bag1,
Ch16_Energy_Leak_Bag1,
Ch17_Energy_Leak_Bag1,
Ch18_Energy_Leak_Bag1,
**
** Fluid inflation
**
***********************************************************
** ADD FLUID INFLATOR INTERACTION DEFINITION
**
**
**
*Fluid inflator Activation, Inflation time amplitude=Amp_Ch6_Inflator1_Bag1
Ch6_Inflator1_Bag1,
**
*Fluid inflator Activation, Inflation time amplitude=Amp_Ch9_Inflator1_Bag1
Ch9_Inflator1_Bag1,
**
** ---------  D A M P I N G    D I S T R I B U T E D    L O A D I N G  ---------
**
*Dload, Amplitude=Amp_Damping_1_VBF
P1;Chamber_1, VBF,   7.830000e-10
P2;Chamber_2, VBF,   7.830000e-10
P3;Chamber_3, VBF,   7.830000e-10
P4;Chamber_4, VBF,   7.830000e-10
P5;Chamber_5, VBF,   7.830000e-10
P6;Chamber_6, VBF,   7.830000e-10
P7;Chamber_7, VBF,   7.830000e-10
P8;Chamber_8, VBF,   7.830000e-10
P9;Chamber_9, VBF,   7.830000e-10
P10;Chamber_10, VBF,   7.830000e-10
P11;Chamber_11, VBF,   7.830000e-10
P12;Chamber_12, VBF,   7.830000e-10
P13;Chamber_13, VBF,   7.830000e-10
P14;Chamber_14, VBF,   7.830000e-10
P15;Chamber_15, VBF,   7.830000e-10
P16;Chamber_16, VBF,   7.830000e-10
P17;Chamber_17, VBF,   7.830000e-10
P18;Chamber_18, VBF,   7.830000e-10
P19;Saum, VBF,   7.830000e-10
P51;Gewebe_Lanzenende, VBF,   7.830000e-10
P52;Gewebe_Lanzenende, VBF,   7.830000e-10
**
*Dload, Amplitude=Amp_Damping_2_VBF
P1;Chamber_1, VBF,   7.830000e-10
P2;Chamber_2, VBF,   7.830000e-10
P3;Chamber_3, VBF,   7.830000e-10
P4;Chamber_4, VBF,   7.830000e-10
P5;Chamber_5, VBF,   7.830000e-10
P6;Chamber_6, VBF,   7.830000e-10
P7;Chamber_7, VBF,   7.830000e-10
P8;Chamber_8, VBF,   7.830000e-10
P9;Chamber_9, VBF,   7.830000e-10
P10;Chamber_10, VBF,   7.830000e-10
P11;Chamber_11, VBF,   7.830000e-10
P12;Chamber_12, VBF,   7.830000e-10
P13;Chamber_13, VBF,   7.830000e-10
P14;Chamber_14, VBF,   7.830000e-10
P15;Chamber_15, VBF,   7.830000e-10
P16;Chamber_16, VBF,   7.830000e-10
P17;Chamber_17, VBF,   7.830000e-10
P18;Chamber_18, VBF,   7.830000e-10
P19;Saum, VBF,   7.830000e-10
P51;Gewebe_Lanzenende, VBF,   7.830000e-10
P52;Gewebe_Lanzenende, VBF,   7.830000e-10
**
** ----------------------  O U T P U T     R E Q U E S T  ----------------------
**
** Default output requests
**
*Output, Field, time interval=0.002, time marks=yes
*Node output
*** U, V, A
U,
**
*Element output
*** LE, S, EDT, ELEDEN, SFABRIC, EFABRIC
LE, S, SFABRIC, EFABRIC
**
*** *Contact output, General contact
*** CSTRESS, CFORCE
*output, diagnostics=no
***
*Output, History, TIME INTERVAL=1E-005, FILTER=ANTIALIASING
*Node output, Nset=Airbags_RefNodes
PCAV, CVOL, CTEMP, CSAREA, CMASS, CMF, CMFL, CMFLT, MINFL, MINFLT, TINFL
APCAV, TCVOL, ACTEMP, TCMASS
**
*Energy output, Variable=ALL
**
*Incrementation output
DT,
**
**
*Restart, Write, Number interval=50, Overlay
**
*End step
