**
** ///////////////////////  M O D E L     S E C T I O N  ///////////////////////
**
**
*HEADING
Side curtain airbag deployment test using the LKM method
**
** --------------------  N O D A L    P O I N T    D A T A  --------------------
**
*Node
         1,   4.866140e+02,  -5.216643e+02,   9.435117e+02
         2,   4.862254e+02,  -5.279949e+02,   9.472341e+02
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**
** --------  T R A N S F O R M E D    N O D A L    P O I N T    D A T A  -------
**
** Transformation: Transformation Platte
**
*Node, Nset=Transform_Block_1
  50000001,   1.811000e+03,  -5.880001e+02,   1.562000e+03
  50000002,   1.761000e+03,  -5.880001e+02,   1.562000e+03
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**
** Transformation: Transformation HI
**
*Node, Nset=Transform_Block_2
  10000001,   1.361000e+03,  -2.269979e+02,   1.127889e+03
  10000002,   1.361000e+03,  -2.269979e+02,   1.147389e+03
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**
** -------  G E N E R A T E D    N O D A L     P O I N T    D A T A  -----------
**
*Node
 100000000,   0.000000e+00,   0.000000e+00,   0.000000e+00
 100000001,   2.030069e+03,  -5.150977e+02,   1.253397e+03
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**
** ------------------------  E L E M E N T     D A T A  ------------------------
**
**
*Element, Type=SFM3D3, Elset=P20;Durchstromoeffnung_1
   11007,     2448,     6391,    10334
   11009,    10335,     6392,     2449
**
*Element, Type=SFM3D4R, Elset=P20;Durchstromoeffnung_1
   11008,    10334,     6391,     6392,    10335
**
*Surface section, Elset=P20;Durchstromoeffnung_1, Density=  2.349000e-10
**
*Element, Type=SFM3D3, Elset=P21;Durchstromoeffnung_2
   11010,     1880,     6651,     2708
   11012,     2709,     6652,     1881
**
*Element, Type=SFM3D4R, Elset=P21;Durchstromoeffnung_2
   11011,     2708,     6651,     6652,     2709
**
*Surface section, Elset=P21;Durchstromoeffnung_2, Density=  2.349000e-10
**
**
*Element, Type=SFM3D3, Elset=P201;Lanze
   36541,    17012,    17015,    17011
   36542,    17012,    17004,    17003
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**
*Element, Type=SFM3D4R, Elset=P201;Lanze
   36480,    17116,    17117,    17127,    17126
   36481,    17117,    17118,    17128,    17127
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**
*Surface section, Elset=P201;Lanze, Density=  4.698000e-09
**
*Element, Type=SFM3D4R, Elset=P50000001;Platte
50000001, 50000115, 50000116, 50000135, 50000134
50000002, 50000116, 50000117, 50000136, 50000135
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**
*Surface section, Elset=P50000001;Platte, Density=  2.340000e-10
**
*Element, Type=SFM3D4R, Elset=P80000000;Rahmen
80000001, 80000044, 80000043, 80000083, 80000045
80000002, 80000043, 80000042, 80000041, 80000083
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**
*Surface section, Elset=P80000000;Rahmen, Density=  1.080000e-09
**
*Element, Type=SFM3D4R, Elset=P80000005;Halterungen
80003377, 80003360, 80003409, 80003412, 80000794
80003378, 80000794, 80003412, 80003408, 80001279
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**
*Surface section, Elset=P80000005;Halterungen, Density=  1.080000e-09
**
*Element, Type=SFM3D3, Elset=P80000010;U-Halter
80003454, 80003438, 80003457, 80003460
80003481, 80003468, 80003691, 80003467
80003628, 80003452, 80003447, 80003586
80003629, 80003586, 80003577, 80003452
80003631, 80003471, 80003554, 80003454
80003642, 80003441, 80003439, 80003690
80003648, 80003512, 80003533, 80003691
**
*Element, Type=SFM3D4R, Elset=P80000010;U-Halter
80003449, 80003477, 80003478, 80003479, 80003468
80003450, 80003440, 80003441, 80003472, 80003654
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**
*Surface section, Elset=P80000010;U-Halter, Density=  2.340000e-10
**
*Element, Type=M3D3, Elset=P1;Chamber_1
     202,     2286,     5218,     2297
     206,     2301,     5284,     2305
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**
*Membrane section, controls=sc1-rampStress, Elset=P1;Chamber_1, Material=fabric
  3.500000e-01,
**
*Element, Type=M3D3, Elset=P2;Chamber_2
     232,     2370,     5846,     2377
     255,     2443,     6383,     2425
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**
*Membrane section, controls=sc1-rampStress, Elset=P2;Chamber_2, Material=fabric
  3.500000e-01,
**
*Element, Type=M3D3, Elset=P3;Chamber_3
     188,     2262,     5171,     2280
     196,     2274,     5190,     2291
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**
*Membrane section, controls=sc1-rampStress, Elset=P3;Chamber_3, Material=fabric
  3.500000e-01,
**
*Element, Type=M3D3, Elset=P4;Chamber_4
     138,     2141,     4670,     2137
     148,     2160,     4709,     2151
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**
*Membrane section, controls=sc1-rampStress, Elset=P4;Chamber_4, Material=fabric
  3.500000e-01,
**
*Element, Type=M3D3, Elset=P5;Chamber_5
     149,     2152,     4710,     2169
     162,     2204,     4983,     2191
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**
*Membrane section, controls=sc1-rampStress, Elset=P5;Chamber_5, Material=fabric
  3.500000e-01,
**
*Element, Type=M3D3, Elset=P6;Chamber_6
     104,     2063,     4107,     2059
     108,     2073,     4174,     2070
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**
*Membrane section, controls=sc1-rampStress, Elset=P6;Chamber_6, Material=fabric
  3.500000e-01,
**
*Element, Type=M3D3, Elset=P7;Chamber_7
     101,     2051,     4035,     2056
     105,     2060,     4108,     2065
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**
*Membrane section, controls=sc1-rampStress, Elset=P7;Chamber_7, Material=fabric
  3.500000e-01,
**
*Element, Type=M3D3, Elset=P8;Chamber_8
      88,     2031,     3915,     2021
      90,     2040,     3948,     2032
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**
*Membrane section, controls=sc1-rampStress, Elset=P8;Chamber_8, Material=fabric
  3.500000e-01,
**
*Element, Type=M3D3, Elset=P9;Chamber_9
      70,     1950,     2899,     1942
      98,     2055,     3999,     2049
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**
*Membrane section, controls=sc1-rampStress, Elset=P9;Chamber_9, Material=fabric
  3.500000e-01,
**
*Element, Type=M3D3, Elset=P10;Chamber_10
      71,     1945,     2910,     1955
      94,     2050,     3966,     2042
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**
*Membrane section, controls=sc1-rampStress, Elset=P10;Chamber_10, Material=fabric
  3.500000e-01,
**
*Element, Type=M3D3, Elset=P11;Chamber_11
      60,     1930,     2840,     1915
      68,     1940,     2866,     1930
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**
*Membrane section, controls=sc1-rampStress, Elset=P11;Chamber_11, Material=fabric
  3.500000e-01,
**
*Element, Type=M3D3, Elset=P12;Chamber_12
      23,     1850,     2497,     1855
      28,     1854,     2521,     1857
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**
*Membrane section, controls=sc1-rampStress, Elset=P12;Chamber_12, Material=fabric
  3.500000e-01,
**
*Element, Type=M3D3, Elset=P13;Chamber_13
      13,     1830,     2466,     1846
      18,     1841,     2477,     1852
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**
*Membrane section, controls=sc1-rampStress, Elset=P13;Chamber_13, Material=fabric
  3.500000e-01,
**
*Element, Type=M3D3, Elset=P14;Chamber_14
      16,     1847,     2476,     1840
      21,     1853,     2496,     1849
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**
*Membrane section, controls=sc1-rampStress, Elset=P14;Chamber_14, Material=fabric
  3.500000e-01,
**
*Element, Type=M3D3, Elset=P15;Chamber_15
     139,     2138,     4671,     2148
     141,     2138,     2139,     4672
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**
*Membrane section, controls=sc1-rampStress, Elset=P15;Chamber_15, Material=fabric
  3.500000e-01,
**
*Element, Type=M3D3, Elset=P16;Chamber_16
     219,     2356,     5768,     2342
     225,     2367,     5796,     2357
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**
*Membrane section, controls=sc1-rampStress, Elset=P16;Chamber_16, Material=fabric
  3.500000e-01,
**
*Element, Type=M3D3, Elset=P17;Chamber_17
     180,     2254,     5159,     2267
     183,     2268,     5162,     2257
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**
*Membrane section, controls=sc1-rampStress, Elset=P17;Chamber_17, Material=fabric
  3.500000e-01,
**
*Element, Type=M3D3, Elset=P18;Chamber_18
     231,     2375,     5845,     2369
     242,     2405,     6323,     2410
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**
*Membrane section, controls=sc1-rampStress, Elset=P18;Chamber_18, Material=fabric
  3.500000e-01,
**
*Element, Type=M3D3, Elset=P19;Saum
       1,        1,        4,        3
       2,        6,        5,        2
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**
*Membrane section, controls=sc1-rampStress, Elset=P19;Saum, Material=fabric
  3.500000e-01,
**
*Element, Type=M3D3, Elset=P51;Gewebe_Lanzenende
     589,     1859,     2548,     2578
     590,     2548,     2549,     2579
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**
*Membrane section, controls=sc1-rampStress, Elset=P51;Gewebe_Lanzenende, Material=fabric
  3.500000e-01,
**
*Element, Type=M3D3, Elset=P52;Gewebe_Lanzenende
    6531,     1859,     1864,     6521
    6532,     6491,     6521,     6522
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**
*Membrane section, controls=sc1-rampStress, Elset=P52;Gewebe_Lanzenende, Material=fabric
  3.500000e-01,
**
*Element, Type=CONN3D2, Elset=P50;BAR___PID________7_&_MID________2
   11001,     2464,    11001
   11002,    10350,    11002
   11003,     6407,    11003
   11004,    10351,    11004
   11005,     6408,    11005
   11006,     2465,    11006
**
*Connector section, Elset=P50;BAR___PID________7_&_MID________2, Behavior=Bar_M203_50
Axial,
**
***********************************************************
** SECTION CONTROLS
**
*SECTION CONTROLS,NAME=sc1-rampStress,HOURGLASS=STIFFNESS,RAMP INITIAL STRESS=RampStress
,,,3.0
**
**
** -----------------------  M A T E R I A L     D A T A  -----------------------
*Material, Name=Fabric
*Density
  7.830000e-10,
*Damping, Beta=1.e-6
*Fabric, stress free initial slack=yes
*Uniaxial, Component=1
*Loading data, regularize=off
 -2.220000e+01,  -1.000000e+00
 -1.776000e+01,  -9.000000e-01
 -2.220000e-03,  -5.000000e-01
  0.000000e+00,   0.000000e+00
  1.776000e+01,   1.000000e-01
*Uniaxial, Component=2
*Loading data, regularize=off
 -2.810000e+01,  -1.000000e+00
 -2.248000e+01,  -9.000000e-01
 -2.810000e-03,  -5.000000e-01
  0.000000e+00,   0.000000e+00
  2.248000e+01,   1.000000e-01
*Uniaxial, Component=shear
*Loading data, regularize=off
   0.000000,    0.0000000
   4.942772,    0.5235988
  54.370496,    1.5707963
**
** Durchstromoeffnung 1
**
*Material, Name=Elastic_M100_20
*Density
  7.830000e-10,
*Elastic
  2.500000e+02,   3.000000e-01
**
** Durchstromoeffnung 2
**
*Material, Name=Elastic_M100_21
*Density
  7.830000e-10,
*Elastic
  2.500000e+02,   3.000000e-01
**
** Wall 22
**
*Material, Name=Elastic_M100_22
*Density
  7.830000e-10,
*Elastic
  2.500000e+02,   3.000000e-01
**
** Wall 23
**
*Material, Name=Elastic_M100_23
*Density
  7.830000e-10,
*Elastic
  2.500000e+02,   3.000000e-01
**
** Wall 24
**
*Material, Name=Elastic_M100_24
*Density
  7.830000e-10,
*Elastic
  2.500000e+02,   3.000000e-01
**
** Wall 25
**
*Material, Name=Elastic_M100_25
*Density
  7.830000e-10,
*Elastic
  2.500000e+02,   3.000000e-01
**
** Wall 26
**
*Material, Name=Elastic_M100_26
*Density
  7.830000e-10,
*Elastic
  2.500000e+02,   3.000000e-01
**
** Wall 27
**
*Material, Name=Elastic_M100_27
*Density
  7.830000e-10,
*Elastic
  2.500000e+02,   3.000000e-01
**
** Wall 28
**
*Material, Name=Elastic_M100_28
*Density
  7.830000e-10,
*Elastic
  2.500000e+02,   3.000000e-01
**
** Wall 29
**
*Material, Name=Elastic_M100_29
*Density
  7.830000e-10,
*Elastic
  2.500000e+02,   3.000000e-01
**
** Wall 30
**
*Material, Name=Elastic_M100_30
*Density
  7.830000e-10,
*Elastic
  2.500000e+02,   3.000000e-01
**
** Wall 31
**
*Material, Name=Elastic_M100_31
*Density
  7.830000e-10,
*Elastic
  2.500000e+02,   3.000000e-01
**
** Wall 32
**
*Material, Name=Elastic_M100_32
*Density
  7.830000e-10,
*Elastic
  2.500000e+02,   3.000000e-01
**
** Wall 33
**
*Material, Name=Elastic_M100_33
*Density
  7.830000e-10,
*Elastic
  2.500000e+02,   3.000000e-01
**
** Wall 34
**
*Material, Name=Elastic_M100_34
*Density
  7.830000e-10,
*Elastic
  2.500000e+02,   3.000000e-01
**
** Wall 35
**
*Material, Name=Elastic_M100_35
*Density
  7.830000e-10,
*Elastic
  2.500000e+02,   3.000000e-01
**
** Wall 36
**
*Material, Name=Elastic_M100_36
*Density
  7.830000e-10,
*Elastic
  2.500000e+02,   3.000000e-01
**
** Wall 37
**
*Material, Name=Elastic_M100_37
*Density
  7.830000e-10,
*Elastic
  2.500000e+02,   3.000000e-01
**
** Wall 38
**
*Material, Name=Elastic_M100_38
*Density
  7.830000e-10,
*Elastic
  2.500000e+02,   3.000000e-01
**
** Wall 39
**
*Material, Name=Elastic_M100_39
*Density
  7.830000e-10,
*Elastic
  2.500000e+02,   3.000000e-01
**
** Wall 40
**
*Material, Name=Elastic_M100_40
*Density
  7.830000e-10,
*Elastic
  2.500000e+02,   3.000000e-01
**
** BAR   PID        7 & MID        2
**
*Connector behavior, Name=Bar_M203_50
*Connector elasticity, Component=1, Nonlinear
  0.000000e+00,   0.000000e+00
  2.000000e+01,   5.000000e+01
  3.000000e+04,   5.100000e+01
**
**
** Lanze
**
*Material, Name=Elastic_M100_201
*Density
  7.830000e-09,
*Elastic
  2.500000e+02,   3.000000e-01
**
** Platte
**
*Material, Name=Elastic_M100_50000001
*Density
  7.800000e-10,
*Elastic
  2.500000e+02,   3.000000e-01
**
** Rahmen
**
*Material, Name=Elastic_M100_80000000
*Density
  2.700000e-10,
*Elastic
  7.000000e+04,   3.300000e-01
**
** Halterungen
**
*Material, Name=Elastic_M100_80000005
*Density
  2.700000e-10,
*Elastic
  7.000000e+04,   3.300000e-01
**
** U-Halter
**
*Material, Name=Elastic_M100_80000010
*Density
  7.800000e-10,
*Elastic
  1.250000e+02,   3.300000e-01
**
** ---------------------  R I G I D    B O D Y    D A T A  ---------------------
**
** RigidBody_1000004
**
*Elset, Elset=RBody_1000004_Type0_Elset
P80000000;Rahmen,
P80000005;Halterungen,
P80000010;U-Halter,
**
*Nset, Nset=RBody_1000004_Type0_RefNode
99999999,
**
*Rigid body, Ref node=99999999, Position=CENTER OF MASS, Elset=RBody_1000004_Type0_Elset
**
** Platte
**
*Elset, Elset=RBody_500000_Type4_Elset
P50000001;Platte,
**
*Nset, Nset=RBody_500000_Type4_RefNode
50005000,
**
*Rigid body, Ref node=50005000, Elset=RBody_500000_Type4_Elset
**
** Lanze
**
*Elset, Elset=RBody_1_Type4_Elset
P201;Lanze,
**
*Nset, Nset=RBody_1_Type4_RefNode
   30999,
**
*Rigid body, Ref node=30999, Elset=RBody_1_Type4_Elset
**
** ----------------  C O N T A C T    S U R F A C E    D A T A  ----------------
**
** AIRBAG-U_Halter-Kontakt
**
*Surface, Name=Contact_1000005_Self, Type=ELEMENT
P1;Chamber_1,
P4;Chamber_4,
P6;Chamber_6,
P9;Chamber_9,
P12;Chamber_12,
P18;Chamber_18,
P80000010;U-Halter,
**
*Surface, Name=Contact_1000005_Main, Type=ELEMENT
P80000010;U-Halter,
*Surface, Name=Contact_1000005_Secondary, Type=ELEMENT
P1;Chamber_1,
P4;Chamber_4,
P6;Chamber_6,
P9;Chamber_9,
P12;Chamber_12,
P18;Chamber_18,
**
** Platte gegen IC
**
*Surface, Name=Contact_1000004_Main, Type=ELEMENT
P50000001;Platte,
**
*Surface, Name=Contact_1000004_Secondary, Type=ELEMENT
P1;Chamber_1,
P2;Chamber_2,
P3;Chamber_3,
P4;Chamber_4,
P5;Chamber_5,
P6;Chamber_6,
P7;Chamber_7,
P8;Chamber_8,
P9;Chamber_9,
P10;Chamber_10,
P11;Chamber_11,
P12;Chamber_12,
P13;Chamber_13,
P14;Chamber_14,
P15;Chamber_15,
P16;Chamber_16,
P17;Chamber_17,
P18;Chamber_18,
**
*Surface Interaction, Name=Contact_1000004_Prop
*Friction
  1.000000e-01,
**
**
** AIRBAG-Selbst-Kontakt
**
*Surface, Name=Contact_1000010_Self, Type=ELEMENT
P1;Chamber_1,
P2;Chamber_2,
P3;Chamber_3,
P4;Chamber_4,
P5;Chamber_5,
P6;Chamber_6,
P7;Chamber_7,
P8;Chamber_8,
P9;Chamber_9,
P10;Chamber_10,
P11;Chamber_11,
P12;Chamber_12,
P13;Chamber_13,
P14;Chamber_14,
P15;Chamber_15,
P16;Chamber_16,
P17;Chamber_17,
P18;Chamber_18,
P19;Saum,
P51;Gewebe_Lanzenende,
P52;Gewebe_Lanzenende,
**
*Surface Interaction, Name=Contact_1000010_Prop
*Friction
  1.000000e-01,
**
** AIRBAG-Selbst-Kontakt
**
*Surface, Name=Contact_1000011_Self, Type=ELEMENT
P51;Gewebe_Lanzenende,
P52;Gewebe_Lanzenende,
P201;Lanze,
**
** AIRBAG-Rest-Kontakt
**
*Surface, Name=Contact_1000003_Main, Type=ELEMENT
P201;Lanze,
**
*Surface, Name=Contact_1000003_Secondary, Type=ELEMENT
P1;Chamber_1,
P4;Chamber_4,
P6;Chamber_6,
P9;Chamber_9,
**
*Surface Interaction, Name=Contact_1000003_Prop
*Friction
  1.000000e-01,
**
**
** ----------  A I R B A G    F L U I D / C H A M B E R S    D A T A  ----------
**
** Inflatable Curtain - Bag1
**
*Physical constants, Universal gas constant=  8.314410e+03, Absolute zero=  0.000000e+00, Boltzmann = 1.38e-20
**
** Chamber external skin
**
** ADD FLUID CAVITY
**
**
*Nset, Nset=Ch1_refNode_Bag1
100000001,
**
*Surface, Name=Surface_Bag1, Type=ELEMENT
P1;Chamber_1, SNEG
P20;Durchstromoeffnung_1, SNEG
P2;Chamber_2, SNEG
P3;Chamber_3, SNEG
P4;Chamber_4, SNEG
P5;Chamber_5, SNEG
P6;Chamber_6, SNEG
P7;Chamber_7, SNEG
P8;Chamber_8, SNEG
P9;Chamber_9, SNEG
P21;Durchstromoeffnung_2, SNEG
P10;Chamber_10, SNEG
P11;Chamber_11, SNEG
P12;Chamber_12, SNEG
P13;Chamber_13, SNEG
P14;Chamber_14, SNEG
P15;Chamber_15, SNEG
P16;Chamber_16, SNEG
P17;Chamber_17, SNEG
P18;Chamber_18, SNEG
P1;Chamber_1, SNEG
P20;Durchstromoeffnung_1, SNEG
**
**
***********************************************************
**   LKM   FLUID INFLATOR DEFINITION
**
**  check11:  one inlet element inside tube
*NODE, nset=inlet_nodes
 100000019,  2332.7647421924,  -496.7693412667,  1241.5834810275
 100000020,  2332.7890732854,  -500.8396834461,  1233.0380430469
 100000021,  2333.6733209872,  -508.8242126439,  1235.6935736613
 100000022,  2333.6491543914,  -504.7550366938,  1244.240219947
*ELEMENT,TYPE=SFM3D4R,ELSET=inlet_elem
  80013841, 100000019, 100000022, 100000021, 100000020
*Surface section, Elset=inlet_elem, Density=  1.120000e-08
*SURFACE, NAME=INLET_SURF, TYPE=ELEMENT
inlet_elem, Sneg
*BOUNDARY
inlet_nodes, 1, 3,
**
**
** ADD PARTICLE GENERATOR DEFINTION
**
**
*SURFACE, TYPE=ELEMENT, NAME=inf_gasmaterial_Surf
inf_gasmaterial_elem
**
**
**
***********************************************************
** UPM       FLUID INFLATOR DEFINITION
**
*Fluid inflator, Name=Inflator1_Bag1, Property=Inflator1_Prop
Ch1_refNode_Bag1,
**
*Fluid inflator property, Name=Inflator1_Prop,
   Type=TEMPERATURE AND MASS
**
0.00E+00, 0.00E+00, 0.00E+00
5.00e-05, 2.95E+02, 8.79E-03
1.00E-04, 0.00E+00, 0.00E+00
2.00E-04, 0.00E+00, 0.00E+00
3.00E-04, 0.00E+00, 0.00E+00
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1.00E-01, 1.67E+02, 0.0
**
*Fluid inflator mixture, Number species=1, Type=MASS FRACTION
Infl_gas
0.0, 1.0
**
**
** Chamber leakages
**
** Chamber 1 - Leakage 1
**
*Fluid exchange, Name=Ch1_Leak1_RLeak_Bag1,   Surface=Surface_Bag1,   Property=Ch1_Leak1_RLeak_Prop_Bag1
Ch1_refNode_Bag1,
**
*Fluid exchange property, Name=Ch1_Leak1_RLeak_Prop_Bag1,   Type=ORIFICE
  3.000000e-04,
**
** Chamber heat loss
**
** Chamber 1 - Energy leakage
**
*Fluid exchange, Name=Ch1_Energy_Leak_Bag1,   Surface=Surface_Bag1,   Property=Ch1_Energy_Leak_Prop_Bag1
Ch1_refNode_Bag1,
****
*Fluid exchange property, Name=Ch1_Energy_Leak_Prop_Bag1,   Type=ENERGY RATE LEAKAGE
  0.000000e+00,   0.000000e+00
  2.500000e+02,   5.000000e+03
**
**
*Surface, Name=Wall_Opening_Exclusions, Type=ELEMENT
P20;Durchstromoeffnung_1
P21;Durchstromoeffnung_2
**
** --------------------  G A S    S P E C I E S    D A T A  --------------------
**
** Fluid Cavity Behavior Definitions
**
** Gas species: 'AIR'
**
*Fluid behavior, Name=AIR
**
*Capacity, Type=POLYNOMIAL
  2.811000e+04,   1.967000e+00,   4.802000e-03,   0.000000e+00,   0.000000e+00
**
*Molecular weight
  2.897000e-05,
**
** Gas species: 'EQUIVALENT GAS'
**
** ADD EQUIVALENT GAS MATERIAL PROPERTIES
**
**
** -------------  B O U N D A R Y    C O N D I T I O N    D A T A  -------------
**
** Displacement Boundary Condition 2
**
*Boundary, Type=DISPLACEMENT
99999999,        1,        6
50005000,        1,        6
   30999,        1,        6
   11003,        1,        3
   11001,        1,        3
   11005,        1,        3
   11002,        1,        3
   11006,        1,        3
   11004,        1,        3
    1873,        1,        3
    1877,        1,        3
    2643,        1,        3
    2676,        1,        3
    2642,        1,        3
    2675,        1,        3
    1872,        1,        3
    1876,        1,        3
    6586,        1,        3
    6585,        1,        3
    6618,        1,        3
    6619,        1,        3
     418,        1,        3
     410,        1,        3
     419,        1,        3
     411,        1,        3
     426,        1,        3
     420,        1,        3
    1182,        1,        3
    1146,        1,        3
    1147,        1,        3
    1183,        1,        3
       5,        1,        3
       8,        1,        3
       9,        1,        3
       4,        1,        3
**
** ------------------  N O D A L    D A M P I N G    D A T A  ------------------
**
** Contact 1 - type 37
**
*Amplitude, Name=Amp_Damping_1_VBF
   0.000000e+00,   1.000000e+04,   9.999999e-04,   1.000000e+04,   1.000000e-03,   0.000000e+00
**
** Contact 1 - type 37
**
*Amplitude, Name=Amp_Damping_2_VBF
  0.000000e+00,   0.000000e+00,   9.999999e-04,   0.000000e+00,   1.000000e-03,   1.000000e+02,   9.999999e-03,   1.000000e+02,
  1.000000e-02,   0.000000e+00
**
** -----------------  I N I T I A L    A I R B A G    D A T A  -----------------
**
*Initial conditions, Type=FLUID PRESSURE
Ch1_refNode_Bag1,   0.000000e+00
**
*Initial conditions, Type=TEMPERATURE
Ch1_refNode_Bag1,   2.950000e+02
**
** ---------  I N I T I A L    R E F E R E N C E - M E S H    D A T A  ---------
**
*Initial conditions, Type=REF COORDINATE, Input=w_sidecurtain_airbag_refmesh.inp
**
**------------------ramping initial stresses------------------**********
*AMPLITUDE, NAME = RampStress, DEFINITION = Smooth Step,time=total time
0.0, 0.0,      0.0025, 1.0,       1.0, 1.0
**-------------------------------------------------------
**------------ LKM
*AMPLITUDE, NAME =vent_amp, DEFINITION = Smooth Step,time=total time
0.0, 0.0,  0.02499,0.0,      0.025, 1.0,       1.0, 1.0
*AMPLITUDE, NAME =inflator_amp,time=total time
0.0, 0.0,  0.02499,0.0,      0.025, 1.0,       1.0, 1.0
**
*SURFACE INTERACTION, NAME=gasContprop
*SURFACE BEHAVIOR, PRESSURE-OVERCLOSURE=LKM
**
** /////////////////////  H I S T O R Y     S E C T I O N  /////////////////////
**
*FILTER, NAME=filter-1000hz, TYPE=BUTTERWORTH
1000,2
**
**
*Step
Airbag deployment
**
**
*Dynamic, Explicit, Element by element, Scale factor=1.0
 ,  0.100
**
** ------------  C O N T A C T    I N T E R A C T I O N    D A T A  ------------
**
*Contact
*Contact inclusions, all exterior
*Contact inclusions
**
inf_gasmaterial_surf, inf_gasmaterial_surf
inf_gasmaterial_surf, Surface_Bag1
inf_gasmaterial_surf, Contact_1000003_Main
**
*Contact exclusions
Wall_Opening_Exclusions, Contact_1000003_Main
**
*Contact property assignment
Contact_1000004_Secondary, Contact_1000004_Main, Contact_1000004_Prop
Contact_1000010_Self, Contact_1000010_Self, Contact_1000010_Prop
Contact_1000003_Secondary, Contact_1000003_Main, Contact_1000003_Prop
**------------ LKM
inf_gasmaterial_surf, inf_gasmaterial_surf, gasContprop
inf_gasmaterial_surf, Surface_Bag1, gasContprop
inf_gasmaterial_surf, Contact_1000003_Main,  gasContprop
**
*Surface property assignment, Property=THICKNESS
Contact_1000005_Self,     1.500000e+00, 1.
Contact_1000004_Secondary,    8.000000e-01, 1.
Contact_1000004_Main,   8.000000e-01, 1.
**Contact_1000002_Self,     8.000000e-01, 1.
Contact_1000011_Self,     8.000000e-01, 1.
Contact_1000003_Secondary,    8.000000e-01, 1.
Contact_1000003_Main,   8.000000e-01, 1.
Contact_1000010_Self,     8.000000e-01, 1.
**
*Surface property assignment, Property=FEATURE EDGE CRITERIA
Contact_1000003_Main,   ALL EDGES
Contact_1000010_Self,   ALL EDGES
**
*Contact controls assignment, Automatic overclosure resolution
, , STORE OFFSETS
*Contact controls assignment, type=fold inversion check
,
**
**
**
*Dload
 ,GRAV,9800,0.,0.,-1.
**
**
** --------------  F L U I D    I N T E R A C T I O N    D A T A  --------------
**
** Fluid inflation
**------------ LKM
*PARTICLE GENERATOR FLOW, GENERATOR=Particle_Generator, FLUID INFLATOR PROPERTY =INFLATOR1_PROP, MASSFLOWRATE=TOTAL
**
**
*Fluid inflator activation, inflation time amplitude=inflator_amp
Inflator1_Bag1,
**
**
** Fluid exchange due to leakage from the airbag
**
*Fluid exchange activation, amplitude=vent_amp
Ch1_Leak1_RLeak_Bag1,
**
** Chamber heat loss
**
*Fluid exchange activation, amplitude=vent_amp
Ch1_Energy_Leak_Bag1,
**
**
** ---------  D A M P I N G    D I S T R I B U T E D    L O A D I N G  ---------
**
*Dload, Amplitude=Amp_Damping_1_VBF
P1;Chamber_1, VBF,   7.830000e-10
P2;Chamber_2, VBF,   7.830000e-10
P3;Chamber_3, VBF,   7.830000e-10
P4;Chamber_4, VBF,   7.830000e-10
P5;Chamber_5, VBF,   7.830000e-10
P6;Chamber_6, VBF,   7.830000e-10
P7;Chamber_7, VBF,   7.830000e-10
P8;Chamber_8, VBF,   7.830000e-10
P9;Chamber_9, VBF,   7.830000e-10
P10;Chamber_10, VBF,   7.830000e-10
P11;Chamber_11, VBF,   7.830000e-10
P12;Chamber_12, VBF,   7.830000e-10
P13;Chamber_13, VBF,   7.830000e-10
P14;Chamber_14, VBF,   7.830000e-10
P15;Chamber_15, VBF,   7.830000e-10
P16;Chamber_16, VBF,   7.830000e-10
P17;Chamber_17, VBF,   7.830000e-10
P18;Chamber_18, VBF,   7.830000e-10
P19;Saum, VBF,   7.830000e-10
P51;Gewebe_Lanzenende, VBF,   7.830000e-10
P52;Gewebe_Lanzenende, VBF,   7.830000e-10
**
*Dload, Amplitude=Amp_Damping_2_VBF
P1;Chamber_1, VBF,   7.830000e-10
P2;Chamber_2, VBF,   7.830000e-10
P3;Chamber_3, VBF,   7.830000e-10
P4;Chamber_4, VBF,   7.830000e-10
P5;Chamber_5, VBF,   7.830000e-10
P6;Chamber_6, VBF,   7.830000e-10
P7;Chamber_7, VBF,   7.830000e-10
P8;Chamber_8, VBF,   7.830000e-10
P9;Chamber_9, VBF,   7.830000e-10
P10;Chamber_10, VBF,   7.830000e-10
P11;Chamber_11, VBF,   7.830000e-10
P12;Chamber_12, VBF,   7.830000e-10
P13;Chamber_13, VBF,   7.830000e-10
P14;Chamber_14, VBF,   7.830000e-10
P15;Chamber_15, VBF,   7.830000e-10
P16;Chamber_16, VBF,   7.830000e-10
P17;Chamber_17, VBF,   7.830000e-10
P18;Chamber_18, VBF,   7.830000e-10
P19;Saum, VBF,   7.830000e-10
P51;Gewebe_Lanzenende, VBF,   7.830000e-10
P52;Gewebe_Lanzenende, VBF,   7.830000e-10
**
** ----------------------  O U T P U T     R E Q U E S T  ----------------------
**
** Default output requests
**
*Output, Field, number=80
*Node output
U, v
*Element output
LE, S, SFABRIC, EFABRIC
*Contact output
CFORCE
**
*Output, History, TIME INTERVAL=1E-005, FILTER=ANTIALIASING
*Node output, Nset=Ch1_refNode_Bag1
PCAV, CVOL, CTEMP, CSAREA, CMASS
*Energy output
ALLKE, ALLIE, ALLSE, ALLPD, ALLVD, ALLAE, ALLWK, ETOTAL,allfc
*Incrementation output
dt,
**
** ADD LKM OUTPUT
**
*Restart, Write, Number interval=2
**
*End step
