*HEADING
Dodge caravan bumper analysis
units: N, mm, MPa, tonne, s
*Part, name=BUMPER
*NODE
      1,     -67.9403,   37.9842987,   553.924011
      2,  -67.3702011,   25.2422009,   554.132019
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**
** f_ch_rad_supp_low_bot
**
*ELEMENT, TYPE=S3RS, ELSET=radiator_support_bottom
    112408,     112486,     112487,     112488
    112421,     112499,     112500,     112501
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*ELEMENT, TYPE=S4RS, ELSET=radiator_support_bottom
    112001,     112001,     112002,     112005,     112004
    112002,     112002,     112003,     112006,     112005
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*SHELL SECTION, ELSET=radiator_support_bottom, MATERIAL=Steel1, CONTROLS=ShellControls
1.87000e+000,     3
**
** f_ch_rad_supp_low_reinf
**
*ELEMENT, TYPE=S4RS, ELSET=radiator_support_reinf
    113701,     113738,     113739,     113743,     113742
    113702,     113734,     113735,     113739,     113738
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*SHELL SECTION, ELSET=radiator_support_reinf, MATERIAL=Steel1, CONTROLS=ShellControls
1.10000e+000,     3
**
** f_ch_rad_supp_low_top
**
*ELEMENT, TYPE=S3RS, ELSET=radiator_support_top
    114103,     114119,     114135,     114136
    114104,     114135,     114099,     114137
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*ELEMENT, TYPE=S4RS, ELSET=radiator_support_top
    114001,     114001,     114002,     114007,     114006
    114002,     114002,     114003,     114008,     114007
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*SHELL SECTION, ELSET=radiator_support_top, MATERIAL=Steel1, CONTROLS=ShellControls
1.88000e+000,     3
**
** f_ch_rails_ft_engine
**
*SHELL SECTION, ELSET=rails_inner, MATERIAL=Steel2, CONTROLS=ShellControls
2.65000e+000,     3
**
** f_ch_rails_ft_o
**
*SHELL SECTION, ELSET=rails_outer, MATERIAL=Steel2, CONTROLS=ShellControls
2.64000e+000,     3
*Element, type=S4RS
117225, 117316, 117314, 117319, 117317
117226, 117317, 117319, 117320, 117318
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*Element, type=S3RS
117962, 118147, 118054, 118148
117998, 118169, 118168, 118167
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*Elset, elset=rails_inner
 117225, 117226, 117227, 117228, 117229, 117230
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*Elset, elset=rails_outer
 128551, 128552, 128553, 128554, 128555, 128556
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*Nset, nset=end_nodes
 117312, 117314, 117316, 117350, 117352, 117471
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**
** f_ob_bumper_ft_beam
**
*ELEMENT, TYPE=S3RS, ELSET=bumper_beam
       308,        171,        345,        160
       309,        345,        344,        160
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*ELEMENT, TYPE=S4RS, ELSET=bumper_beam
         1,          1,          2,          5,          4
         2,          2,          3,          6,          5
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*SHELL SECTION, ELSET=bumper_beam, MATERIAL=Steel3, CONTROLS=ShellControls
2.04000e+000,     3
**
** f_ob_bumper_ft_beam_reinf
**
*ELEMENT, TYPE=S4RS, ELSET=bumper_beam_reinf
      3001,       3001,       3002,       3005,       3004
      3002,       3002,       3003,       3006,       3005
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*SHELL SECTION, ELSET=bumper_beam_reinf, MATERIAL=Steel3, CONTROLS=ShellControls
2.77000e+000,     3
**
** f_ob_bumper_ft_fascia
**
*ELEMENT, TYPE=S3RS, ELSET=bumper_cover
      4278,       4325,       4326,       4324
      4324,       4374,       4377,       4376
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*ELEMENT, TYPE=S4RS, ELSET=bumper_cover
      4001,       4001,       4003,       4004,       4002
      4002,       4003,       4005,       4006,       4004
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*SHELL SECTION, ELSET=bumper_cover, MATERIAL=Plastic, CONTROLS=ShellControls
3.55000e+000,     3
**
** f_ob_bumper_ft_foam
**
*ELEMENT, TYPE=C3D8R, ELSET=bumper_foam
      9001,       9013,       9014,       9007,       9006,       9445,       9448,       9447,       9446
      9002,       9445,       9448,       9447,       9446,       9432,       9431,       9438,       9439
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*SOLID SECTION, ELSET=bumper_foam, MATERIAL=Foam, CONTROLS=FoamControls
**
** f_ob_bumper_ft_mounting_brckt_l
**
*ELEMENT, TYPE=S3RS, ELSET=bumper_mounting_bracket_left
     15142,      15182,      15054,      15074
     15143,      15182,      15176,      15137
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*ELEMENT, TYPE=S4RS, ELSET=bumper_mounting_bracket_left
     15001,      15001,      15004,      15005,      15002
     15002,      15002,      15005,      15006,      15003
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*SHELL SECTION, ELSET=bumper_mounting_bracket_left, MATERIAL=Steel3, CONTROLS=ShellControls
2.06000e+000,     3
**
** f_ob_bumper_ft_mounting_brckt_r
**
*ELEMENT, TYPE=S3RS, ELSET=bumper_mounting_bracket_right
     15642,      15682,      15574,      15554
     15643,      15682,      15637,      15676
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*ELEMENT, TYPE=S4RS, ELSET=bumper_mounting_bracket_right
     15501,      15501,      15502,      15505,      15504
     15502,      15502,      15503,      15506,      15505
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*SHELL SECTION, ELSET=bumper_mounting_bracket_right, MATERIAL=Steel3, CONTROLS=ShellControls
2.06000e+000,     3
**
** f_ob_bumper_ft_mounting_reinf_l
**
*ELEMENT, TYPE=S3RS, ELSET=bumper_mounting_reinf_left
     16003,      16003,      16004,      16002
     16010,      16011,      16013,      16012
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*ELEMENT, TYPE=S4RS, ELSET=bumper_mounting_reinf_left
     16001,      15137,      16003,      16002,      15191
     16002,      15191,      16002,      16001,      15054
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*SHELL SECTION, ELSET=bumper_mounting_reinf_left, MATERIAL=Steel3, CONTROLS=ShellControls
3.50000e+000,     3
**
** f_ob_bumper_ft_mounting_reinf_r
**
*ELEMENT, TYPE=S3RS, ELSET=bumper_mounting_reinf_right
     16503,      16503,      16502,      16504
     16510,      16511,      16512,      16513
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*ELEMENT, TYPE=S4RS, ELSET=bumper_mounting_reinf_right
     16501,      15637,      15691,      16502,      16503
     16502,      15691,      15554,      16501,      16502
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*SHELL SECTION, ELSET=bumper_mounting_reinf_right, MATERIAL=Steel3, CONTROLS=ShellControls
3.50000e+000,     3
**
** f_ob_bumper_ft_foam_skin
**
*ELEMENT, TYPE=SFM3D4R, ELSET=bumper_foam_skin
     12001,       9013,       9006,       9007,       9014
     12002,       9014,       9007,       9447,       9448
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*SURFACE SECTION, ELSET=bumper_foam_skin, DENSITY= 7.8900e-009
**
*MPC
BEAM,  113785,  112029
BEAM,  113797,  112122
BEAM,  112575,  113731
BEAM,  112558,  113722
BEAM,  112552,  113716
BEAM,  112554,  113718
BEAM,  113739,  112585
BEAM,  113741,  112587
BEAM,  112337,  113759
BEAM,  112321,  113753
BEAM,  112364,  113770
BEAM,  112362,  113768
BEAM,  113226,  114528
BEAM,  113239,  114521
BEAM,  113221,  114532
BEAM,  113225,  114505
BEAM,  113213,  114501
BEAM,  113208,  114498
BEAM,  113180,  114405
BEAM,  113184,  114425
BEAM,  113188,  114432
BEAM,  112452,  114159
BEAM,  112447,  114127
BEAM,  112430,  114133
BEAM,  112426,  114106
BEAM,  114086,  112423
BEAM,  112466,  114231
BEAM,  112460,  114234
BEAM,  113515,  114238
BEAM,  112478,  114264
BEAM,  112491,  114257
BEAM,  112483,  114254
BEAM,  112754,  114319
BEAM,  112756,  114311
BEAM,  112727,  114288
BEAM,  112730,  114197
BEAM,  114193,  112691
BEAM,  114190,  112685
BEAM,  112681,  114074
BEAM,  112669,  114054
BEAM,  112657,  114039
BEAM,  114024,  112698
BEAM,  112715,  114007
BEAM,  114582,  113548
BEAM,  113437,  114574
BEAM,  113410,  114551
BEAM,  113413,  114464
BEAM,  113398,  114460
BEAM,  113392,  114457
BEAM,  113384,  114385
BEAM,  114373,  113376
BEAM,  114248,  112717
BEAM,  112249,  118045
BEAM,  112267,  118495
BEAM,  118493,  112269
BEAM,  118490,  112270
BEAM,  112519,  118254
BEAM,  112517,  118256
BEAM,  112806,  117990
BEAM,  112808,  117992
BEAM,  112742,  118136
BEAM,  112744,  118132
BEAM,  113025,  120086
BEAM,  113043,  120438
BEAM,  113045,  120432
BEAM,  113046,  120431
BEAM,  113267,  120315
BEAM,  113265,  120317
BEAM,  113425,  120243
BEAM,  113485,  120060
BEAM,  113483,  120062
BEAM,  114602,  120192
BEAM,  114599,  120495
BEAM,  120284,  114616
BEAM,  114337,  118365
BEAM,  114340,  118362
BEAM,  118354,  114355
BEAM,  128750,  117326
BEAM,  117533,  128724
BEAM,  128842,  117537
BEAM,  118172,  128892
BEAM,  118009,  128862
BEAM,  128993,  118236
BEAM,  120099,  131839
BEAM,  120116,  131862
BEAM,  131812,  119374
BEAM,  131693,  119392
BEAM,  119383,  131720
BEAM,  3183,  2209
BEAM,  3185,  2208
BEAM,  3187,  2207
BEAM,  3112,  6
BEAM,  3264,  2908
BEAM,  3111,  5
BEAM,  3201,  1961
BEAM,  3200,  1960
BEAM,  3199,  1959
BEAM,  3071,  508
BEAM,  3070,  507
BEAM,  3069,  506
BEAM,  3057,  754
BEAM,  3055,  755
BEAM,  3053,  756
BEAM,  3140,  2215
BEAM,  3137,  2217
BEAM,  3134,  2214
BEAM,  1990,  3172
BEAM,  1989,  3171
BEAM,  1988,  3170
BEAM,  3261,  2925
BEAM,  3122,  237
BEAM,  3123,  236
BEAM,  3040,  535
BEAM,  3041,  536
BEAM,  3042,  537
BEAM,  3004,  761
BEAM,  3007,  764
BEAM,  762,  3010
BEAM,  15001,  1304
BEAM,  15009,  1312
BEAM,  15016,  1245
BEAM,  15018,  1184
BEAM,  15109,  894
BEAM,  15112,  886
BEAM,  15127,  857
BEAM,  15126,  924
BEAM,  15509,  2765
BEAM,  15501,  2757
BEAM,  15518,  2637
BEAM,  15516,  2698
BEAM,  15627,  2310
BEAM,  15626,  2377
BEAM,  15625,  2378
BEAM,  15609,  2347
BEAM,  15612,  2339
BEAM,  7142,  9670
BEAM,  4867,  9004
BEAM,  118014,  112810
BEAM,  128859,  112810
BEAM,  120102,  113487
BEAM,  131836,  113487
BEAM,  1378,  1366
BEAM,  15008,  1366
BEAM,  1233,  1198
BEAM,  15017,  1198
BEAM,  15124,  925
BEAM,  15125,  925
BEAM,  15110,  890
BEAM,  15111,  890
BEAM,  2831,  2819
BEAM,  15508,  2819
BEAM,  2686,  2651
BEAM,  15517,  2651
BEAM,  15610,  2343
BEAM,  15611,  2343
BEAM,  10050,  2526
BEAM,  10051,  2526
BEAM,  10057,  2526
BEAM,  10058,  2526
BEAM,  9405,  1072
BEAM,  9406,  1072
BEAM,  9412,  1072
BEAM,  9413,  1072
BEAM,  6270,  6269
BEAM,  6276,  6269
BEAM,  6277,  6269
BEAM,  6266,  6265
BEAM,  6272,  6265
BEAM,  6273,  6265
BEAM,  8511,  8510
BEAM,  8517,  8510
BEAM,  8518,  8510
BEAM,  8507,  8506
BEAM,  8513,  8506
BEAM,  8514,  8506
BEAM,  8295,  8294
BEAM,  8304,  8294
BEAM,  8305,  8294
BEAM,  6053,  6052
BEAM,  6062,  6052
BEAM,  6063,  6052
BEAM,  15060,  15059
BEAM,  15068,  15059
BEAM,  15069,  15059
BEAM,  118267,  15059
BEAM,  118268,  15059
BEAM,  118275,  15059
BEAM,  118276,  15059
BEAM,  128968,  15059
BEAM,  128969,  15059
BEAM,  15047,  15046
BEAM,  15051,  15046
BEAM,  15052,  15046
BEAM,  118223,  15046
BEAM,  118224,  15046
BEAM,  118227,  15046
BEAM,  118228,  15046
BEAM,  128995,  15046
BEAM,  128996,  15046
BEAM,  15560,  15559
BEAM,  15568,  15559
BEAM,  15569,  15559
BEAM,  120401,  15559
BEAM,  120402,  15559
BEAM,  131933,  15559
BEAM,  131934,  15559
BEAM,  131938,  15559
BEAM,  131939,  15559
BEAM,  15547,  15546
BEAM,  15551,  15546
BEAM,  15552,  15546
BEAM,  120333,  15546
BEAM,  120342,  15546
BEAM,  131961,  15546
BEAM,  131962,  15546
BEAM,  131966,  15546
BEAM,  131967,  15546
**
*surface,name=surface-rails_inner
rails_inner
*surface,name=surface-rails_outer
rails_outer
*nset,elset=rails_inner,nset=nodes-rails_inner
*nset,elset=rails_outer,nset=nodes-rails_outer
*SURFACE, NAME=bumper_foam_skin_surface
bumper_foam_skin,
*SURFACE, NAME=bumper_cover_surface
bumper_cover,
**
*End Part
**
** vehicle mass modeled as a rigid body
**
*Part, name=RIGID_BODY
*System
 -528.200012,       -600.,        372., -527.200012,       -600.,        372.
*Node, nset=rigid_body_nodes
      150001,           0.,           0.,         250.
      150002,           0.,        1200.,         250.
      150003,           0.,        1200.,         -50.
      150004,           0.,           0.,         -50.
      150005,         100.,        1200.,         250.
      150006,         100.,        1200.,         -50.
      150007,         100.,           0.,         250.
      150008,         100.,           0.,         -50.
*Element, type=R3D4, elset=rigid_body
150001, 150001, 150002, 150003, 150004
150002, 150002, 150005, 150006, 150003
150003, 150005, 150007, 150008, 150006
150004, 150007, 150001, 150004, 150008
150005, 150002, 150001, 150007, 150005
150006, 150008, 150004, 150003, 150006
*System
*Node, nset=ref_point_at_center_of_mass
     150009,  -1.631554E+03,-7.454698E+00, 6.637651E+02
*element, type=mass, elset=vehicle_mass
150007, 150009
*mass, elset=vehicle_mass
1.9987
*element,type=rotaryi, elset=vehicle_rotaryi
150008, 150009
*rotary inertia, elset=vehicle_rotaryi
8.025066E+05, 4.214527E+06, 4.416539E+06
*End Part
**
** rigid barrier
**
*Part, name=RIGID_BARRIER
*Node, nset=rigid_barrier_nodes
      1600003,           5.,        1000.,        1000.
      1600004,           5.,        1000.,           0.
      1600005,           5.,       -1000.,           0.
      1600006,           5.,       -1000.,        1000.
*system
*Element, type=R3D4, elset=rigid_barrier
1600002, 1600005, 1600004, 1600003, 1600006
*Node, nset=rigid_barrier_ref_point
      1600007,        5.,           0.,           0.
*SURFACE, NAME=rigid_barrier_surface
rigid_barrier,
*End Part
**
*Assembly, name=Assembly
**
*Instance, name=BUMPER-1, part=BUMPER
*End Instance
**
*Instance, name=RIGID_BODY-1, part=RIGID_BODY
*End Instance
**
*Instance, name=RIGID_BARRIER-1, part=RIGID_BARRIER
*End Instance
**
*Rigid Body, ref node=RIGID_BODY-1.ref_point_at_center_of_mass, elset=RIGID_BODY-1.rigid_body, tie nset=BUMPER-1.end_nodes
*Rigid Body, ref node=RIGID_BARRIER-1.rigid_barrier_ref_point, elset=RIGID_BARRIER-1.rigid_barrier
**
*tie, name=tie1, position tolerance=2.5
BUMPER-1.surface-rails_inner,BUMPER-1.surface-rails_outer
**
**               QA_SETS
**
*SURFACE, NAME=QA_TEST_rigid_barrier_surface
RIGID_BARRIER-1.rigid_barrier,
*NSET, NSET=QA_TEST_ref_point_at_com
RIGID_BODY-1.150009,
*NSET, NSET=QA_TEST_rigid_barrier_ref_point
RIGID_BARRIER-1.1600007,
**
*End Assembly
**
*MATERIAL, NAME=foam
*DENSITY
 0.832E-10
*ELASTIC
  25.0000,   0.3000
*CRUSHABLE FOAM, HARDENING=ISOTROPIC
 0.999950, 0.000000
*CRUSHABLE FOAM HARDENING
   0.1659,   0.0000
   0.2805,   0.0206
   0.3597,   0.0417
   0.4308,   0.0632
   0.4908,   0.0852
   0.5442,   0.1076
   0.5908,   0.1306
   0.6224,   0.1542
   0.6540,   0.1783
   0.6724,   0.2029
   0.6921,   0.2283
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   5.1895,   1.6947
*RATE DEPENDENT, TYPE=POWER LAW
4867.0000,   4.3380
**
*MATERIAL, NAME=Steel1
*DENSITY
 7.8900e-009,
*ELASTIC
 2.1000e+005,  3.0000e-001
*PLASTIC
 3.0000e+002,  0.0000e+000
 3.3300e+002,  3.9000e-002
 3.6700e+002,  7.7000e-002
 3.9500e+002,  1.2200e-001
 4.2500e+002,  1.6600e-001
 4.7400e+002,  2.4700e-001
 5.5000e+002,  3.2200e-001
 7.0000e+002,  3.9200e-001
 7.1000e+002,  1.0000e+000
** Extrapolated material data:
 7.1206e+002,  1.1250e+000
 7.1411e+002,  1.2500e+000
 7.1617e+002,  1.3750e+000
 7.1822e+002,  1.5000e+000
 7.2028e+002,  1.6250e+000
 7.2234e+002,  1.7500e+000
 7.2439e+002,  1.8750e+000
 7.2645e+002,  2.0000e+000
**
*MATERIAL, NAME=Steel2
*DENSITY
 7.8900e-009,
*ELASTIC
 2.1000e+005,  3.0000e-001
*PLASTIC
 3.3000e+002,  0.0000e+000
 3.6700e+002,  2.0000e-002
 3.7200e+002,  4.9000e-002
 3.7900e+002,  8.2000e-002
 3.8000e+002,  1.2700e-001
 3.8100e+002,  1.7000e-001
 4.3000e+002,  2.3100e-001
 5.0000e+002,  2.7800e-001
 5.1000e+002,  1.0000e+000
** Extrapolated material data:
 5.1173e+002,  1.1250e+000
 5.1346e+002,  1.2500e+000
 5.1519e+002,  1.3750e+000
 5.1693e+002,  1.5000e+000
 5.1866e+002,  1.6250e+000
 5.2039e+002,  1.7500e+000
 5.2212e+002,  1.8750e+000
 5.2385e+002,  2.0000e+000
**
*MATERIAL, NAME=Steel3
*DENSITY
 7.8900e-009,
*ELASTIC
 2.1000e+005,  3.0000e-001
*PLASTIC
 5.7000e+002,  0.0000e+000
 6.2100e+002,  3.4000e-002
 6.6190e+002,  8.2000e-002
 7.0370e+002,  1.2700e-001
 7.4660e+002,  1.7000e-001
 8.5000e+002,  2.1100e-001
 9.8000e+002,  2.4300e-001
 1.2000e+003,  2.8900e-001
 1.2100e+003,  1.0000e+000
** Extrapolated material data:
 1.2118e+003,  1.1250e+000
 1.2135e+003,  1.2500e+000
 1.2153e+003,  1.3750e+000
 1.2170e+003,  1.5000e+000
 1.2188e+003,  1.6250e+000
 1.2205e+003,  1.7500e+000
 1.2223e+003,  1.8750e+000
 1.2241e+003,  2.0000e+000
**
*MATERIAL, NAME=Plastic
*DENSITY
 1.2000e-009,
*ELASTIC
 2.8000e+003,  3.0000e-001
*PLASTIC
 4.5000e+001,  0.0000e+000
 8.8500e+002,  2.0000e+000
**
*SECTION CONTROLS, NAME=FoamControls, HOURGLASS=ENHANCED, DISTORTION CONTROL
*SECTION CONTROLS, NAME=ShellControls, HOURGLASS=STIFFNESS
*BOUNDARY
RIGID_BARRIER-1.rigid_barrier_ref_point,1,6
RIGID_BODY-1.ref_point_at_center_of_mass, 2,3
RIGID_BODY-1.ref_point_at_center_of_mass, 4,5
**
** 28.08 km/h = 7800.0 mm/s
*INITIAL CONDITIONS, TYPE=VELOCITY
RIGID_BODY-1.ref_point_at_center_of_mass, 1, 7800.0
**
**
***********************************************************
** ADD SURFACE INTERACTION DEFINITION
**
**
**------------------------------------------------------------------------------
**
*STEP
Step-1
*DYNAMIC, EXPLICIT, ELEMENT BY ELEMENT
 ,0.075
***********************************************************
** ADD VARIABLE MASS SCALING DEFINITION
**
**
***********************************************************
** ADD CONTACT DEFINITION
**
**
***********************************************************
** ADD CONTACT/SURFACE PROPERTY ASSIGNMENT DEFINITION
**
**
**
** Output requests
**
*OUTPUT, FIELD, NUMBER INTERVAL=20
*NODE OUTPUT
U, V, A
*ELEMENT OUTPUT
S, EMSF, EDT, PEEQ
**
*OUTPUT, HISTORY
*ENERGY OUTPUT, VARIABLE=ALL
*ENERGY OUTPUT, ELSET=BUMPER-1.bumper_foam
ALLAE, ALLKE, ALLIE, ALLSE
*INCREMENTATION OUTPUT
DMASS,
*NODE OUTPUT, NSET=RIGID_BODY-1.ref_point_at_center_of_mass
U1,V1,A1
*OUTPUT, HISTORY, FILTER=ANTIALIASING, time interval=1.0e-4
*NODE OUTPUT, NSET=RIGID_BODY-1.ref_point_at_center_of_mass
U1,V1,A1
*NODE OUTPUT, NSET=RIGID_BARRIER-1.rigid_barrier_ref_point
RF1,
***********************************************************
** ADD CONTACT OUTPUT DEFINITION
**
**
**
*END STEP
