**********************************************************************
***
***                            SHOCK ABSORBERS
***          make rigid surfaces assoc with shock stay aligned
************************************************************************
** the following nodes are to be used as REF NODES of the GRAPHICAL half-struts
** RF    LF    LR    RR
** 10007,11007,12007,13007 - on the AARMs
** 10135,10140,10240,10235 - on the chasis
******************************************
**
**  for each shock:
**    create two nodes whose rotation are not dep on the AARM or chasis motion
**    JOIN these additional nodes to the proper locations on AARMS and chasis
**
** initial orientations of the shocks
*ORIENTATION,NAME=SHOCKS-RIGHT
 0.0, 0.203, 0.391,   1.0,0.0,0.0
*ORIENTATION,NAME=SHOCKS-LEFT
 0.0,-0.203, 0.391,   1.0,0.0,0.0
***
*ELEMENT, TYPE=CONN3D2, ELSET=SHOCKS-VISUAL
40003,   7,10007
41003,1007,11007
42003,2007,12007
43003,3007,13007
**
40103, 135,10135
41103, 140,10140
42103, 240,10240
43103, 235,10235
*CONNECTOR SECTION, ELSET=SHOCKS-VISUAL
JOIN
**
**         set relative motion between half-struts
**               ALIGN -> the two half-struts rotate together
**               SLOT  -> the two half-struts slide into each other
**               this will also create an orientation along the nodes
**
*ELEMENT, TYPE=CONN3D2, ELSET=SHOCKS-RIGHT
30003, 10007,  10135
33003, 13007,  10235
*ELEMENT, TYPE=CONN3D2, ELSET=SHOCKS-LEFT
31003, 11007,  10140
32003, 12007,  10240
*CONNECTOR SECTION, ELSET=SHOCKS-RIGHT
 SLOT,ALIGN
 SHOCKS-RIGHT
*CONNECTOR SECTION, ELSET=SHOCKS-LEFT
 SLOT,ALIGN
 SHOCKS-LEFT
**
**          prevent rigid body rotation around shock's axis
**
*ELEMENT, TYPE=CONN3D2, ELSET=SHOCK-RIGID-ROT-RIGHT
40203,10007,135
43303,13007,235
*ELEMENT, TYPE=CONN3D2, ELSET=SHOCK-RIGID-ROT-LEFT
41203,11007,140
42203,12007,240
*CONNECTOR SECTION, ELSET=SHOCK-RIGID-ROT-LEFT, BEHAVIOR=RIGID-ROT
CARDAN
SHOCKS-LEFT
*CONNECTOR SECTION, ELSET=SHOCK-RIGID-ROT-RIGHT, BEHAVIOR=RIGID-ROT
CARDAN
SHOCKS-RIGHT
*CONNECTOR BEHAVIOR,NAME=RIGID-ROT
*CONNECTOR ELASTICITY,COMPONENT=4
1.e-3
**
********************************************************
**
**                          TIE RODS
**  make tie rods stay aligned  with the LINK connectors underneath
********************************************************
** the following nodes are to be used as REF NODES of the GRAPHICAL tie rods
** RF    LF    LR    RR
** 10005,11005,12005,13005
******************************************
**  for each tie rod:
**    create one node whose rotation are not dep on the KNUCLE
**    JOIN this additional node to the proper location on the KNUCKLE
**
*ORIENTATION,NAME=TIERODS-RIGHT
0.0, 0.378,0.069,    1.0,0.0,0.0
*ORIENTATION,NAME=TIERODS-LEFT
0.0,-0.378,0.069,    1.0,0.0,0.0
*ELEMENT,TYPE=CONN3D2,ELSET=TIE-RODS-VISUAL
50106,10005,5
51106,11005,1005
52106,12005,2005
53106,13005,3005
*CONNECTOR SECTION, ELSET=TIE-RODS-VISUAL
JOIN
**
**         create an orientation along the nodes
**               AXIAL -> create the orientation along the nodes
**               CARDAN -> prevents rigid body motion of the additional node
**
*ELEMENT, TYPE=CONN3D2, ELSET=TIERODS-RIGHT
50306,10005,100112
53306,13005,212
*ELEMENT, TYPE=CONN3D2, ELSET=TIERODS-LEFT
51306,11005,100111
52306,12005,211
*CONNECTOR SECTION, ELSET=TIERODS-RIGHT,BEHAVIOR=RIGID-ROT
 SLOT,CARDAN
 TIERODS-RIGHT
*CONNECTOR SECTION, ELSET=TIERODS-LEFT, BEHAVIOR=RIGID-ROT
 SLOT,CARDAN
 TIERODS-LEFT
**
**----------------------------------------------------------------
**
**                             Suspension ARS
**
** ----------------------------------------------------------------
**
**Upper Shock-1
**
*surface, name=shock-up-1, type=revolution
-1.122, -0.366117, 0.498873, -1.122, 45.712, 89.2503
START,         0.03,         0.13
 LINE,         0.03,        -0.05
*rigid body, analytical surface=shock-up-1, ref node=10235
**
**Lower Shock-1
**
*surface, name=shock-low-1, type=revolution
-1.122, -0.381889, 0.46596, -1.122, 45.6962, 89.2174
START,         0.02,         0.05
 LINE,         0.02,        -0.25
*rigid body, analytical surface=shock-low-1, ref node=13007
**
** vert-arm-1
**
**
** to-wheel-1
**
**
** short-horiz-1
**
**--------------------------------------------------------------------------
**Upper Shock-2
**
*surface, name=shock-up-2, type=revolution
-1.122, 0.366117, 0.498873, -1.122, -45.712, 89.2503
START,         0.03,         0.13
 LINE,         0.03,        -0.05
*rigid body, analytical surface=shock-up-2, ref node=10240
**
**Lower Shock-2
**
*surface, name=shock-low-2, type=revolution
-1.122, 0.381889, 0.46596, -1.122, -45.6962, 89.2174
START,         0.02,         0.05
 LINE,         0.02,        -0.25
*rigid body, analytical surface=shock-low-2, ref node=12007
**
** vert-arm-2
**
**
** to-wheel-2
**
**
** short-horiz-2
**
**
**-------------------------------------------------------------------
**
**Upper Shock-3
**
*surface, name=shock-up-3, type=revolution
1.045, -0.366117, 0.498873, 1.045, 45.712, 89.2503
START,         0.03,         0.13
 LINE,         0.03,        -0.05
*rigid body, analytical surface=shock-up-3, ref node=10135
**
**Lower Shock-3
**
*surface, name=shock-low-3, type=revolution
1.045, -0.381889, 0.46596, 1.045, 45.6962, 89.2174
START,         0.02,         0.05
 LINE,         0.02,        -0.25
*rigid body, analytical surface=shock-low-3, ref node=10007
** vert-arm-3
**
**
** to-wheel-3
**
**
** short-horiz-3
**
**--------------------------------------------------------------------------
**Upper Shock-4
**
*surface, name=shock-up-4, type=revolution
1.045, 0.366117, 0.498873, 1.045, -45.712, 89.2503
START,         0.03,         0.13
 LINE,         0.03,        -0.05
*rigid body, analytical surface=shock-up-4, ref node=10140
**
**Lower Shock-4
**
*surface, name=shock-low-4, type=revolution
1.045, 0.381889, 0.46596, 1.045, -45.6962, 89.2174
START,         0.02,         0.05
 LINE,         0.02,        -0.25
*rigid body, analytical surface=shock-low-4, ref node=11007
**
** vert-arm-4
**
**
** to-wheel-4
**
**
** short-horiz-4
**
**
**--------------------------------------------------------------------------
**
** A-Arm-2
**
**
**--------------------------------------------------------------------------
**
** A-Arm-1
**
**
**--------------------------------------------------------------------------
**
** A-Arm-4
**
**
**--------------------------------------------------------------------------
**
** A-Arm-3
**
**
**--------------------------------------------------------------------------
**                 BETWEEN SHOCKS
**
*Node
 99041, -1.11, -0.327, 0.63
 99042,-1.11, 0.327, 0.63
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*Nset, nset=RefPtz
 99057
*Elset, elset=between-shocks, generate
 99041,  99048,   1
**Rigid Body, ref node=RefPtz, elset=between-shocks
** -------------------------------------------------------------------------
**
** PART INSTANCE: front-tierods
**
*System
       0.825, 2.98023e-10,       0.605,       0.825,          1.,       0.605
       0.825, 2.98023e-10,       1.605
*Node
      95101,        -0.07,           0.,           0.
     195101,        -0.07,           0.,           0.
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**RF
*Element, type=R3D4,elset=RF-tierod-vis
95101, 95101,95102, 95103,95101
95102, 95103,95106, 95108,95104
95103, 95105, 95102,95101, 95107
95104, 95105,95106,95108,95107
**CF
*Element, type=R3D4,elset=CF-tierod-vis
95105, 195104,195108, 95110,95116
95106, 195101,195104, 95116,95115
95107, 195101, 95115,95109,195107
95108, 195107,195108,95110,95109
**LF
*Element, type=R3D4,elset=LF-tierod-vis
95109, 195116,195110, 95112,95114
95110, 95113,95114, 195116,195115
95111, 95111, 95113,195115, 195109
95112, 195109,195110,95112,95111
**
*Elset, elset=front-tierods-vis
RF-tierod-vis,CF-tierod-vis,LF-tierod-vis
*Rigid Body, ref node=10005, elset=RF-tierod-vis
*Rigid Body, ref node=11005, elset=LF-tierod-vis
*ELSET,ELSET=rack
 CF-tierod-vis
*system
**-------------------------------------------------------------------------
**
**  PART INSTANCE: rear-tierods
**
*System
      -0.912,-2.98023e-10,       0.605,      -0.912,          1.,       0.605
      -0.912,-2.98023e-10,       1.605
*Node
     95118,         0.07,           0.,           0.
    195118,         0.07,           0.,           0.
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**RB
*Element, type=R3D4,elset=RR-tierod-vis
95113, 95121,95123, 95126,95125
95114, 95126,95127, 95124,95125
95115, 95122,95123, 95121,95120
95116, 95122,95127, 95124,95120
**CB
*Element, type=R3D4,elset=CR-tierod-vis
95117, 195125,195124, 95128,95129
95118, 195121,195125, 95129,95118
95119, 195121,95118, 95119,195120
95120, 195120,195124, 95128,95119
**LB
*Element, type=R3D4,elset=LR-tierod-vis
95121, 195129,195128, 95131,95133
95122, 95132,95133,195129, 195118
95123, 95130,95132, 195118,195119
95124, 195119,195128, 95131,95130
**
*Elset, elset=rear-tierod-vis
RR-tierod-vis,CR-tierod-vis,LR-tierod-vis
*Rigid Body, ref node=13005, elset=RR-tierod-vis
*Rigid Body, ref node=12005, elset=LR-tierod-vis
*ELSET,ELSET=CABIN
 CR-tierod-vis,
*ELSET,ELSET=all_tierods_vis
RR-tierod-vis,CR-tierod-vis,LR-tierod-vis,
RF-tierod-vis,CF-tierod-vis,LF-tierod-vis
*System
**
**==========================================================================
**       NEW CHASSIS
**
**
** PART INSTANCE: iltis4-1
**
*System
3.34E-08	,	-0.69	,	0.26	,	-1	,	-0.69	,0.26
3.34E-08	,	-0.69	,	1.26	,
*Node
99101	,	-0.368269	,	1.45354	,	1.3502
99102	,	0.561612	,	1.57794	,	1.34107
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*Element	,	 type=R3D3
99101	,	99103	,	99102	,	99227
99102	,	99102	,	99105	,	99101
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*Nset	,nset=iltis4-1-RefPt_
99279
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**
** ----------------------------------------------------------------
**
** PART INSTANCE: sidemirror-1
**
*System
0.493358	,	0.79	,	1.22	,0.493358,1.79	,1.22
0.493358	,	0.79	,	2.22	,
*Node
98180	,	0.08	,	-0.04
98181	,	0.08	,	0.08
98182	,	0	,	0.08
98183	,	0	,	-0.04
98184	,	0.08	,	0.08
98185	,	0.08	,	0.08
*Element	,	 type=R3D4
98319	,98180	,98181	,98182	,98183
*Nset	,	 nset=sidemirror-1-RefPt_
98185
*Elset	,	 elset=sidemirror-1
98319
**Rigid Body	,ref node=sidemirror-1-RefPt_ ,elset=sidemirror-1
** ----------------------------------------------------------------
**
** PART INSTANCE: sidemirror-2
**
*System
0.493358	,	-0.85	,	1.22	,0.493358,0.15	,1.22
0.493358	,	-0.85	,	2.22	,
*Node
98186	,	0.08	,	-0.04
98187	,	0.08	,	0.08
98188	,	0	,	0.08
98189	,	0	,	-0.04
98190	,	0.08	,	0.08
98191	,	0.08	,	0.08
*Element	,	 type=R3D4
98320	,98186	,98187	,98188	,98189
*Nset	,	 nset=sidemirror-2-RefPt_
98191	,
*Elset	,	 elset=sidemirror-2
98320	,
**Rigid Body,ref node=sidemirror-2-RefPt_ ,elset=sidemirror-2
*ELSET,ELSET=CABIN
sidemirror-1, sidemirror-2
** ----------------------------------------------------------------
**
** PART INSTANCE: mirrorconnect-1
**
*surface, name=mirrorconnect-1, type=revolution
0.493358, -0.77, 1.18, 0.493358, 97.7108, -16.1848
START,        0.004,       -0.005
 LINE,        0.004,         0.09
*rigid body, analytical surface=mirrorconnect-1, ref node=199120
** ----------------------------------------------------------
**
** PART INSTANCE: mirrorconnect-2
**
*surface, name=mirrorconnect-2, type=revolution
0.493358, 0.79, 1.18, 0.493358, -97.6908, -16.1848
START,        0.004,       -0.005
 LINE,        0.004,         0.09
*rigid body, analytical surface=mirrorconnect-2, ref node=199166
**
*ELEMENT,TYPE=CONN3D2,ELSET=mirconnect
89999,99,199120
89998,99,199166
*CONNECTOR SECTION, ELSET=mirconnect
BEAM
*System
**===================================================================
**
** LEAF SPRING RIGID BODIES
**
** 6 totaly disconnected rigid bodies to visualize leaf-springs
** Their rigid ref nodes are:
** RF  LF    LR    RR
** 1   1001  2001  3001
*Node
  93002,         0.97,       -0.488,        0.531
  93003,         0.97,      -0.1585,          0.6
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*Element, type=R3D4, elset=RR-leaf-vis
93001, 93125, 93116, 93113, 93126
93002, 93116, 93123, 93124, 93113
93003, 93119, 93123, 93124, 93120
93004, 93125, 93119, 93120, 93126
*Rigid Body, ref node=3001, elset=RR-leaf-vis
**
*Element, type=R3D4, elset=CR-leaf-vis
93005, 93313, 93324, 93298, 93308
93006, 93320, 93324, 93298, 93305
93007, 93326, 93320, 93305, 93303
93008, 93326, 93313, 93308, 93303
***Rigid Body, ref node=93179, elset=CR-leaf-vis
**
*Element, type=R3D4, elset=LR-leaf-vis
93009, 93108, 93098, 93097, 93107
93010, 93108, 93103, 93102, 93107
93011, 93103, 93105, 93106, 93102
93012, 93098, 93105, 93106, 93097
*Rigid Body, ref node=2001, elset=LR-leaf-vis
**
*Element, type=R3D4, elset=LF-leaf-vis
93013, 93042, 93043, 93034, 93032
93014, 93043, 93024, 93023, 93034
93015, 93044, 93024, 93023, 93030
93016, 93042, 93044, 93030, 93032
*Rigid Body, ref node=1001, elset=LF-leaf-vis
**
*Element, type=R3D4, elset=CF-leaf-vis
93017, 93234, 93223, 93213, 93207
93018, 93232, 93234, 93207, 93212
93019, 93230, 93223, 93213, 93209
93020, 93232, 93230, 93209, 93212
***Rigid Body, ref node=93089, elset=CF-leaf-vis
**
*Element, type=R3D4, elset=RF-leaf-vis
93021, 93007, 93013, 93039, 93008
93022, 93009, 93013, 93039, 93036
93023, 93012, 93009, 93036, 93038
93024, 93012, 93007, 93008, 93038
*Rigid Body, ref node=1, elset=RF-leaf-vis
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*NSET,NSET=ALL_REFNODES
ALL_MUST_HAVE_REFNODES,100999
**********************************************************************
