*Heading
**
** 45 degree frame quasi static crush
**
*SECTION CONTROLS, NAME=Controls-Stiffness, HOURGLASS=STIFFNESS
**
*Node, Nset=Structure-Nset
1, 1000, 200.0001, 1
2, 1000, 185, 1
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**
*Node, nset=SPOTWELD-RefNODES
17294, 342, -40, 0
17295, 302, 40, 0
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**
*Element, type=S4RS
1, 1, 73, 3201, 210
2, 73, 74, 3202, 3201
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*Nset, nset=ENDA
51, 52, 53, 54, 55, 56
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*Nset, nset=ENDA_MPCNODE
17291,
**
*MPC
BEAM, ENDA, 17291
**
*Nset, nset=ENDB
1, 2, 5, 7, 9, 11
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*Nset, nset=ENDB_MPCNODE
17292,
**
*MPC
BEAM, ENDB, 17292
**
*Boundary
ENDA_MPCNODE, 1, 6
ENDB_MPCNODE, 2, 6
**
*Elset, elset=HAT
1, 2, 3, 4, 5, 6
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**
*Surface, Name=Hat-Surface
HAT,
**
*Elset, elset=PLATE
11851, 11852, 11853, 11854, 11855, 11856
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**
*Surface, Name=Plate-Surface
PLATE,
**
*Shellsection, elset=HAT, material=MATERIAL-HAT, CONTROLS=Controls-Stiffness
1.2,
*Shellsection, elset=PLATE, material=MATERIAL-PLATE, CONTROLS=Controls-Stiffness
0.8, 5
**
*FASTENER, INTERACTION NAME=Join-Plates, PROPERTY=Rigid, REFERENCE NODE SET=Spotweld-RefNodes

HAT-Surface, PLATE-Surface
**
*FASTENER PROPERTY, NAME=Rigid
3.5,
1, 6
**
*Material, name=MATERIAL-HAT
*Density
7.96E-10,
*Elastic
21000., 0.3
*Plastic
18.4,		0
19.2,		0.003381
20.2,		0.008097
21.9882,	0.016129
24.2769,	0.026739
25.8977,	0.035278
28.1991,	0.050208
28.7879,	0.054067
29.8989,	0.062376
31.1615,	0.075027
32.4072,	0.089379
35.4316,	0.133616
37.1236,	0.162824
38.2422,	0.183901
39.2629,	0.204543
41.6043,	0.262468
42.3932,	0.283609
42.9573,	0.309296
43.1842,	0.334826
**
*Material, name=MATERIAL-PLATE
*Density
7.96E-10,
*elastic
21000., 0.3
*plastic
16.5	,0
17.2164	,0.003364
19.9452	,0.016706
22.2449	,0.027908
23.8764	,0.03769
25.0267	,0.044159
27.1467	,0.059514
30.1501	,0.087685
31.3695	,0.102999
33.8039	,0.139996
35.519	,0.171141
38.3828	,0.230662
39.7382	,0.265366
40.9709	,0.304885
41.466	,0.341944
**
***********************************************************
** ADD AMPLITUDE DEFINITION
**
**
***********************************************************
** ADD INTERIOR CROSS-SECTION SURFACE DEFINITIONS
**
**
*NODE, NSET=NODE-1
99991, 170.0,   0.0, 25.5
*NODE, NSET=NODE-2
99992, 500.0,  75.0, 25.5
*NODE, NSET=NODE-3
99993, 830.0, 150.0, 25.5
*ORIENTATION, NAME=ORI-2
1.0, 1.0, 0.0, -1.0, 1.0, 0.0
***********************************************************
** ADD INTEGRATED OUTPUT SECTION DEFINITIONS
**
**
**
*NSET, NSET=A-OUT
7944, 8980, 6843
**
*STEP, NAME=STEP-
*DYNAMIC, EXPLICIT, ELEMENT BY ELEMENT
, 0.01
**
*BOUNDARY, AMPLITUDE=SMOOTH, TYPE=DISPLACEMENT
ENDB_MPCNODE, 1, 1, -1.0
*CONTACT
*CONTACT INCLUSIONS, ALL EXTERIOR
**
***********************************************************
** ADD FIELD OUTPUT DEFINITION
**
**
***********************************************************
** ADD HISTORY OUTPUT DEFINITIONS
**
**
**
*MONITOR, DOF=1, NODE=17292
**
*END STEP
