*heading
*preprint, model=yes
*node,nset=all_nodes
  26000,   3031.16406,   905.684082,   731.826172
  26001,   3027.84595,   876.696228,   745.263916
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**
*ELEMENT, TYPE=S3RS, ELSET=DOOR-INNER-LEFT
   14089,    27211,    27206,    27205
   14090,    27232,    27240,    27231
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*ELEMENT, TYPE=S4RS, ELSET=DOOR-INNER-LEFT
   13908,    27001,    27002,    27004,    27003
   13909,    27003,    27004,    27006,    27005
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*SHELL SECTION, CONTROLS=SHELLCONTROLS, ELSET=DOOR-INNER-LEFT, MATERIAL=ElasticPlastic-2
    1.2400,     3
*ELEMENT, TYPE=S3RS, ELSET=DOOR-OUTER-LEFT
   18155,    40255,    40250,    40259
   18381,    40292,    40293,    40536
   18397,    40529,    40274,    40319
   18398,    40319,    40320,    40529
*ELEMENT, TYPE=S4RS, ELSET=DOOR-OUTER-LEFT
   17933,    40000,    40003,    40004,    40001
   17934,    40003,    40006,    40007,    40004
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*SHELL SECTION, CONTROLS=SHELLCONTROLS, ELSET=DOOR-OUTER-LEFT, MATERIAL=ElasticPlastic-1
    0.9000,     3
**
*ELEMENT, TYPE=S3RS, ELSET=DOOR-SIDEB-LEFT
   16051,    32399,    32467,    32192
   16052,    32467,    32125,    32192
   16053,    32128,    32464,    32213
   16054,    32464,    32398,    32213
*ELEMENT, TYPE=S4RS, ELSET=DOOR-SIDEB-LEFT
   15662,    32000,    32001,    32003,    32002
   15663,    32002,    32003,    32005,    32004
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*SHELL SECTION, CONTROLS=SHELLCONTROLS, ELSET=DOOR-SIDEB-LEFT, MATERIAL=ElasticPlastic-2
    2.4000,     3
**
*ELEMENT, TYPE=S4RS, ELSET=DOOR-SIDEBAR-REINF-LEFT
   16664,    35000,    35001,    35089,    35088
   16665,    35088,    35089,    35003,    35002
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*SHELL SECTION, CONTROLS=SHELLCONTROLS, ELSET=DOOR-SIDEBAR-REINF-LEFT, MATERIAL=ElasticPlastic-2
    1.8000,     3
**
*ELEMENT, TYPE=S3RS, ELSET=DOOR-SIDEB-MTG1-LEFT
   16068,    33032,    33034,    33024
   16069,    33034,    33036,    33024
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*ELEMENT, TYPE=S4RS, ELSET=DOOR-SIDEB-MTG1-LEFT
   16056,    33058,    33002,    33006,    33005
   16057,    33002,    33000,    33007,    33006
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*SHELL SECTION, CONTROLS=SHELLCONTROLS, ELSET=DOOR-SIDEB-MTG1-LEFT, MATERIAL=ElasticPlastic-2
    2.0000,     3
*ELEMENT, TYPE=S3RS, ELSET=DOOR-SIDEB-MTG3-LEFT
   16262,    33134,    33130,    33126
   16263,    33126,    33125,    33134
   16264,    33129,    33133,    33137
   16265,    33137,    33122,    33129
*ELEMENT, TYPE=S4RS, ELSET=DOOR-SIDEB-MTG3-LEFT
   16134,    33120,    33149,    33150,    33124
   16135,    33149,    33121,    33125,    33150
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*SHELL SECTION, CONTROLS=SHELLCONTROLS, ELSET=DOOR-SIDEB-MTG3-LEFT, MATERIAL=ElasticPlastic-2
    2.0000,     3
**
*ELEMENT, TYPE=S4RS, ELSET=DOOR-SIDEB-ST1-LEFT
   15614,    31000,    31032,    31033,    31004
   15615,    31032,    31001,    31005,    31033
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*SHELL SECTION, CONTROLS=SHELLCONTROLS, ELSET=DOOR-SIDEB-ST1-LEFT, MATERIAL=ElasticPlastic-2
    1.5000,     3
**
*ELEMENT, TYPE=S4RS, ELSET=DOOR-TOPBAR-INN-LEFT
   16944,    36000,    36001,    36006,    36008
   16945,    36001,    36002,    36005,    36006
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*SHELL SECTION, CONTROLS=SHELLCONTROLS, ELSET=DOOR-TOPBAR-INN-LEFT, MATERIAL=ElasticPlastic-2
    1.0000,     3
**
*ELEMENT, TYPE=S3RS, ELSET=DOOR-TOPBAR-OUT-LEFT
   17617,    38220,    38315,    38015
*ELEMENT, TYPE=S4RS, ELSET=DOOR-TOPBAR-OUT-LEFT
   17362,    38000,    38001,    38007,    38008
   17363,    38001,    38002,    38005,    38007
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*SHELL SECTION, CONTROLS=SHELLCONTROLS, ELSET=DOOR-TOPBAR-OUT-LEFT, MATERIAL=ElasticPlastic-2
    1.0000,     3
**
*ELEMENT, TYPE=S4RS, ELSET=DOOR-WINDOWWG-LEFT
   17873,    39000,    39002,    39003,    39001
   17874,    39001,    39003,    39005,    39004
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*SHELL SECTION, CONTROLS=SHELLCONTROLS, ELSET=DOOR-WINDOWWG-LEFT, MATERIAL=ElasticPlastic-2
    1.0000,     3
**
*ELEMENT, TYPE=S3RS, ELSET=DOOR-REINF-LEFT
   15444,    30024,    30034,    30016
   15445,    30001,    30016,    30034
   15446,    30044,    30022,    30018
   15487,    30045,    30084,    30038
   15507,    30089,    30102,    30018
   15512,    30105,    30103,    30006
   15523,    30007,    30017,    30008
*ELEMENT, TYPE=S4RS, ELSET=DOOR-REINF-LEFT
   15434,    30000,    30001,    30003,    30002
   15435,    30006,    30007,    30004,    30005
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*SHELL SECTION, CONTROLS=SHELLCONTROLS, ELSET=DOOR-REINF-LEFT, MATERIAL=ElasticPlastic-2
    2.5000,     3
**
*ELEMENT, TYPE=S3RS, ELSET=DOOR-HINGE-LOW-LEFT
   13822,    26031,    26009,    26010
   13823,    26000,    26001,    26010
   13824,    26013,    26009,    26031
   13825,    26031,    26014,    26013
   13826,    26014,    26031,    26012
   13827,    26012,    26015,    26014
   13828,    26009,    26000,    26010
*ELEMENT, TYPE=S4RS, ELSET=DOOR-HINGE-LOW-LEFT
   13806,    26000,    26003,    26004,    26001
   13807,    26001,    26004,    26005,    26002
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*SHELL SECTION, CONTROLS=SHELLCONTROLS, ELSET=DOOR-HINGE-LOW-LEFT, MATERIAL=ElasticPlastic-2
    6.4000,     3
*ELEMENT, TYPE=S3RS, ELSET=DOOR-HINGE-UP-LEFT
   13867,    26228,    26221,    26219
   13868,    26216,    26217,    26220
   13869,    26220,    26217,    26218
   13878,    26210,    26206,    26203
*ELEMENT, TYPE=S4RS, ELSET=DOOR-HINGE-UP-LEFT
   13852,    26211,    26213,    26239,    26212
   13853,    26212,    26239,    26210,    26209
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*SHELL SECTION, CONTROLS=SHELLCONTROLS, ELSET=DOOR-HINGE-UP-LEFT, MATERIAL=ElasticPlastic-2
    6.4000,     3
**
*ELEMENT, TYPE=C3D8R, ELSET=DOOR-LOCK-LEFT
    2705,   800371,   800368,   800369,   800372,   800401,   800402,   800403,   800404
    2706,   800372,   800369,   800370,   800373,   800404,   800403,   800405,   800406
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***
*SOLID SECTION, ELSET=DOOR-LOCK-LEFT, MATERIAL=Elastic-DOOR-LOCK
**
**
*ELEMENT, TYPE=S3RS, ELSET=CABIN-D-HINGE-UP-LEFT
   31084,    82133,    82135,    82134
   31102,    82032,    82027,    82028
*ELEMENT, TYPE=S4RS, ELSET=CABIN-D-HINGE-UP-LEFT
   31008,    82000,    82001,    82007,    82006
   31009,    82001,    82002,    82008,    82007
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*SHELL SECTION, CONTROLS=SHELLCONTROLS, ELSET=CABIN-D-HINGE-UP-LEFT, MATERIAL=ElasticPlastic-1
    6.0270,     3
**
**
*ELEMENT, TYPE=S4RS, ELSET=CABIN-D-HINGE-LOW-LEFT
   31103,    83000,    83004,    83005,    83001
   31104,    83001,    83005,    83006,    83002
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*SHELL SECTION, CONTROLS=SHELLCONTROLS, ELSET=CABIN-D-HINGE-LOW-LEFT, MATERIAL=ElasticPlastic-1
    5.9770,     3
**
*ELEMENT, TYPE=S4RS, ELSET=DOOR-CLOSURE-LEFT
   42678,   800154,   800157,   800156,   800153
   42679,   800155,   800158,   800157,   800154
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*SHELL SECTION, CONTROLS=SHELLCONTROLS, ELSET=DOOR-CLOSURE-LEFT, MATERIAL=ElasticPlastic-2
    1.0000,     3
**
*SECTION CONTROLS, NAME=SHELLCONTROLS, HOURGLASS=STIFFNESS
**
*ELEMENT, TYPE=B31, ELSET=DOOR-LOCK-BEAM-LEFT
   54753,   800225,   800226
   54754,   800226,   800227
   54755,   800227,   800215
*BEAM GENERAL SECTION, ELSET=DOOR-LOCK-BEAM-LEFT, DENSITY=7.8900e-009,rotary inertia=isotropic
   28.2700,    63.6200,     0.0000,    63.6200,   127.2000

210000.0000, 80769.2308
**
*MPC
**BEAM,970872,40320
**BEAM,970874,40296
**BEAM,970877,40306
**BEAM,970879,40301
**BEAM,970882,40303
**BEAM,970884,40299
**BEAM,970886,40537
**BEAM,970850,40323
**BEAM,970815,40339
**BEAM,970786,40357
**BEAM,970755,40466
**BEAM,970758,40385
BEAM,40440,40443
**BEAM,970762,40452
**BEAM,970764,40495
**BEAM,970766,40491
**BEAM,970768,40526
**BEAM,970770,40429
BEAM,27557,27556
BEAM,27558,27556
BEAM,40241,27556
BEAM,27460,27459
BEAM,40218,27459
BEAM,27439,27438
BEAM,27440,27438
BEAM,40120,27438
BEAM,27434,27433
BEAM,40107,27433
BEAM,27254,27253
BEAM,40289,27253
BEAM,40292,27250
BEAM,40293,27250
BEAM,40536,27250
BEAM,40425,27231
BEAM,40426,27231
BEAM,40522,27184
BEAM,40523,27184
BEAM,27197,27186
BEAM,40507,27186
BEAM,40524,27186
BEAM,27180,27164
BEAM,40480,27164
BEAM,40492,27164
BEAM,27182,27168
BEAM,40482,27168
BEAM,40494,27168
BEAM,27162,27154
BEAM,40418,27154
BEAM,40454,27154
BEAM,27151,27139
BEAM,40414,27139
BEAM,40450,27139
BEAM,27110,27098
BEAM,40394,27098
BEAM,40442,27098
BEAM,27086,27079
BEAM,40382,27079
BEAM,40446,27079
BEAM,27078,27074
BEAM,40370,27074
BEAM,40459,27074
BEAM,27073,27070
BEAM,40366,27070
BEAM,40457,27070
BEAM,27056,27049
BEAM,39018,27049
BEAM,39022,27049
BEAM,40348,27049
BEAM,40359,27049
BEAM,27058,27045
BEAM,40352,27045
BEAM,40361,27045
BEAM,27041,27029
BEAM,40335,27029
BEAM,40343,27029
BEAM,27043,27025
BEAM,39024,27025
BEAM,39026,27025
BEAM,40331,27025
BEAM,40345,27025
BEAM,27021,27004
BEAM,40312,27004
BEAM,40327,27004
BEAM,27422,27019
BEAM,40329,27019
BEAM,40530,27019
BEAM,40154,27787
BEAM,40155,27787
BEAM,33035,27835
BEAM,33037,27835
BEAM,40225,27835
BEAM,40226,27835
BEAM,800394,27835
BEAM,27860,27858
BEAM,33019,27858
BEAM,33020,27858
BEAM,40029,27858
BEAM,40030,27858
BEAM,800382,27858
BEAM,40000,27414
BEAM,40003,27414
BEAM,40018,27847
BEAM,40019,27847
BEAM,40025,27847
BEAM,27750,27749
BEAM,40186,27749
BEAM,40195,27655
BEAM,40202,27655
BEAM,40198,27637
BEAM,40199,27637
BEAM,40245,27623
BEAM,40253,27623
BEAM,40243,27619
BEAM,40251,27619
BEAM,40248,27612
BEAM,40257,27612
BEAM,27564,27559
BEAM,27581,27559
BEAM,40249,27559
BEAM,33005,32390
BEAM,33044,32390
BEAM,33006,32389
BEAM,33045,32389
BEAM,33164,32462
BEAM,33165,32462
BEAM,33166,32462
BEAM,33146,32461
BEAM,33175,32461
BEAM,33178,32461
BEAM,33172,32466
BEAM,33181,32466
BEAM,33169,32463
BEAM,33170,32463
BEAM,31028,31024
BEAM,31049,31024
BEAM,31050,31024
BEAM,32073,31024
BEAM,32074,31024
BEAM,32263,31024
BEAM,32264,31024
BEAM,31031,31027
BEAM,31053,31027
BEAM,31054,31027
BEAM,32036,31027
BEAM,32044,31027
BEAM,32268,31027
BEAM,32269,31027
BEAM,31017,31016
BEAM,31043,31016
BEAM,31044,31016
BEAM,32249,31016
BEAM,32250,31016
BEAM,31023,31022
BEAM,31047,31022
BEAM,31048,31022
BEAM,32254,31022
BEAM,32255,31022
BEAM,31015,31011
BEAM,31041,31011
BEAM,31042,31011
BEAM,32040,31011
BEAM,32048,31011
BEAM,32240,31011
BEAM,32241,31011
BEAM,31007,31003
BEAM,31036,31003
BEAM,31037,31003
BEAM,32043,31003
BEAM,32051,31003
BEAM,32226,31003
BEAM,32227,31003
BEAM,31004,31000
BEAM,31032,31000
BEAM,31033,31000
BEAM,32026,31000
BEAM,32035,31000
BEAM,32221,31000
BEAM,32222,31000
BEAM,31012,31008
BEAM,31038,31008
BEAM,31039,31008
BEAM,32235,31008
BEAM,32236,31008
BEAM,32339,32265
BEAM,35138,32265
BEAM,35148,32265
BEAM,32359,32267
BEAM,35106,32267
BEAM,35117,32267
BEAM,32350,32223
BEAM,35147,32223
BEAM,35156,32223
BEAM,32371,32225
BEAM,35088,32225
BEAM,35108,32225
BEAM,32345,32246
BEAM,35060,32246
BEAM,35071,32246
BEAM,32365,32242
BEAM,35010,32242
BEAM,35027,32242
BEAM,32341,32260
BEAM,35057,32260
BEAM,35068,32260
BEAM,32361,32258
BEAM,35016,32258
BEAM,35030,32258
BEAM,32363,32253
BEAM,35100,32253
BEAM,35114,32253
BEAM,32343,32251
BEAM,35141,32251
BEAM,35151,32251
BEAM,32348,32232
BEAM,35063,32232
BEAM,35074,32232
BEAM,32369,32230
BEAM,35004,32230
BEAM,35024,32230
BEAM,32367,32239
BEAM,35094,32239
BEAM,35111,32239
BEAM,32347,32237
BEAM,35144,32237
BEAM,35167,32237
BEAM,27442,27441
BEAM,27443,27441
BEAM,27455,27441
BEAM,33118,27441
BEAM,33119,27441
BEAM,33120,27441
BEAM,33121,27441
BEAM,33149,27441
BEAM,33154,27441
BEAM,33161,27441
BEAM,40117,27441
BEAM,40118,27441
BEAM,40119,27441
BEAM,40146,27441
BEAM,40275,38038
BEAM,40531,38038
BEAM,40040,38060
BEAM,40278,38060
BEAM,40044,38072
BEAM,40279,38072
BEAM,38172,38170
BEAM,40070,38170
BEAM,40282,38170
BEAM,40078,38016
BEAM,40284,38016
BEAM,38013,38012
BEAM,40082,38012
BEAM,40285,38012
BEAM,40102,38226
BEAM,40287,38226
BEAM,38273,38272
BEAM,40106,38272
BEAM,27383,27000
BEAM,36240,27000
BEAM,27396,27382
BEAM,36237,27382
BEAM,27395,27381
BEAM,36193,27381
BEAM,27394,27379
BEAM,36158,27379
BEAM,27391,27376
BEAM,36259,27376
BEAM,27388,27373
BEAM,36140,27373
BEAM,27387,27371
BEAM,36087,27371
BEAM,27230,27229
BEAM,36019,27229
BEAM,27385,27384
BEAM,36013,27384
BEAM,36038,27384
BEAM,26206,26200
BEAM,26216,26200
BEAM,26218,26200
BEAM,26236,26200
BEAM,26237,26200
BEAM,26238,26200
BEAM,27432,26200
BEAM,27444,26200
BEAM,27492,26200
BEAM,27493,26200
BEAM,27494,26200
BEAM,27495,26200
BEAM,27496,26200
BEAM,27497,26200
BEAM,30037,26200
BEAM,30041,26200
BEAM,30042,26200
BEAM,30079,26200
BEAM,30082,26200
BEAM,30083,26200
BEAM,30085,26200
BEAM,30086,26200
BEAM,30101,26200
BEAM,30106,26200
BEAM,30109,26200
BEAM,26002,26000
BEAM,26005,26000
BEAM,26006,26000
BEAM,26008,26000
BEAM,26012,26000
BEAM,26025,26000
BEAM,27456,26000
BEAM,27458,26000
BEAM,27461,26000
BEAM,27483,26000
BEAM,27487,26000
BEAM,27488,26000
BEAM,27489,26000
BEAM,27490,26000
BEAM,30049,26000
BEAM,30050,26000
BEAM,30053,26000
BEAM,30054,26000
BEAM,30055,26000
BEAM,30056,26000
BEAM,30057,26000
BEAM,30058,26000
BEAM,30066,26000
BEAM,30072,26000
BEAM,30073,26000
BEAM,27861,27859
BEAM,800373,27859
BEAM,800376,27859
BEAM,27840,27838
BEAM,800390,27838
BEAM,800397,27838
BEAM,800400,27838
BEAM,39046,39014
BEAM,40176,39014
BEAM,39009,39008
BEAM,39010,39008
BEAM,39011,39008
BEAM,40100,39008
BEAM,39003,39002
BEAM,39005,39002
BEAM,39007,39002
BEAM,40543,39002
BEAM,40544,39002
**
**-------------------------------------------------------------------------
**
** Couplings for lower hinge: coupling reference nodes 9000009 and 9000010
**
**-------------------------------------------------------------------------
*NODE
9000010,3.060397e+003,  8.978824e+002, 7.169467e+02
*SURFACE,NAME=DOOR-HINGE-LOW-LT-COUP,TYPE=ELEMENT
DOOR-HINGE-LOW-LEFT,SPOS
*COUPLING,REF NODE=9000010,SURFACE=DOOR-HINGE-LOW-LT-COUP,CONSTRAINT NAME=DOOR-HINGE-LOW-LT-COUP
*DISTRIBUTING
****************
*NODE
9000009,3.060397e+003,  8.978824e+002, 7.169467e+02
*ELSET,ELSET=CABIN-D-HINGE-LOW-LT,GEN
31177,31179,1
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*SURFACE,NAME=CABIN-D-HINGE-LOW-LT,TYPE=ELEMENT
CABIN-D-HINGE-LOW-LEFT,SNEG
*COUPLING,REF NODE=9000009,SURFACE=CABIN-D-HINGE-LOW-LT,CONSTRAINT NAME=CABIN-D-HINGE-LOW-LT
*DISTRIBUTING
**-------------------------------------------------------------------------
**
** Couplings for upper hinge: coupling reference nodes 9000011 and 9000012
**
**-------------------------------------------------------------------------
*NODE
9000012,3.060397e+003,  8.978824e+002, 1.057365e+003
*SURFACE,NAME=DOOR-HINGE-UP-LT-COUP,TYPE=ELEMENT
DOOR-HINGE-UP-LEFT,SPOS
*COUPLING,REF NODE=9000012,SURFACE=DOOR-HINGE-UP-LT-COUP,CONSTRAINT NAME=DOOR-HINGE-UP-LT-COUP
*DISTRIBUTING
****************
*NODE
9000011,3.060397e+003,  8.978824e+002, 1.057365e+003
*ELSET,ELSET=CABIN-D-HINGE-UP-LT,GEN
31031,31045,1
31008,31022,1
*SURFACE,NAME=CABIN-D-HINGE-UP-LT,TYPE=ELEMENT
CABIN-D-HINGE-UP-LEFT,SNEG
*COUPLING,REF NODE=9000011,SURFACE=CABIN-D-HINGE-UP-LT,CONSTRAINT NAME=CABIND-D-HINGE-UP-LT
*DISTRIBUTING
**-------------------------------------------------------------------------
**
** Couplings for lock and door closure
**
**-------------------------------------------------------------------------
*NSET,NSET=DOOR-LOCK-BEAMS-LT-COUP-1
800226,800227,800215
*NSET,NSET=DOOR-LOCK-LT-COUP-1,GEN
800401,800433,1
*NSET,NSET=DOOR-LOCK-LT-COUP
DOOR-LOCK-LT-COUP-1,
*SURFACE,NAME=DOOR-LOCK-LT-COUP,TYPE=NODE
DOOR-LOCK-LT-COUP,1
*COUPLING,REF NODE=800225,SURFACE=DOOR-LOCK-LT-COUP,CONSTRAINT NAME=DOOR-LOCK-LT-COUP
*DISTRIBUTING
****************
*SURFACE,TYPE=ELEMENT,NAME=DOOR-CLOSURE-LEFT
DOOR-CLOSURE-LEFT,SPOS
*COUPLING,REF NODE=1800215,SURFACE=DOOR-CLOSURE-LEFT,CONSTRAINT NAME=DOOR-CLOSURE-LEFT
*KINEMATIC
**---------------------------------------------------------------
**
** add dummy mass/rotary inertia to coupling ref nodes
**
*ELEMENT, TYPE=MASS, ELSET=door_left_mass
816001,9000010
816002,9000012
816003,1800215
*MASS, ELSET=door_left_mass
1e-06,
*ELEMENT, TYPE=ROTARYI, ELSET=door_left_rotary
816021,9000010
816022,9000012
816023,1800215
*ROTARY INERTIA, ELSET=door_left_rotary
1e-06,1e-06,1e-06
**
*ELEMENT, TYPE=MASS, ELSET=cabin_mass
812001,9000011
812003,9000009
*MASS, ELSET=cabin_mass
1e-06,
*ELEMENT, TYPE=ROTARYI, ELSET=cabin_rotary
812021,9000011
812023,9000009
*ROTARY INERTIA, ELSET=cabin_rotary
1e-06,1e-06,1e-06
**-------------------------------------------------------------------------
**
**                     DOOR HINGES DEFINITION
**
**-------------------------------------------------------------------------
**
***********************************************************
** ADD ORIENTATION DEFINITION
**
**
***********************************************************
** ADD CONNECTOR ELEMENT CONNECTIVITY DEFINITION
**
**
***********************************************************
** ADD CONNECTOR ELEMENT SECTION DEFINITION
**
**
***********************************************************
** ADD CONNECTOR BEHAVIOR DEFINITION
**
**
**-------------------------------------------------------------------------
*MATERIAL, NAME=ElasticPlastic-1
*DENSITY
     7.8900e-009,
*ELASTIC
     2.1000e+005,      3.0000e-001
*PLASTIC
     270.000,      0.0000e+000
    320.29999,     0.048790
    366.29999,     0.0953100
    402.50000,     0.1398000
    438.79999,     0.2231000
    448.50000,     0.2624000
    449.00000,     2.3980000
**
**
*MATERIAL, NAME=ElasticPlastic-2
*DENSITY
     7.8900e-009,
*ELASTIC
     2.1000e+005,      3.0000e-001
*PLASTIC
    350.00000,     0.0000000
    388.50000,     0.0487900
    429.00000,     0.0953100
    480.00000,     0.1823000
    493.79999,     0.2231000
    494.00000,     0.2624000
    504.00000,     2.3980000
**
**
*MATERIAL, NAME=Elastic-DOOR-LOCK
*DENSITY
     2.5000e-009,
*ELASTIC
     2.1000e+005,      3.0000e-001
**-------------------------------------------------------------------------
*Nset, nset=Set-19
 82005, 82011, 82016, 82022, 82023, 82024
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*Nset, nset=Set-20
 83004, 83005, 83006, 83007, 83024, 83025
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*BOUNDARY
1800215, 1,6
Set-19, 1,6
Set-20, 1,6
**
**-------------------------------------------------------------------------
**
**                   Rigid pole definition
**
**-------------------------------------------------------------------------
**
*SYSTEM
2225.0, 1105.0, 200.0
*Node, nset=rigid_pole_nodes
      1,  -126.940002,           0.,        2000.
      2,  -126.940002,           0.,        1960.
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*Element, type=S4RS, elset=rigid_pole
   1,    1,    2,   53,   52
   2,    2,    3,   54,   53
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*SHELL SECTION, ELSET=RIGID_POLE, MATERIAL=ElasticPlastic-1
1.0,
*NODE, NSET=RIGID_POLE_REF_NODE
   2755, 0.0, 0.0, 0.0
*SYSTEM
**
***********************************************************
** ADD RIGID BODY DEFINITION
**
**
***********************************************************
** ADD DISPLACEMENT BOUNDARY CONDITIONS FOR RIGID BODY
**
**
**-------------------------------------------------------------------------
**
*SURFACE, NAME=SURFACE-DOOR-OUTER-LEFT
DOOR-OUTER-LEFT, SNEG
*SURFACE, NAME=SURFACE-DOOR-INNER-LEFT
DOOR-INNER-LEFT, SNEG
*SURFACE, NAME=SURFACE-DOOR-TOPBAR-OUT-LEFT
DOOR-TOPBAR-OUT-LEFT, SNEG
*CONTACT CLEARANCE, NAME=c1, ADJUST=YES, SEARCH ABOVE=0.0, SEARCH BELOW=10.0
*SURFACE, NAME=SURFACE_DOOR-SIDEB-MTG1-LEFT
DOOR-SIDEB-MTG1-LEFT,
**
**-------------------------------------------------------------------------
**
*STEP
*DYNAMIC, EXPLICIT, ELEMENT BY ELEMENT
,0.020
*VARIABLE MASS SCALING, TYPE=BELOW MIN, DT=1.2E-6, FREQUENCY=5
**
** General contact
**
*CONTACT
*CONTACT INCLUSIONS, ALL EXTERIOR
*CONTACT CLEARANCE ASSIGNMENT
SURFACE-DOOR-OUTER-LEFT, SURFACE-DOOR-INNER-LEFT, c1
SURFACE-DOOR-OUTER-LEFT, SURFACE-DOOR-TOPBAR-OUT-LEFT, c1
*SURFACE PROPERTY ASSIGNMENT, PROPERTY=FEATURE EDGE CRITERIA
 , PERIMETER EDGES
SURFACE_DOOR-SIDEB-MTG1-LEFT, 20.0
**
** Loading: velocity 30 km/h = 8333.33 mm/s
**
***********************************************************
** ADD VELOCITY BOUNDARY CONDITION FOR RIGID BODY
**
**
**
** Output requests
**
*OUTPUT, FIELD, NUMBER INTERVAL=20
*NODE OUTPUT
UT,VT,AT
*ELEMENT OUTPUT
S,PEEQ,
*CONTACT OUTPUT
CSTRESS, CFORCE
*OUTPUT, HISTORY, VAR=PRESELECT
*INCREMENTATION OUTPUT
DMASS,
*OUTPUT, HISTORY, FILTER=ANTIALIASING, TIME INTERVAL=1.0E-4
*NODE OUTPUT, NSET=RIGID_POLE_REF_NODE
U2, V2, A2, RF2,
*ELEMENT OUTPUT, ELSET=CONN_DOOR_HINGES
CTF, CU,
CEM1, CVM1,
*END STEP
