*HEADING
RAIL CRUSH ANALYSIS WITH COHESIVE CONTACT
*PREPRINT, ECHO=NO, HISTORY=NO, MODEL=NO, CONTACT=NO
** ----------------------------------------------------------------
** PART INSTANCE: RAILS
**
*NODE
1381, 15, -0.75, -60.75
1382, 15, -0.75, -56.3273506
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*ELEMENT, TYPE=S4RS
545, 1385, 1384, 1505, 1386
546, 1384, 1383, 1506, 1505
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*ELEMENT, TYPE=S3RS
1526, 6484, 6541, 6542
1527, 6542, 5834, 5835
*ELEMENT, TYPE=S4RS
1528, 1856, 1855, 2748, 2747
1529, 1855, 1854, 2749, 2748
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*ELEMENT, TYPE=S3RS
1583, 6542, 5835, 6543
*ELEMENT, TYPE=S4RS
1584, 2745, 2746, 2803, 2802
1585, 2746, 2747, 2804, 2803
*ELEMENT, TYPE=S3RS
1586, 6484, 6542, 6485
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*ELSET, ELSET=MID_SHELL_SECTION
777, 778, 779, 780, 781, 782
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*ELSET, ELSET=SIDE_SHELL_SECTION_1
4802, 4803, 4804, 4805, 4806, 4807
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*ELSET, ELSET=SIDE_SHELL_SECTION_2
2169, 2170, 2171, 2172, 2173, 2174
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*ELSET, ELSET=SIDE_SHELL_SECTION_3
3185, 3186, 3187, 3188, 3189, 3190
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*ELSET, ELSET=SIDE_SHELL_SECTION_4
545, 546, 547, 548, 549, 550
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*ELSET, ELSET=END_SHELL_SECTION_1
2865, 2866, 2867, 2868, 2869, 2870
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*ELSET, ELSET=END_SHELL_SECTION_2
3025, 3026, 3027, 3028, 3029, 3030
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**
*SHELL SECTION, ELSET=SIDE_SHELL_SECTION_4, CONTROLS=EC-1, MATERIAL=FEP04
1.5, 3
*SHELL SECTION, ELSET=MID_SHELL_SECTION, CONTROLS=EC-1, MATERIAL=FEP04
0.7, 3
*SHELL SECTION, ELSET=SIDE_SHELL_SECTION_2, CONTROLS=EC-1, MATERIAL=FEP04
1.5, 3
*SHELL SECTION, ELSET=END_SHELL_SECTION_1, CONTROLS=EC-1, MATERIAL=FEP04
1.5, 3
*SHELL SECTION, ELSET=END_SHELL_SECTION_2, CONTROLS=EC-1, MATERIAL=FEP04
1.5, 3
*SHELL SECTION, ELSET=SIDE_SHELL_SECTION_3, CONTROLS=EC-1, MATERIAL=FEP04
1.5, 3
*SHELL SECTION, ELSET=SIDE_SHELL_SECTION_1, CONTROLS=EC-1, MATERIAL=FEP04
1.5, 3
**
*ELSET, ELSET=RIGID_END1
END_SHELL_SECTION_1,
**
*RIGID BODY, REFNODE=REF_NODE_END1, ELSET=RIGID_END1
*RIGID BODY, REFNODE=REF_NODE_END2, ELSET=RIGID_END2
**
*SURFACE, TYPE=ELEMENT, NAME=SHELL_SURFACE
MID_SHELL_SECTION,
SIDE_SHELL_SECTION_1,
SIDE_SHELL_SECTION_2,
SIDE_SHELL_SECTION_3,
SIDE_SHELL_SECTION_4,
END_SHELL_SECTION_1,
END_SHELL_SECTION_2,
**
*SURFACE, NAME=SIDE_SHELL_SECTION_1
SIDE_SHELL_SECTION_1, SNEG
*SURFACE, NAME=SIDE_SHELL_SECTION_2
SIDE_SHELL_SECTION_2, SNEG
*SURFACE, NAME=SIDE_SHELL_SECTION_3
SIDE_SHELL_SECTION_3, SNEG
*SURFACE, NAME=SIDE_SHELL_SECTION_4
SIDE_SHELL_SECTION_4, SNEG
*SURFACE, NAME=UPPER-FLANGE-1
SIDE_SHELL_SECTION_1, SNEG
*SURFACE, NAME=LOWER-FLANGE-1
SIDE_SHELL_SECTION_2, SNEG
*SURFACE, NAME=UPPER-FLANGE-2
SIDE_SHELL_SECTION_3, SNEG
*SURFACE, NAME=LOWER-FLANGE-2
SIDE_SHELL_SECTION_4, SNEG
**
** ASSEMBLY NSETS
**
*NSET, NSET=REF_NODE_END1
1381
*NSET, NSET=REF_NODE_END2
6875
**
** ASSEMBLY ELSETS
**
*ELSET, ELSET=RIGID_END2
3025, 3026, 3027, 3028, 3029, 3030
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**
*SECTION CONTROLS, NAME=EC-1, HOURGLASS=STIFFNESS
1., 1., 1.
**
*AMPLITUDE, NAME=AMP1, DEFINITION=SMOOTH STEP
0., 0., 0.04, 1.0
**
*MATERIAL, NAME=FEP04
*DENSITY
3.5E-08,
*ELASTIC
207000., 0.3
*PLASTIC
185.301, 0.
207.861, 0.008121
238.332, 0.020301
266.223, 0.038573
286.672, 0.065979
316.451, 0.10709
355.946, 0.168755
402.373, 0.261253
468.442, 0.4
1201.66, 2.
**
*BOUNDARY
REF_NODE_END1, ENCASTRE
*BOUNDARY
REF_NODE_END2, 2, 2
REF_NODE_END2, 3, 3
REF_NODE_END2, 4, 4
REF_NODE_END2, 5, 5
REF_NODE_END2, 6, 6
**
***********************************************************
** ADD SURFACE INTERACTION DEFINITION
**
**
**
**
*STEP, NAME=STEP-1
*DYNAMIC, EXPLICIT, ELEMENT BY ELEMENT
, 0.04
**
*BULK VISCOSITY
0.06, 1.2
**
*VARIABLE MASS SCALING, DT=1E-06, TYPE=BELOW MIN, FREQUENCY=10
**
*BOUNDARY, AMPLITUDE=AMP1, TYPE=DISPLACEMENT
REF_NODE_END2, 1, 1, -200.0
**
*CONTACT, OP=NEW
*CONTACT INCLUSIONS, ALL EXTERIOR
**
***********************************************************
** ADD CONTACT PROPERTY ASSIGNMENT DEFINITION
**
**
**
**
*OUTPUT, FIELD, TIME INTERVAL=0.001, VARIABLE=PRESELECT
*NODE OUTPUT
 A, U, V
*CONTACT OUTPUT
 CSDMG, CSMAXSCRT, CFORCE
*OUTPUT, HISTORY, VARIABLE=PRESELECT, FILTER=ANTIALIASING, TIME INTERVAL=0.0001
*ENERGY OUTPUT,VAR=ALL
*NODE OUTPUT, NSET=REF_NODE_END2
 U1, V1, A1, RF1
*END STEP
