*Heading
RAIL CRUSH ANALYSIS WITH DEFORMABLE FASTENERS
*preprint, echo=NO, history=NO, model=NO, contact=NO
** ----------------------------------------------------------------
** PART INSTANCE: RAILS
**
*Node
1381, 15, -0.75, -60.75
1382, 15, -0.75, -56.3273506
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*Element, type=S4RS
545, 1385, 1384, 1505, 1386
546, 1384, 1383, 1506, 1505
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*Element, type=S3RS
1526, 6484, 6541, 6542
1527, 6542, 5834, 5835
*Element, type=S4RS
1528, 1856, 1855, 2748, 2747
1529, 1855, 1854, 2749, 2748
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*Element, type=S3RS
1583, 6542, 5835, 6543
*Element, type=S4RS
1584, 2745, 2746, 2803, 2802
1585, 2746, 2747, 2804, 2803
*Element, type=S3RS
1586, 6484, 6542, 6485
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*Elset, elset=mid_shell_section
777, 778, 779, 780, 781, 782
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*Elset, elset=side_shell_section_1
4802, 4803, 4804, 4805, 4806, 4807
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*Elset, elset=side_shell_section_2
2169, 2170, 2171, 2172, 2173, 2174
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*Elset, elset=side_shell_section_3
3185, 3186, 3187, 3188, 3189, 3190
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*Elset, elset=side_shell_section_4
545, 546, 547, 548, 549, 550
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*Elset, elset=end_shell_section_1
2865, 2866, 2867, 2868, 2869, 2870
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*Elset, elset=end_shell_section_2
3025, 3026, 3027, 3028, 3029, 3030
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*shellsection, elset=side_shell_section_4, controls=EC-1, material=FEP04
1.5, 3
*shellsection, elset=mid_shell_section, controls=EC-1, material=FEP04
0.7, 3
*shellsection, elset=side_shell_section_2, controls=EC-1, material=FEP04
1.5, 3
*shellsection, elset=end_shell_section_1, controls=EC-1, material=FEP04
1.5, 3
*shellsection, elset=end_shell_section_2, controls=EC-1, material=FEP04
1.5, 3
*shellsection, elset=side_shell_section_3, controls=EC-1, material=FEP04
1.5, 3
*shellsection, elset=side_shell_section_1, controls=EC-1, material=FEP04
1.5, 3
*ELSET, ELSET=RIGID_END1
end_shell_section_1,
*rigidbody, refnode=REF_NODE_END1, elset=RIGID_END1
** ----------------------------------------------------------------
*surface, type=ELEMENT, name=shell_surface
mid_shell_section,
side_shell_section_1,
side_shell_section_2,
side_shell_section_3,
side_shell_section_4,
end_shell_section_1,
end_shell_section_2,
*rigidbody, refnode=REF_NODE_END2, elset=RIGID_END2
*surface, name=side_shell_section_1
side_shell_section_1, SNEG
*surface, name=side_shell_section_2
side_shell_section_2, SNEG
*surface, name=side_shell_section_3
side_shell_section_3, SNEG
*surface, name=side_shell_section_4
side_shell_section_4, SNEG
**
**  Fasteners
**
*NODE
15976, 225.172394, 0.75, 51.9047012
16012, 177.586197, 0.75, 51.9047012
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*NSET, NSET=FASTENER_NSET1
15976, 16012, 16048, 16084, 16120
*NSET, NSET=FASTENER_NSET2
12115, 12151, 12593, 13161, 13197
***********************************************************
** MODIFY CONNECTOR SECTION DEFINITIONS
**
**
*CONNECTOR SECTION, ELSET=FASTENERS1
PROJECTION CARTESIAN, PROJECTION FLEXION-TORSION
ORI,
*CONNECTOR SECTION, ELSET=FASTENERS2
PROJECTION CARTESIAN, PROJECTION FLEXION-TORSION
ORI,
*ORIENTATION, NAME=ORI
1,0,0, 0,1,0
**
*FASTENER, INTERACTION NAME=WELD, PROPERTY=WELD, SEARCH RADIUS=7.0, ELSET=FASTENERS1,
  NUMBER OF LAYERS=1, REFERENCE NODE SET=FASTENER_NSET1, COUPLING=STRUCTURAL
*FASTENER, INTERACTION NAME=WELD, PROPERTY=WELD, SEARCH RADIUS=7.0, ELSET=FASTENERS2,
  NUMBER OF LAYERS=1, REFERENCE NODE SET=FASTENER_NSET2, COUPLING=STRUCTURAL
*FASTENER PROPERTY, NAME=WELD
4.0,
**
***********************************************************
** ADD CONNECTOR BEHAVIOR AND RIGID-ELASTICITY DEFINITION
**
**
*CONNECTOR DERIVED COMPONENT, NAME=NORMAL
3,
1.0,
*CONNECTOR DERIVED COMPONENT, NAME=NORMAL
4,5,
2.0, 2.0
*CONNECTOR DERIVED COMPONENT, NAME=SHEAR
6,
1.0,
*CONNECTOR DERIVED COMPONENT, NAME=SHEAR
1,2,
4.0, 4.0
***********************************************************
** ADD CONNECTOR PLASTICITY, POTENTIAL AND HARDENING DEFINITIONS
**
**
*CONNECTOR DAMAGE INITIATION, CRITERION=PLASTIC MOTION
0.1
*CONNECTOR DAMAGE EVOLUTION, TYPE=MOTION, SOFTENING=TABULAR
0.0, 0.0
1.0, 0.01
**
** Assembly Nsets
**
*Nset, nset=REF_NODE_END1
1381
*Nset, nset=REF_NODE_END2
6875
**
** Assembly Elsets
**
*Elset, elset=RIGID_END2
3025, 3026, 3027, 3028, 3029, 3030
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*sectioncontrols, name=EC-1, hourglass=STIFFNESS
1., 1., 1.
*amplitude, name=AMP1, DEFINITION=SMOOTH STEP
0., 0., 0.04, 1.0
*material, name=FEP04
*density
3.5E-08,
*elastic
207000., 0.3
*plastic
185.301, 0.
207.861, 0.008121
238.332, 0.020301
266.223, 0.038573
286.672, 0.065979
316.451, 0.10709
355.946, 0.168755
402.373, 0.261253
468.442, 0.4
1201.66, 2.
*surfaceinteraction, name=DEFAULT
*boundary
REF_NODE_END1, ENCASTRE
*boundary
REF_NODE_END2, 2, 2
REF_NODE_END2, 3, 3
REF_NODE_END2, 4, 4
REF_NODE_END2, 5, 5
REF_NODE_END2, 6, 6
*Step, name=Step-1
*dynamic, explicit, elementbyelement
, 0.04
*bulkviscosity
0.06, 1.2
*variablemassscaling, dt=1e-06, type=BELOWMIN, frequency=10
*boundary, amplitude=AMP1, type=DISPLACEMENT
REF_NODE_END2, 1, 1, -200.0
*contact, op=NEW
*contactinclusions
shell_surface,
*SURFACE PROPERTY ASSIGNMENT, PROPERTY=FEATURE EDGE CRITERIA
 , NO FEATURE EDGES
*SURFACE PROPERTY ASSIGNMENT, PROPERTY=THICKNESS
shell_surface, 1.4
*output, field, time interval=0.001, variable=preselect
*nodeoutput
A, U, V
*output, history, variable=PRESELECT, filter=ANTIALIASING, timeinterval=0.0001
*NODE OUTPUT, NSET=REF_NODE_END2
U1, V1, A1, RF1
*element output, elset=fasteners1
** Relative displacement components
CU,
** Total force components
CTF,
** Equivalent plastic relative motion for a coupled plasticity definition
CUPEQC,
** Connector plastic motion-based damage initiation criterion in the instantaneous slip direction
CDIPC
*endstep
