*HEADING
POLE TEST 58 KM/H: SUBMODEL
*NODE
      3200,  1742.18396     ,  841.961975     ,  508.560089
      3201,  1742.66602     ,  840.214294     ,  492.653107
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*NSET, NSET=door_nodes
   26000,   26001,   26002,   26003,   26004,   26005
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*NSET, NSET=door_frame_nodes
    3200,    3201,    3202,    3203,    3204,    3205
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********************************************************************************
*ELEMENT,TYPE=B31,ELSET=DOOR-LOCK-BEAM-LEFT
     54753,    800225,    800226
     54754,    800226,    800227
     54755,    800227,    800215
*ELEMENT,TYPE=S3RS,ELSET=CABIN-BOTTOM-LEFT
    817261,      8052,   9000792,   9000790
    817262,      8050,   9000790,   9000789
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*ELEMENT,TYPE=S3RS,ELSET=CABIN-D-HINGE-UP-LEFT
    818765,     82134,   9008715,   9008717
    818766,     82133,   9008716,   9008715
    818768,     82027,   9008562,   9008563
    818769,     82032,   9008563,   9008565
*ELEMENT,TYPE=S3RS,ELSET=CABIN-DOORJAMP-LEFT
    819143,     10508,   9001295,   9001291
    819144,     10506,   9001291,   9001290
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*ELEMENT,TYPE=S3RS,ELSET=DOOR-HINGE-LOW-LEFT
    822429,     26009,   9002922,   9002924
    822430,     26031,   9002924,   9002926
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*ELEMENT,TYPE=S3RS,ELSET=DOOR-HINGE-UP-LEFT
    822514,     26219,   9003003,   9003001
    822515,     26228,   9003005,   9003003
    822517,     26220,   9002993,   9002996
    822518,     26216,   9002992,   9002993
    822520,     26217,   9002995,   9002996
    822521,     26218,   9002997,   9002995
    822523,     26206,   9002966,   9002975
    822524,     26203,   9002967,   9002966
*ELEMENT,TYPE=S3RS,ELSET=DOOR-INNER-LEFT
    822622,     27206,   9003407,   9003410
    822623,     27205,   9003408,   9003407
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*ELEMENT,TYPE=S3RS,ELSET=DOOR-OUTER-LEFT
    825626,     40250,   9008000,   9007999
    825627,     40255,   9007999,   9008006
    825629,     40536,   9008066,   9008068
    825630,     40292,   9008065,   9008066
    825632,     40319,   9008112,   9008024
    825633,     40529,   9008025,   9008112
    825635,     40320,   9008116,   9008111
    825636,     40529,   9008112,   9008116
*ELEMENT,TYPE=S3RS,ELSET=DOOR-REINF-LEFT
    827486,     30034,   9004713,   9004733
    827487,     30016,   9004712,   9004713
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*ELEMENT,TYPE=S3RS,ELSET=DOOR-SIDEB-LEFT
    827839,     32467,   9005515,   9005749
    827840,     32192,   9005513,   9005515
    827842,     32125,   9005312,   9005315
    827843,     32192,   9005515,   9005312
    827845,     32213,   9005327,   9005563
    827846,     32128,   9005330,   9005327
    827848,     32213,   9005563,   9005561
    827849,     32464,   9005747,   9005563
*ELEMENT,TYPE=S3RS,ELSET=DOOR-SIDEB-MTG1-LEFT
    829411,     33034,   9005872,   9005887
    829412,     33024,   9005871,   9005872
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*ELEMENT,TYPE=S3RS,ELSET=DOOR-SIDEB-MTG3-LEFT
    829589,     33126,   9005936,   9005935
    829590,     33134,   9005947,   9005936
    829592,     33125,   9005933,   9005932
    829593,     33134,   9005936,   9005933
    829595,     33137,   9005945,   9005956
    829596,     33129,   9005944,   9005945
    829598,     33122,   9005923,   9005924
    829599,     33137,   9005924,   9005945
*ELEMENT,TYPE=S3RS,ELSET=DOOR-TOPBAR-OUT-LEFT
    831317,     38015,   9006866,   9006868
    831318,     38220,   9007259,   9006866
*ELEMENT,TYPE=S4RS,ELSET=CABIN-BACK-PILLAR-OUTER-LEFT
    816024,   9009084,   9000014,      3200,   9000013
    816025,   9009084,   9000013,      3201,   9000017
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*ELEMENT,TYPE=S4RS,ELSET=CABIN-BOTTOM-LEFT
    817260,      8051,   9000789,   9000790,   9000792
    817263,      8095,   9000877,   9000879,   9000883
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*ELEMENT,TYPE=S4RS,ELSET=CABIN-D-HINGE-LOW-LEFT
    818380,   9009667,   9008726,     83000,   9008727
    818381,   9009667,   9008727,     83004,   9008738
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*ELEMENT,TYPE=S4RS,ELSET=CABIN-D-HINGE-UP-LEFT
    818764,     82135,   9008717,   9008715,   9008716
    818767,     82028,   9008565,   9008563,   9008562
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*ELEMENT,TYPE=S4RS,ELSET=CABIN-DOORJAMP-LEFT
    819142,     10507,   9001290,   9001291,   9001295
    819145,     10601,   9001490,   9001482,   9001483
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*ELEMENT,TYPE=S4RS,ELSET=DOOR-CLOSURE-LEFT
    822172,   9010582,   9008948,    800154,   9008953
    822173,   9010582,   9008953,    800157,   9008957
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*ELEMENT,TYPE=S4RS,ELSET=DOOR-HINGE-LOW-LEFT
    822428,     26010,   9002926,   9002924,   9002922
    822431,     26010,   9002905,   9002902,   9002908
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*ELEMENT,TYPE=S4RS,ELSET=DOOR-HINGE-UP-LEFT
    822513,     26221,   9003001,   9003003,   9003005
    822516,     26217,   9002996,   9002993,   9002992
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*ELEMENT,TYPE=S4RS,ELSET=DOOR-INNER-LEFT
    822621,     27211,   9003410,   9003407,   9003408
    822624,     27232,   9003460,   9003458,   9003457
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*ELEMENT,TYPE=S4RS,ELSET=DOOR-OUTER-LEFT
    825625,     40259,   9008006,   9007999,   9008000
    825628,     40293,   9008068,   9008066,   9008065
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*ELEMENT,TYPE=S4RS,ELSET=DOOR-REINF-LEFT
    827485,     30024,   9004733,   9004713,   9004712
    827488,     30034,   9004670,   9004669,   9004713
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*ELEMENT,TYPE=S4RS,ELSET=DOOR-SIDEB-LEFT
    827838,     32399,   9005749,   9005515,   9005513
    827841,     32467,   9005315,   9005312,   9005515
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*ELEMENT,TYPE=S4RS,ELSET=DOOR-SIDEB-MTG1-LEFT
    829410,     33032,   9005887,   9005872,   9005871
    829413,     33034,   9005890,   9005873,   9005872
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*ELEMENT,TYPE=S4RS,ELSET=DOOR-SIDEB-MTG3-LEFT
    829588,     33130,   9005935,   9005936,   9005947
    829591,     33126,   9005932,   9005933,   9005936
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*ELEMENT,TYPE=S4RS,ELSET=DOOR-SIDEB-ST1-LEFT
    829824,   9012429,   9004866,     31000,   9004867
    829825,   9012429,   9004867,     31032,   9004930
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*ELEMENT,TYPE=S4RS,ELSET=DOOR-SIDEBAR-REINF-LEFT
    829920,   9012453,   9006045,     35000,   9006043
    829921,   9012453,   9006043,     35001,   9006046
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*ELEMENT,TYPE=S4RS,ELSET=DOOR-TOPBAR-INN-LEFT
    830480,   9012593,   9006351,     36000,   9006350
    830481,   9012593,   9006350,     36001,   9006354
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*ELEMENT,TYPE=S4RS,ELSET=DOOR-TOPBAR-OUT-LEFT
    831316,     38315,   9006868,   9006866,   9007259
    831319,   9012802,   9006832,     38000,   9006831
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*ELEMENT,TYPE=S4RS,ELSET=DOOR-WINDOWWG-LEFT
    832339,   9013057,   9007418,     39000,   9007419
    832340,   9013057,   9007419,     39002,   9007424
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*ELEMENT,TYPE=C3D8R,ELSET=DOOR-LOCK-LEFT
    832459,    800371,   9013088,   9013224,   9013099,   9013101,   9013227,   9013316,
   9013239
    832460,   9013088,    800368,   9013087,   9013224,   9013227,   9013091,   9013226,
   9013316
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********************************************************************************
*SOLID SECTION, ELSET=DOOR-LOCK-LEFT, MATERIAL=Elastic-DOOR-LOCK
*SHELL SECTION, ELSET=CABIN-BACK-PILLAR-OUTER-LEFT, CONTROLS = SHELLCONTROLS, MATERIAL=ElasticPlastic-1
1.1       ,         3
*SHELL SECTION, ELSET=CABIN-BOTTOM-LEFT, CONTROLS = SHELLCONTROLS, MATERIAL=ElasticPlastic-1
1.8       ,         3
*SHELL SECTION, ELSET=CABIN-D-HINGE-LOW-LEFT, CONTROLS = SHELLCONTROLS, MATERIAL=ElasticPlastic-1
5.977     ,         3
*SHELL SECTION, ELSET=CABIN-D-HINGE-UP-LEFT, CONTROLS = SHELLCONTROLS, MATERIAL=ElasticPlastic-1
6.027     ,         3
*SHELL SECTION, ELSET=CABIN-DOORJAMP-LEFT, CONTROLS = SHELLCONTROLS, MATERIAL=ElasticPlastic-1
1.033     ,         3
***SHELL SECTION, ELSET=DOOR-CLOSURE-IN-LEFT, CONTROLS = SHELLCONTROLS, MATERIAL=ElasticPlastic-2
**1.0       ,         3
*SHELL SECTION, ELSET=DOOR-CLOSURE-LEFT, CONTROLS = SHELLCONTROLS, MATERIAL=ElasticPlastic-2
1.0       ,         3
*SHELL SECTION, ELSET=DOOR-HINGE-LOW-LEFT, CONTROLS = SHELLCONTROLS, MATERIAL=ElasticPlastic-2
6.4       ,         3
*SHELL SECTION, ELSET=DOOR-HINGE-UP-LEFT, CONTROLS = SHELLCONTROLS, MATERIAL=ElasticPlastic-2
6.4       ,         3
*SHELL SECTION, ELSET=DOOR-INNER-LEFT, CONTROLS = SHELLCONTROLS, MATERIAL=ElasticPlastic-2
1.24      ,         3
*SHELL SECTION, ELSET=DOOR-OUTER-LEFT, CONTROLS = SHELLCONTROLS, MATERIAL=ElasticPlastic-1
0.9       ,         3
*SHELL SECTION, ELSET=DOOR-REINF-LEFT, CONTROLS = SHELLCONTROLS, MATERIAL=ElasticPlastic-2
2.5       ,         3
*SHELL SECTION, ELSET=DOOR-SIDEB-LEFT, CONTROLS = SHELLCONTROLS, MATERIAL=ElasticPlastic-2
2.4       ,         3
*SHELL SECTION, ELSET=DOOR-SIDEB-MTG1-LEFT, CONTROLS = SHELLCONTROLS, MATERIAL=ElasticPlastic-2
2.0       ,         3
*SHELL SECTION, ELSET=DOOR-SIDEB-MTG3-LEFT, CONTROLS = SHELLCONTROLS, MATERIAL=ElasticPlastic-2
2.0       ,         3
*SHELL SECTION, ELSET=DOOR-SIDEB-ST1-LEFT, CONTROLS = SHELLCONTROLS, MATERIAL=ElasticPlastic-2
1.5       ,         3
*SHELL SECTION, ELSET=DOOR-SIDEBAR-REINF-LEFT, CONTROLS = SHELLCONTROLS, MATERIAL=ElasticPlastic-2
1.8       ,         3
*SHELL SECTION, ELSET=DOOR-TOPBAR-INN-LEFT, CONTROLS = SHELLCONTROLS, MATERIAL=ElasticPlastic-2
1.0       ,         3
*SHELL SECTION, ELSET=DOOR-TOPBAR-OUT-LEFT, CONTROLS = SHELLCONTROLS, MATERIAL=ElasticPlastic-2
1.0       ,         3
*SHELL SECTION, ELSET=DOOR-WINDOWWG-LEFT, CONTROLS = SHELLCONTROLS, MATERIAL=ElasticPlastic-2
1.0       ,         3
*BEAM GENERAL SECTION, ELSET=DOOR-LOCK-BEAM-LEFT, DENSITY=7.8900E-09, SECTION=GENERAL
28.27     ,63.62     ,0.0       ,63.62     ,127.2     ,0.0       ,0.0

210000.0  ,80769.2308,0.0       ,0.0
*RIGID BODY, REF NODE =    1800215, ELSET = DOOR-CLOSURE-LEFT
********************************************************************************
*Node, nset=door_frame_nodes
 800229,   1874.87695,   867.284424,   938.169373
 800230,   1874.45996,   861.906982,   939.317688
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 *ELEMENT, TYPE=S4RS, ELSET=DOOR-CLOSURE-IN-LEFT
   42742,   800230,   800233,   800232,   800229
   42743,   800231,   800234,   800233,   800230
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*SHELL SECTION, CONTROLS=SHELLCONTROLS, ELSET=DOOR-CLOSURE-IN-LEFT, MATERIAL=ElasticPlastic-2
    1.0000,     3
**
*NSET, NSET=DOOR-LOCK-BEAMS-LT-COUP-1
  800215,  800226,  800227
*NSET, NSET=DOOR-LOCK-LT-COUP-1
  800401,  800402,  800403,  800404,  800405,  800406
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*NSET, NSET=DOOR-LOCK-LT-COUP
DOOR-LOCK-LT-COUP-1,
*ELSET, ELSET=CABIN-D-HINGE-LOW-LT, GENERATE
818580,818639,1
818644,818655,1
818660,818671,1
818676,818687,1
*ELSET, ELSET=CABIN-D-HINGE-UP-LT, GENERATE
818770,818829,1
818862,818921,1
*ELSET, ELSET=CABIN-DOORJAMP-LT, GENERATE
822108,822171,1
**--------------------------------------
**
** connection: door closure
**
*SURFACE, NAME = DOOR-CLOSURE-IN-LT, TYPE = ELEMENT
DOOR-CLOSURE-IN-LEFT
*SURFACE, NAME = CABIN-DOORJAMP-LT, TYPE = ELEMENT
CABIN-DOORJAMP-LT
*SURFACE, NAME = DOOR-LOCK-LT-COUP, TYPE = NODE
DOOR-LOCK-LT-COUP, 1.0
*TIE, NAME = DOOR-CLOSURE-IN-LT-DOORJAMP, POSITION TOLERANCE = 100.0
DOOR-CLOSURE-IN-LT,CABIN-DOORJAMP-LT
*COUPLING, REF NODE=1800291, CONSTRAINT NAME=CABIN-DOORJAMP-LT.5, SURFACE=CABIN-DOORJAMP-LT
*DISTRIBUTING
*COUPLING, REF NODE=800225, CONSTRAINT NAME=DOOR-LOCK-LT-COUP.4, SURFACE=DOOR-LOCK-LT-COUP
*DISTRIBUTING
**
** connection: door hinges and cabin
**
*SURFACE, NAME = CABIN-D-HINGE-LOW-LT, TYPE = ELEMENT
CABIN-D-HINGE-LOW-LEFT
*SURFACE, NAME = CABIN-D-HINGE-UP-LT, TYPE = ELEMENT
CABIN-D-HINGE-UP-LEFT
*SURFACE, NAME = DOOR-HINGE-LOW-LT-COUP, TYPE = ELEMENT
DOOR-HINGE-LOW-LEFT
*SURFACE, NAME = DOOR-HINGE-UP-LT-COUP, TYPE = ELEMENT
DOOR-HINGE-UP-LEFT
*COUPLING, REF NODE=9000010, CONSTRAINT NAME=DOOR-HINGE-LOW-LT-COUP.1, SURFACE=DOOR-HINGE-LOW-LT-COUP
*DISTRIBUTING
*COUPLING, REF NODE=9000009, CONSTRAINT NAME=CABIN-D-HINGE-LOW-LT.2, SURFACE=CABIN-D-HINGE-LOW-LT
*DISTRIBUTING
*COUPLING, REF NODE=9000012, CONSTRAINT NAME=DOOR-HINGE-UP-LT-COUP.3, SURFACE=DOOR-HINGE-UP-LT-COUP
*DISTRIBUTING
*COUPLING, REF NODE=9000011, CONSTRAINT NAME=CABIND-D-HINGE-UP-LT, SURFACE=CABIN-D-HINGE-UP-LT
*DISTRIBUTING
******************************************************************************************
**
** surface definitions for contact
**
*SURFACE, NAME=SURFACE-RIGID-POLE
RIGID_POLE,
*SURFACE, NAME = DOOR-INNER-LEFT-SURF, TYPE = ELEMENT
DOOR-INNER-LEFT
*SURFACE, NAME = CABIN-BACK-PILLAR-OUTER-LEFT-SURF, TYPE = ELEMENT
CABIN-BACK-PILLAR-OUTER-LEFT
******************************************************************************************
** add dummy mass/rotary inertia to coupling ref nodes
*ELEMENT, TYPE=MASS, ELSET=door_left_mass
816001,9000010
816002,9000012
816003,1800215
*MASS, ELSET=door_left_mass
1e-06,
*ELEMENT, TYPE=ROTARYI, ELSET=door_left_rotary
816021,9000010
816022,9000012
816023,1800215
*ROTARY INERTIA, ELSET=door_left_rotary
1e-06,1e-06,1e-06
**-----------------------------------------------------
** add dummy mass/rotary inertia to coupling ref nodes
*ELEMENT, TYPE=MASS, ELSET=cabin_mass
812001,9000011
812003,9000009
*MASS, ELSET=cabin_mass
1e-06,
*ELEMENT, TYPE=ROTARYI, ELSET=cabin_rotary
812021,9000011
812023,9000009
*ROTARY INERTIA, ELSET=cabin_rotary
1e-06,1e-06,1e-06
**---------------------------------------------------------------
**
**                  DOOR HINGES LEFT AND CABIN
**
**---------------------------------------------------------------
*ORIENTATION,NAME=ori_conn_door_left
 0.,0.,1., 1.,0.,0.
 3,0
*ELEMENT, TYPE=CONN3D2, ELSET=conn_door_hinge_left_cabin
** LOW
 620601,9000009,9000010
** UP
 620602,9000011,9000012
*CONNECTOR SECTION, ELSET=conn_door_hinge_left_cabin, BEHAVIOR=conn_door_hinges_beh
**join,align
join,revolute
ori_conn_door_left,
*CONNECTOR BEHAVIOR, NAME=conn_door_hinges_beh
*CONNECTOR ELASTICITY,COMPONENT=4
10.0,
**---------------------------------------------------------------
**
**                  DOOR LOCK LEFT AND CABIN
**
**---------------------------------------------------------------
*ELEMENT, TYPE=CONN3D2, ELSET=conn_door_lock_left_cabin_cart
 620605,1800291,1800215
*CONNECTOR SECTION, ELSET=conn_door_lock_left_cabin_cart
cartesian,cardan
ori_conn_door_left,
*ELEMENT, TYPE=CONN3D2, ELSET=conn_door_lock_left_cabin
 620615,1800291,1800215
*CONNECTOR SECTION, ELSET=conn_door_lock_left_cabin
axial,
**--------------------------------------
*MATERIAL, NAME=ElasticPlastic-1
*DENSITY
     7.8900e-009,
*ELASTIC
     2.1000e+005,      3.0000e-001
*PLASTIC
     270.000,      0.0000e+000
    320.29999,     0.048790
    366.29999,     0.0953100
    402.50000,     0.1398000
    438.79999,     0.2231000
    448.50000,     0.2624000
    449.00000,     2.3980000
**--------------------------------------
*MATERIAL, NAME=ElasticPlastic-2
*DENSITY
     7.8900e-009,
*ELASTIC
     2.1000e+005,      3.0000e-001
*PLASTIC
    350.00000,     0.0000000
    388.50000,     0.0487900
    429.00000,     0.0953100
    480.00000,     0.1823000
    493.79999,     0.2231000
    494.00000,     0.2624000
    504.00000,     2.3980000
**--------------------------------------
*MATERIAL, NAME=Elastic-DOOR-LOCK
*DENSITY
     2.5000e-009,
*ELASTIC
     2.1000e+005,      3.0000e-001
**--------------------------------------
**
*SECTION CONTROLS, NAME=SHELLCONTROLS, HOURGLASS=STIFFNESS
********************************************************************************
**
** RIGID POLE DEFINITION
**
*SYSTEM
2240.0, 1102.0, 1.15
*NODE
7000001, -127.0, 0.0, 2000.0
7000002, -127.0, 0.0, 1960.0
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*ELEMENT, TYPE=R3D4, elset=rigid_pole
7000001, 7000001, 7000002, 7000053, 7000052
7000002, 7000002, 7000003, 7000054, 7000053
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*Node, nset=rigid_pole_ref_node
7002755, 0.0, 0.0, 0.0
*SYSTEM
*Rigid Body, ref node=rigid_pole_ref_node, elset=rigid_pole
*BOUNDARY
rigid_pole_ref_node,1,6,0.0
********************************************************************************
**
**  connection:  CABIN-BOTTOM-LEFT and CABIN-DOORJAMP-LEFT
**
*node, nset=fastener_nset1
6100001, 2.91096E+03, 827.494, 569.777
6100002, 2.87672E+03, 828.404, 556.686
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*CONNECTOR SECTION, ELSET=FASTENER_ELEMENTS
** AXIAL used to prevent overconstraints!
AXIAL,
*FASTENER, INTERACTION=F1, ELSET=FASTENER_ELEMENTS, PROPERTY=Fastener-Rigid,
 SEARCH RADIUS=10.0, NUMBER OF LAYERS=1, REFERENCE NODE SET=fastener_nset1
*FASTENER PROPERTY, NAME=Fastener-Rigid
1.0,
**
**  connection:  CABIN-BACK-PILLAR-OUTER-LEFT and CABIN-DOORJAMP-LEFT
**
*node, nset=fastener_nset2
6200001, 1.90848E+03, 715.209, 1.75702E+03
6200002, 1.90507E+03, 735.811, 1.7197E+03
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*FASTENER, INTERACTION=F2, ELSET=FASTENER_ELEMENTS, PROPERTY=Fastener-Rigid,
 SEARCH RADIUS=10.0, NUMBER OF LAYERS=1, REFERENCE NODE SET=fastener_nset2
**
**  connection:  DOOR-OUTER-LEFT and DOOR-INNER-LEFT
**
*SURFACE, NAME=SURFACE-DOOR-OUTER-LEFT
DOOR-OUTER-LEFT, SNEG
*SURFACE, NAME=SURFACE-DOOR-INNER-LEFT-SNEG
DOOR-INNER-LEFT, SNEG
*TIE, NAME=TIE1, TYPE=NODE TO SURFACE, POSITION TOLERANCE=45.0, ADJUST=NO
SURFACE-DOOR-OUTER-LEFT, SURFACE-DOOR-INNER-LEFT-SNEG
**
**  connection:  DOOR-REINF-LEFT and DOOR-INNER-LEFT
**
*SURFACE, NAME=SURFACE-DOOR-REINF-LEFT
DOOR-REINF-LEFT, SPOS
*TIE, NAME=TIE2, TYPE=NODE TO SURFACE, POSITION TOLERANCE=15.0, ADJUST=NO
SURFACE-DOOR-REINF-LEFT, SURFACE-DOOR-INNER-LEFT-SNEG
**
**  connection:  DOOR-TOPBAR-INN-LEFT and DOOR-INNER-LEFT
**
*SURFACE, NAME=SURFACE-DOOR-TOPBAR-INN-LEFT
DOOR-TOPBAR-INN-LEFT, SNEG
*TIE, NAME=TIE3, TYPE=NODE TO SURFACE, POSITION TOLERANCE=50.0, ADJUST=NO
SURFACE-DOOR-TOPBAR-INN-LEFT, SURFACE-DOOR-INNER-LEFT-SNEG
**
**  connection:  DOOR-TOPBAR-OUT-LEFT and DOOR-OUTER-LEFT
**
*SURFACE, NAME=SURFACE-DOOR-TOPBAR-OUT-LEFT
DOOR-TOPBAR-OUT-LEFT, SNEG
*TIE, NAME=TIE4, TYPE=NODE TO SURFACE, POSITION TOLERANCE=50.0, ADJUST=NO
SURFACE-DOOR-TOPBAR-OUT-LEFT, SURFACE-DOOR-OUTER-LEFT
**
**  connection:  DOOR-LOCK-LEFT and DOOR-INNER-LEFT
**
*ELSET, ELSET=DOOR-LOCK-LEFT-IN, GENERATE
832459,832462,1
832467,832470,1
832475,832478,1
832483,832486,1
832491,832494,1
832499,832502,1
832507,832510,1
832515,832518,1
832523,832526,1
832531,832534,1
832539,832542,1
832547,832550,1
832555,832558,1
832563,832566,1
832571,832574,1
832579,832582,1
832587,832590,1
832595,832598,1
832603,832606,1
832611,832614,1
*SURFACE, NAME=SURFACE-DOOR-LOCK-LEFT
DOOR-LOCK-LEFT-IN, S1
*TIE, NAME=TIE5, TYPE=NODE TO SURFACE, POSITION TOLERANCE=20.0, ADJUST=NO
SURFACE-DOOR-LOCK-LEFT, SURFACE-DOOR-INNER-LEFT-SNEG
**
**  connection:  DOOR-SIBDEB-MTG1-LEFT and DOOR-INNER-LEFT
**
*NSET, NSET=MTG1
  33000,  33001,  33002,  33003,  33004,  33005
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*SURFACE, NAME=SURFACE-DOOR-SIBDEB-MTG1-LEFT, TYPE=NODE
MTG1,
*TIE, NAME=TIE6, TYPE=NODE TO SURFACE, POSITION TOLERANCE=160.0, ADJUST=NO
SURFACE-DOOR-SIBDEB-MTG1-LEFT, SURFACE-DOOR-INNER-LEFT-SNEG
**
**  connection:  DOOR-SIBDEB-MTG3-LEFT and DOOR-INNER-LEFT
**
*NSET, NSET=MTG3
  33118,  33119,  33120,  33121,  33122,  33123
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*SURFACE, NAME=SURFACE-DOOR-SIBDEB-MTG3-LEFT, TYPE=NODE
MTG3,
*TIE, NAME=TIE7, TYPE=NODE TO SURFACE, POSITION TOLERANCE=160.0, ADJUST=NO
SURFACE-DOOR-SIBDEB-MTG3-LEFT, SURFACE-DOOR-INNER-LEFT-SNEG
**
**  connection:  DOOR-WINDOWWG-LEFT and DOOR-INNER-LEFT
**
*NSET, NSET=NSET-DOOR-WINDOWWG-LEFT
  39000,  39001,  39002,  39003,  39004,  39005
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*SURFACE, NAME=SURFACE-DOOR-WINDOWWG-LEFT, TYPE=NODE
NSET-DOOR-WINDOWWG-LEFT,
*TIE, NAME=TIE8, TYPE=NODE TO SURFACE, POSITION TOLERANCE=130.0, ADJUST=NO
SURFACE-DOOR-WINDOWWG-LEFT, SURFACE-DOOR-INNER-LEFT-SNEG
**
**  connection:  DOOR-SIDEB-LEFT and DOOR-SIDEB-ST1-LEFT
**
*SURFACE, NAME=SURFACE-DOOR-SIDEB-LEFT
DOOR-SIDEB-LEFT,
*SURFACE, NAME=SURFACE-DOOR-SIDEB-ST1-LEFT
DOOR-SIDEB-ST1-LEFT,
*TIE, NAME=TIE9, TYPE=NODE TO SURFACE, POSITION TOLERANCE=5.0, ADJUST=NO
SURFACE-DOOR-SIDEB-LEFT, SURFACE-DOOR-SIDEB-ST1-LEFT
**
**  connection:  DOOR-SIDEB-LEFT and DOOR-SIDEBAR-REINF-LEFT
**
*SURFACE, NAME=SURFACE-DOOR-SIDEBAR-REINF-LEFT
DOOR-SIDEBAR-REINF-LEFT,
*TIE, NAME=TIE10, TYPE=NODE TO SURFACE, POSITION TOLERANCE=5.0, ADJUST=NO
SURFACE-DOOR-SIDEB-LEFT, SURFACE-DOOR-SIDEBAR-REINF-LEFT
**
**  connection:  DOOR-SIDEB-LEFT and DOOR-SIDEB-MTG1-LEFT
**
*SURFACE, NAME=SURFACE-DOOR-SIDEB-MTG1-LEFT
DOOR-SIDEB-MTG1-LEFT,
*TIE, NAME=TIE11, TYPE=NODE TO SURFACE, POSITION TOLERANCE=5.0, ADJUST=NO
SURFACE-DOOR-SIDEB-LEFT, SURFACE-DOOR-SIDEB-MTG1-LEFT
**
**  connection:  DOOR-SIDEB-LEFT and DOOR-SIDEB-MTG3-LEFT
**
*SURFACE, NAME=SURFACE-DOOR-SIDEB-MTG3-LEFT
DOOR-SIDEB-MTG3-LEFT,
*TIE, NAME=TIE12, TYPE=NODE TO SURFACE, POSITION TOLERANCE=5.0, ADJUST=NO
SURFACE-DOOR-SIDEB-LEFT, SURFACE-DOOR-SIDEB-MTG3-LEFT
**
**  connection:  CABIN-DOORJAMP-LEFT and CABIN-D-HINGE-UP-LEFT
**
*SURFACE, NAME=SURFACE-CABIN-DOORJAMP-LEFT-SPOS
CABIN-DOORJAMP-LEFT
*SURFACE, NAME=SURFACE-CABIN-D-HINGE-UP-LEFT
CABIN-D-HINGE-UP-LEFT
*TIE, NAME=TIE13, TYPE=NODE TO SURFACE, POSITION TOLERANCE=5.0, ADJUST=NO
SURFACE-CABIN-DOORJAMP-LEFT-SPOS, SURFACE-CABIN-D-HINGE-UP-LEFT
**
**  connection:  CABIN-DOORJAMP-LEFT and CABIN-D-HINGE-LOW-LEFT
**
*SURFACE, NAME=SURFACE-CABIN-D-HINGE-LOW-LEFT
CABIN-D-HINGE-LOW-LEFT,
*TIE, NAME=TIE14, TYPE=NODE TO SURFACE, POSITION TOLERANCE=5.0, ADJUST=NO
SURFACE-CABIN-DOORJAMP-LEFT-SPOS, SURFACE-CABIN-D-HINGE-LOW-LEFT
**
**  connection:  DOOR-INNER-LEFT and DOOR-HINGE-UP-LEFT
**
*SURFACE, NAME=SURFACE-DOOR-INNER-LEFT-SPOS
DOOR-INNER-LEFT,
*SURFACE, NAME=SURFACE-DOOR-HINGE-UP-LEFT
DOOR-HINGE-UP-LEFT,
*TIE, NAME=TIE15, TYPE=NODE TO SURFACE, POSITION TOLERANCE=5.0, ADJUST=NO
SURFACE-DOOR-INNER-LEFT-SPOS, SURFACE-DOOR-HINGE-UP-LEFT
**
**  connection:  DOOR-INNER-LEFT and DOOR-HINGE-LOW-LEFT
**
*SURFACE, NAME=SURFACE-DOOR-HINGE-LOW-LEFT
DOOR-HINGE-LOW-LEFT,
*TIE, NAME=TIE16, TYPE=NODE TO SURFACE, POSITION TOLERANCE=5.0, ADJUST=NO
SURFACE-DOOR-INNER-LEFT-SPOS, SURFACE-DOOR-HINGE-LOW-LEFT
********************************************************************************
**
**  Submodel definitions
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**
********************************************************************************
** Traditional submodeling interface:
** ADD DRIVEN BOUNDARY NODES DEFINITION (*SUBMODEL)
**
**
********************************************************************************
**
*NSET, NSET=DRIVEN_NODES_OUT-CABIN-DOORJAMP-LEFT
10887, 10886, 10885, 10884, 10883, 10882
10828, 10827, 10826, 10825, 10824, 10823, 10822
*NSET, NSET=DRIVEN_NODES_OUT-CABIN-BOTTOM-LEFT
8042, 8047, 8104, 8105, 8106, 8107, 8108, 8115
8044, 8048, 8109, 8110, 8111, 8112, 8113, 8117
*NSET, NSET=QA_TEST
DRIVEN_NODES_OUT-CABIN-DOORJAMP-LEFT, DRIVEN_NODES_OUT-CABIN-DOORJAMP-LEFT
**
** Loading: velocity 58 km/h = 16111.12 mm/s
**
*INITIAL CONDITIONS, TYPE=VELOCITY
door_nodes,2,16111.12
door_frame_nodes,2,16111.12
***
*STEP
*DYNAMIC, EXPLICIT, ELEMENT BY ELEMENT
,0.02
*VARIABLE MASS SCALING, TYPE=BELOW MIN, DT=0.6E-6, FREQUENCY=5
**
********************************************************************************
** Traditional submodeling interface:
** ADD DRIVEN VARIABLES DEFINITION (*BOUNDARY)
**
** Field import interface:
** ADD DRIVEN VARIABLES DEFINITION (*FIELD IMPORT, *EXTERNAL FIELD)
**
********************************************************************************
**
*CONTACT
*CONTACT INCLUSIONS, ALL EXTERIOR
*CONTACT EXCLUSIONS
SURFACE-CABIN-DOORJAMP-LEFT-SPOS, DOOR-INNER-LEFT-SURF
SURFACE-CABIN-DOORJAMP-LEFT-SPOS, CABIN-BACK-PILLAR-OUTER-LEFT-SURF
,CABIN-D-HINGE-LOW-LT
,CABIN-D-HINGE-UP-LT
**
*OUTPUT, FIELD, NUMBER INTERVAL=10
*NODE OUTPUT
UT, VT, AT
*ELEMENT OUTPUT
MISES, PEEQ
*OUTPUT, HISTORY
*ENERGY OUTPUT
ETOTAL, ALLKE, ALLIE, ALLAE, ALLPD
**
*OUTPUT, HISTORY, TIME INTERVAL=0.16E-3
*NODE OUTPUT, NSET=DRIVEN_NODES_OUT-CABIN-DOORJAMP-LEFT
U1, U2, U3
*NODE OUTPUT, NSET=DRIVEN_NODES_OUT-CABIN-BOTTOM-LEFT
U1, U2, U3
*OUTPUT, HISTORY, TIME INTERVAL=0.0001
*NODE OUTPUT, NSET=QA_TEST
U1, U2, U3
**
*END STEP
