*Heading
*Preprint, echo=NO, model=NO, history=NO, contact=NO
**
** PARTS
**
*Part, name=Base
*Node
      1,         170.,  -42.2999992,           0.
      2,         170.,  -40.2999992,           0.
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*Element, type=C3D10M
   1,  805,  806,  807,  808, 1295, 1294, 1293, 1297, 1296, 1298
   2,  805,  808,  809,  810, 1297, 1300, 1299, 1302, 1301, 1303
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*Nset, nset=Set-4, generate
    1,  8604,     1
*Elset, elset=Set-4, generate
    1,  5219,     1
** Section: Section-1
*Solid Section, elset=Set-4, material=Material-1
,
*End Part
**
*Part, name=Link_1
*Node
      1,         137.,     -153.125,           0.
      2,         170.,      -30.125,           0.
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*Element, type=C3D10M
    1,  1022,  1023,  1024,  1025,  2873,  2872,  2871,  2875,  2874,  2876
    2,  1026,  1027,  1028,  1022,  2879,  2878,  2877,  2881,  2880,  2882
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*Nset, nset=Set-4, generate
     1,  20821,      1
*Elset, elset=Set-4, generate
     1,  14063,      1
** Section: Section-1
*Solid Section, elset=Set-4, material=Material-1
,
*End Part
**
*Part, name=Link_2
*Node
      1,  -162.503815,   23.5190392,          95.
      2,  -165.187088,   24.8606796,          92.
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*Element, type=C3D10M
   1,  441,  442,   96,   44,  652,  651,  650,  654,  653,  655
   2,  443,  442,   96,  441,  657,  651,  656,  658,  652,  650
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*Nset, nset=Set-4, generate
    1,  4129,     1
*Elset, elset=Set-4, generate
    1,  2394,     1
** Section: Section-1
*Solid Section, elset=Set-4, material=Material-1
,
*End Part
**
*Part, name=Link_3
*Node
      1,   180.195343,  -8.42460346,   13.8342104
      2,   179.195343,  -7.67963982,   14.5013161
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*Element, type=C3D10M
   1,  145,  570,  571,  572,  796,  795,  794,  798,  797,  799
   2,  570,  572,  145,  573,  797,  798,  796,  801,  800,  802
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*Nset, nset=Set-4, generate
    1,  4974,     1
*Elset, elset=Set-4, generate
    1,  2822,     1
** Section: Section-1
*Solid Section, elset=Set-4, material=Material-1
,
*End Part
**
**
** ASSEMBLY
**
*Assembly, name=Assembly
**
*Instance, name=Base-1, part=Base
*End Instance
**
*Instance, name=Link_1-1, part=Link_1
          0.,   210.825001,           0.
*End Instance
**
*Instance, name=Link_2-1, part=Link_2
        265.,   283.776387,    62.397931
        265.,   283.776387,    62.397931, 264.552786417577, 283.001790311963, 62.8451445824229, 104.4775108398
*End Instance
**
*Instance, name=Link_3-1, part=Link_3
        125., 659.886717114387, 440.002791776802
        125., 659.886717114387, 440.002791776802, 125.684791080437, 659.637473555865, 440.687582857239, 207.99088954809
*End Instance
**
*Node
      1,           0.,   57.7000008,  8.3888305e-15
*Node
      2,           0.,   57.7000008,  8.3888305e-15
*Node
      3,         170.,   180.699997,  2.30677529e-07
*Node
      4,         170.,   760.937012,         335.
*Element, type=CONN3D2
1, 1, 2
*Connector Section, elset=hinge1, behavior=Hinge
Hinge,
Hinge_1,
*Element, type=CONN3D2
2, 2, 3
*Connector Section, elset=hinge2, behavior=Hinge
Hinge,
Hinge_2,
*Element, type=CONN3D2
3, 3, 4
*Connector Section, elset=hinge3, behavior=Hinge
Hinge,
Hinge_3,
*Nset, nset=base, instance=Base-1, generate
    1,  8604,     1
*Elset, elset=base, instance=Base-1, generate
    1,  5219,     1
*Nset, nset=refPt-base
 1,
*Nset, nset=link1, instance=Link_1-1, generate
     1,  20821,      1
*Elset, elset=link1, instance=Link_1-1, generate
     1,  14063,      1
*Nset, nset=refPt-link1
 2,
*Nset, nset=link2, instance=Link_2-1, generate
    1,  4129,     1
*Elset, elset=link2, instance=Link_2-1, generate
    1,  2394,     1
*Nset, nset=refPt-link2
 3,
*Nset, nset=link3, instance=Link_3-1, generate
    1,  4974,     1
*Elset, elset=link3, instance=Link_3-1, generate
    1,  2822,     1
*Nset, nset=refPt-link3
 4,
*Nset, nset=hinge1
 1, 2
*Elset, elset=hinge1
 1,
*Nset, nset=hinge2
 2, 3
*Elset, elset=hinge2
 2,
*Nset, nset=hinge3
 3, 4
*Elset, elset=hinge3
 3,
*Orientation, name=Hinge_1
          0.,           1.,           0.,           0.,           0.,           1.
1, 0.
*Orientation, name=Hinge_2
          1.,           0.,           0.,           0.,           0.,           1.
1, 0.
*Orientation, name=Hinge_3
         -1.,           0.,           0.,           0.,           0.,           1.
1, 0.
** Constraint: base
*Rigid Body, ref node=refPt-base, elset=base
** Constraint: link1
*Rigid Body, ref node=refPt-link1, elset=link1
** Constraint: link2
*Rigid Body, ref node=refPt-link2, elset=link2
** Constraint: link3
*Rigid Body, ref node=refPt-link3, elset=link3
*End Assembly
*Connector Behavior, name=Hinge
*Connector Elasticity, component=4
500.,
*Connector Damping, component=4
10000.,
**
** MATERIALS
**
*Material, name=Material-1
*Density
 7.8e-09,
*Elastic
210000., 0.3
**
** BOUNDARY CONDITIONS
**
** Name: Base_fix Type: Displacement/Rotation
*Boundary
refPt-base, 1, 1
refPt-base, 2, 2
refPt-base, 3, 3
refPt-base, 4, 4
refPt-base, 5, 5
refPt-base, 6, 6
** ----------------------------------------------------------------
**
** STEP: Step-1
**
*Step, name=Step-1
Robot Motion
*Dynamic, Explicit, direct user control
0.01, 500.
*Bulk Viscosity
0.06, 1.2
**
** OUTPUT REQUESTS
**
*Restart, write, number interval=1, time marks=NO
**
*Output, field, variable=PRESELECT
**
*Output, history, variable=PRESELECT
**
*End Step
