*Heading
Abaqus to Dymola Co-simulation
*Preprint, echo=NO, model=NO, history=NO, contact=NO
**
** PARTS
**
*Part, name=tool
*End Part
**
**
** ASSEMBLY
**
*Assembly, name=Assembly
**
*Instance, name=tool-1, part=tool
*Node
      1,  -51.0111313,   26.2738876,           0.
      2,  -51.2261124,   26.5366421,           0.
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*Element, type=DC3D8
 1,   42,  259, 1343,  243,    1,   23,  239,   28
 2,  259,   47,  251, 1343,   23,    2,   24,  239
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*Nset, nset=Set-1
    3,    4,    6,    7,    9,   10
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*Elset, elset=Set-1, generate
   31,  2115,     1
*Nset, nset=Set-2
    1,    2,    3,    4,    5,    6
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*Elset, elset=Set-2, generate
  1,  30,   1
** Section: HSS
*Solid Section, elset=Set-2, material=HSS
,
** Section: Steel
*Solid Section, elset=Set-1, material=steel
,
*End Instance
**
*Nset, nset=SENSOR_SET, instance=tool-1
 265,
*Nset, nset=ALL, instance=tool-1, generate
    1,  2838,     1
*Elset, elset=_Surf-1_S3, internal, instance=tool-1
  1,  2,  7,  8, 13, 14, 19, 20, 25, 26
*Surface, type=ELEMENT, name=Surf-1
_Surf-1_S3, S3
*Elset, elset=_lateral_heat_S4, internal, instance=tool-1, generate
  2,  30,   2
*Elset, elset=_lateral_heat_S6, internal, instance=tool-1, generate
  1,  29,   2
*Surface, type=ELEMENT, name=lateral_heat
_lateral_heat_S4, S4
_lateral_heat_S6, S6
*Elset, elset=_Water_S1, internal, instance=tool-1, generate
  31,  447,    1
*Elset, elset=_Water_S4, internal, instance=tool-1
   37,   42,   54,   57,   64,   73
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*Elset, elset=_Water_S3, internal, instance=tool-1
   31,   32,   36,   41,   42,   45
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*Elset, elset=_Water_S5, internal, instance=tool-1
   35,   38,   43,   46,   47,   50
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*Elset, elset=_Water_S6, internal, instance=tool-1
   82,  102,  104,  106,  161,  499
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*Elset, elset=_Water_S2, internal, instance=tool-1, generate
 1699,  2115,     1
*Surface, type=ELEMENT, name=Water
_Water_S1, S1
_Water_S4, S4
_Water_S6, S6
_Water_S2, S2
_Water_S3, S3
_Water_S5, S5
*End Assembly
*Amplitude, name=Working
             0.,              1.,            200.,             1.2,            500.,             1.4
**
** MATERIALS
**
*Material, name=HSS
*Conductivity
120.,
*Density
 7e-09,
*Specific Heat
 6e+08,
*Material, name=steel
*Conductivity
70.,
*Density
 7.8e-09,
*Specific Heat
 4.6e+08,
**
** PREDEFINED FIELDS
**
** Name: starting_temp   Type: Temperature
*Initial Conditions, type=TEMPERATURE
ALL, 45.
** ----------------------------------------------------------------
**
** STEP: Step-1
**
*Step, name=Step-1, inc=1000000
*Heat Transfer, end=PERIOD, deltmx=20.
0.01, 700., 0.0001, 5.,
**
** LOADS
**
** Name: Friction   Type: Surface heat flux
*Dsflux, amplitude=Working
Surf-1, S, 4000.
** Name: Lateral   Type: Surface heat flux
*Dsflux, amplitude=Working
lateral_heat, S, 300.
**
** INTERACTIONS
**
** Interaction: Water
*Sfilm
Water, F, 20., 1.
**
** OUTPUT REQUESTS
**
*Restart, write, frequency=0
**
** FIELD OUTPUT: F-Output-1
**
*Output, field
*Node Output
NT,
*Element Output, directions=YES
HFL,
**
*End Step
