*HEADING
Note: This file intended for use with the Element Selection Lecture Series.
**
*NODE
       1,          0.,          0.
       2,    0.833333,          0.
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**
**
*ELEMENT, TYPE=CPE8, ELSET=BLOCK
       1,       1,       3,      23,      21,       2,      15,
      22,      14
       2,       3,       5,      25,      23,       4,      16,
      24,      15
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**
** end
**
*NSET, NSET=END
      13,      20,      33,      40,       53
**
** block
**
*SOLID SECTION, ELSET=BLOCK, MATERIAL=STEEL
          1.,
**
** steel
**
*MATERIAL, NAME=STEEL
**
*ELASTIC, TYPE=ISO
      2.E+11,         0.3
**
*PLASTIC
       2.E+8,          0.
**
** step  1,Default
**
*STEP, AMPLITUDE=RAMP, INC=100, NLGEOM
This load case is the default load case that always appears
*STATIC
         0.1,          1.
**
** fixed
**
*BOUNDARY, OP=NEW
       1, 1,,          0.
       1, 2,,          0.
      14, 1,,          0.
      14, 2,,          0.
      21, 1,,          0.
      21, 2,,          0.
      34, 1,,          0.
      34, 2,,          0.
      41, 1,,          0.
      41, 2,,          0.
**
** loaded
**
*BOUNDARY, OP=NEW
      13, 2,,          .7
      20, 2,,          .7
      33, 2,,          .7
      40, 2,,          .7
      53, 2,,          .7
**
*END STEP
