*HEADING
Note: This file intended for use with the Element Selection Lecture Series.
**
*NODE
    1,       0.00,       0.00,       0.00
    2,      20.00,       0.00,       0.00
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*ELEMENT, TYPE=CPS4R, ELSET=BEAMS
    1,     1,     2,   102,   101
    2,     2,     3,   103,   102
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*SOLID SECTION, ELSET=BEAMS,MATERIAL=MATEA
50.0,
*MATERIAL, NAME=MATEA
*DENSITY
 6E-06,
*ELASTIC
2.E5,.3
*NSET,NSET=FIX
1,101,201
*NSET,NSET=LOAD
111,
*AMPLITUDE, NAME=SMOOTH, DEFINITION=SMOOTH STEP
0., 0., 1., 1.
**
*STEP
*DYNAMIC, EXPLICIT
, 1.
*BOUNDARY
FIX,1,2
*BOUNDARY, AMPLITUDE=SMOOTH
LOAD,2,2,-10.
*OUTPUT,FIELD
*NODE OUTPUT
U,RF
*ELEMENT OUTPUT
S,
*OUTPUT,HISTORY,VARIABLE=PRESELECT
*END STEP
