*HEADING
Note: This file intended for use with the Element Selection Lecture Series.
**
*PREPRINT, MODEL=YES
*NODE
       1,         0.5,          0.,          2.
       2,    0.444444,          0.,          2.
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**
**
*ELEMENT, TYPE=S4R5, ELSET=WALL
       1,       1,       2,      12,      11
       2,       2,       3,      13,      12
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*ELEMENT,TYPE=S4R5,ELSET=GUTTER
     271,      10,     312,     320,      20
     272,     312,     313,     321,     320
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*ELEMENT,TYPE=S4R5,ELSET=WALL
     481,      10,     560,     570,      20
     482,     560,     561,     571,     570
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**
** prop1
**
*SHELL SECTION, ELSET=GUTTER, MATERIAL=STEEL
0.02,
*SHELL SECTION, ELSET=WALL, MATERIAL=STEEL
0.02,
**
** mat1
**
*MATERIAL, NAME=STEEL
**
*ELASTIC, TYPE=ISO
200.E9,0.3
**
*NSET, NSET=PATH, GENERATE
440, 446, 1
**
** step  1,Case1
**
*STEP
*STATIC
**
** ground
**
*BOUNDARY, OP=NEW
       1, 1,,          0.
       1, 2,,          0.
       1, 3,,          0.
      11, 1,,          0.
      11, 2,,          0.
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     868, 3,,          0.
**
*BOUNDARY, OP=NEW
       1, 4,,          0.
       1, 5,,          0.
       1, 6,,          0.
      11, 4,,          0.
      11, 5,,          0.
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     868, 6,,          0.
*DLOAD
GUTTER,P,-10.E6
**
*OUTPUT,FIELD
*NODE OUTPUT
U,
*OUTPUT,FIELD
*ELEMENT OUTPUT
S,
*END STEP
