*HEADING
Note: This file intended for use with the Element Selection Lecture Series.
**
*NODE
       1,          0.,          0.
       2,        0.03,          0.
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**
**
*ELEMENT, TYPE=C3D20, ELSET=BLOCK
       1,       1,       3,      20,      18,     110,     112,     129,
     127,       2,      13,      19,      12,     111,     122,     128,
     121,      80,      81,      87,      86
       2,       3,       5,      22,      20,     112,     114,     131,
     129,       4,      14,      21,      13,     113,     123,     130,
     122,      81,      82,      88,      87
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**
** block
**
*SOLID SECTION, ELSET=BLOCK, MATERIAL=STEEL
          1.,
**
*Elset, elset=load_S4, generate
  5,  40,   5
*Surface, type=ELEMENT, name=load
load_S4, S4
**
** steel
**
*MATERIAL, NAME=STEEL
**
*DENSITY
       7850.,
**
*ELASTIC, TYPE=ISO
    2.07E+11,         0.3
**
** step  1
**
*STEP
*FREQUENCY, eigensolver=lanczos, SIM=NO
 3, , ,
**
** fixed
**
*BOUNDARY, OP=NEW
       1, 1,,          0.
       1, 2,,          0.
       1, 3,,          0.
      12, 1,,          0.
      12, 2,,          0.
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     287, 3,,          0.
**
*OUTPUT, FIELD, VARIABLE=PRESELECT
*OUTPUT, HISTORY
*MODAL OUTPUT
*END STEP
