*HEADING
Note: This file intended for use with the Element Selection Lecture Series.
**
*NODE
     229,         0.3,          0.,        0.07
     230,          0.,          0.
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**
**
*ELEMENT, TYPE=C3D8I, ELSET=BLOCK
       1,     230,     231,     237,     236,     260,     261,
     267,     266
       2,     231,     232,     238,     237,     261,     262,
     268,     267
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**
** block
**
*SOLID SECTION, ELSET=BLOCK, MATERIAL=STEEL
          1.,
**
** steel
**
*MATERIAL, NAME=STEEL
**
*DENSITY
       7850.,
**
*ELASTIC, TYPE=ISO
    2.07E+11,         0.3
**
*Nset, nset=fixed, generate
 230,  314,    6
*Nset, nset=free, generate
 235,  319,    6
*Nset, nset=free1n
 235
**
** step  1
**
*STEP
*FREQUENCY, eigensolver=lanczos, SIM=NO
 3, , ,
**
**
*BOUNDARY
fixed, 1,3
**
*OUTPUT,FIELD, VARIABLE=PRESELECT
*OUTPUT,HISTORY
*MODAL OUTPUT
*END STEP
