*HEADING
Note: This file intended for use with the Element Selection Lecture Series.
**
*NODE
       1,          0.,          0.
       2,        0.03,          0.
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**
**
*ELEMENT, TYPE=C3D10, ELSET=BLOCK
       1,       1,      23,     179,       3,      12,     111,     100,
       2,      13,     101
       2,     201,     179,      23,     203,     190,     111,     117,
     202,     191,     118
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**
** block
**
*SOLID SECTION, ELSET=BLOCK, MATERIAL=STEEL
          1.,
**
*Elset, elset=load_S1
  23,  24,  48,  49,  73,  74,  98,  99, 123, 124, 148, 149, 173, 174, 198, 199
*Surface, type=ELEMENT, name=load
load_S1, S1
**
** steel
**
*MATERIAL, NAME=STEEL
**
*DENSITY
       7850.,
**
*ELASTIC, TYPE=ISO
    2.07E+11,         0.3
**
*Nset, nset=fixed
   1,  12,  23,  34,  45,  56
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*Nset, nset=free
  11,  22,  33,  44,  55,  66
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*Nset, nset=free1n
 11,
**
** step  1
**
*STEP
*FREQUENCY, eigensolver=lanczos, SIM=NO
 3, , ,
**
**
*BOUNDARY
fixed,1,3
**
*OUTPUT, FIELD, VARIABLE=PRESELECT
*OUTPUT, HISTORY
*MODAL OUTPUT
*END STEP
