*Heading
**
** PARTS
**
*Part, name=BALL
*Node
      1, 0.00499999989, -0.00600000005,           0.
      2,           0., -0.00600000005,           0.
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*Element, type=C3D8R
  1, 212,  12,  11, 203, 294,  51,  52, 285
  2, 236, 262, 213, 220, 318, 344, 295, 302
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*Elset, elset=EALL, internal, generate
   1,  393,    1
*Solid Section, elset=EALL, material=MATERIAL-1
*End Part
**
*Part, name=CHANNEL
*Node
      1, -0.00999999978, 0.0144999996,           0.25e-3
      2,           0., 0.0144999996,           0.25e-3
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*Element, type=R3D4
  1,   1,  27,  53,   6
  2,  27,  28,  52,  53
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*End Part
**
**
** ASSEMBLY
**
*Assembly, name=Assembly
**
*Instance, name=CHANNEL-1, part=CHANNEL
*End Instance
**
*Instance, name=BALL-1, part=BALL
*End Instance
**
*Element, type=CONN3D2, elset=CONN
 1, BALL-1.2, CHANNEL-1.4
 2, BALL-1.4, CHANNEL-1.2
*Connector Section, elset=CONN, behavior=ConnProp-1
 Axial,
 CSYS-1,
*Nset, nset=BALL, instance=BALL-1, generate
   1,  852,    1
*Elset, elset=BALL, instance=BALL-1, generate
   1,  393,    1
*Nset, nset=CHANNEL, instance=CHANNEL-1, generate
   1,  304,    1
*Elset, elset=CHANNEL, instance=CHANNEL-1, generate
   1,  152,    1
*Nset, nset=CHANNELREF, instance=CHANNEL-1
 305,
*Nset, nset=MONITOR, instance=BALL-1
 6,
*Surface, type=ELEMENT, name=CHANNEL
 CHANNEL, SNEG
*Elset, elset=_BALL_S4, internal, instance=BALL-1
  21,  31,  37,  38,  39,  44
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*Elset, elset=_BALL_S6, internal, instance=BALL-1
  10,  13,  18,  26,  28,  30
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*Elset, elset=_BALL_S5, internal, instance=BALL-1
  22, 123, 306, 358
*Surface, type=ELEMENT, name=BALL
_BALL_S4, S4
_BALL_S6, S6
_BALL_S5, S5
**
*Orientation, name=CSYS-1
1., 0., 0., 0., 1., 0.
1, 0.
*Rigid Body, ref node=CHANNELREF, elset=CHANNEL
*End Assembly
*Connector Behavior, name=ConnProp-1
*Connector Elasticity, nonlinear, component=1
 -125.   ,  -0.005
   -0.047,  -0.0035
    0.   ,   0.
    0.047,   0.002
    1.250,   0.005
**
** MATERIALS
**
*Material, name=MATERIAL-1
*Damping, alpha=1000.
*Density
 7800.,
*Elastic
 2e+11, 0.3
**
** INTERACTION PROPERTIES
**
*Surface Interaction, name=NOFRIC
*Friction
 0.,
**
** BOUNDARY CONDITIONS
**
*Boundary
 CHANNELREF, 1, 6
 BALL, 1, 1
 BALL, 3, 3
** ----------------------------------------------------------------
**
** STEP: Coupled
**
*Step, name=Coupled
*Dynamic, Explicit
 , 0.02
**
** INTERACTIONS
**
*Contact Pair, interaction=NOFRIC, mechanical constraint=PENALTY
 BALL, CHANNEL
**
** OUTPUT REQUESTS
**
*Restart, write, number interval=1, time marks=NO
**
*Output, field, var=PRESELECT
*Output, history, var=PRESELECT
*Node Output, nset=MONITOR
 U2,
*End Step
