*Heading
*Node, nset=all
      1,           0.,           0.
      2,          50.,           0.
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*Element, type=CPE8P, elset=all
 1,  1,  2,  4,  3, 23, 24, 25, 26
 2,  3,  4,  6,  5, 25, 27, 28, 29
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**
*Solid Section, elset=all, material=soil
1.,
**
*Nset, nset=bot
  1,  2, 23
*Elset, elset=bot
 1,
*Surface, type=ELEMENT, name=surfload
10, S3
*Nset, nset=porebc
 21, 22
**
*Material, name=soil
*Elastic
 1e+08, 0.3
*Permeability, specific=1.
 0.0002,0.
**
** BOUNDARY CONDITIONS
*Boundary
all, 1, 1
bot, 2, 2
**
**
**
** Specify the initial void ratio here.
**
**
**
** ----------------------------------------------------------------
**
*Step, name=Step-1
*Soils, consolidation, end=PERIOD, creep=none
1e-06, 1e-06, , ,
**
**
**
** Specify the distributed pressure load here.
**
**
**
*Output, field, variable=PRESELECT
*Output, history
*Node Output, nset=all
POR, RVF, RVT, U2
*Element Output, elset=all
FLVEL2, S22
*Energy Output, elset=all
ALLSE, ALLWK, ETOTAL
*End Step
** ----------------------------------------------------------------
**
**
**
** Create a new step here.
**
**
**
**
**
