*Heading
**
** PARTS
**
*Part, name=drum
*Node
         1, -10.0           ,   0.0           ,  300.0
    999999, -10.0           ,   0.0           ,  300.0
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*Element, type=S3R, elset=drum
       174,       834,      1022,       754
       189,       419,       325,       257
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*Element, type=S4R, elset=drum
       101,       726,       712,       595,       757
       102,       757,       595,       594,       783
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*Elset, elset=inner
       101,       102,       103,       104,       105,       106
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**
*Shell Section, elset=drum, material=mat1
0.5,
*End Part
**
*Part, name=particles
**
** generator surfaces
**
*Node, nset=inlet
   9001,   152.578033,  -221.990005,   251.736633
   9002,   152.578033,  -41.8100014,   251.736633
   9003,   464.347168,  -41.8100014,   431.736633
   9004,   464.347168,  -221.990005,   431.736633
   9005,   484.403198,   24.0214672,   437.692444
   9006,   484.403198,   228.225464,   437.692444
   9007,   151.849426,   228.225464,   245.692474
   9008,   151.849426,   24.0214672,   245.692474
*Element, type=SFM3D4R, elset=inlet1
      9001,      9001,      9002,      9003,      9004
*Element, type=SFM3D4R, elset=inlet2
      9002,      9005,      9008,      9007,      9006
**
*Surface section, elset=inlet1
*Surface section, elset=inlet2
**
*Surface, type=ELEMENT, name=inlet1
inlet1, spos
*Surface, type=ELEMENT, name=inlet2
inlet2, spos
*End Part
**
** ASSEMBLY
**
*Assembly, name=Assembly
**
*Instance, name=drum-1, part=drum
*End Instance
*Instance, name=particles-1, part=particles
*End Instance
*Orientation, name=oriConn
-0.4045694, -0.5876094, 0.70074154,  0.29380683,  -0.8091447,  -0.5088835
*Element, type=CONN3D2, elset=conn
1,drum-1.999999,drum-1.1
*Connector Section, elset=conn
cardan,
oriConn,
*Nset,nset=rig, instance=drum-1
1,
*Nset, nset=fix, instance=drum-1
999999,
**
*Transform, type=R, nset=rig
-0.4045694, -0.5876094, 0.70074154,  0.29380683,  -0.8091447,  -0.5088835
**
*Rigid Body, ref node=rig, elset=drum-1.drum
**
*Surface, name=drum
drum-1.inner, spos
**
*End Assembly
**
*Material, name=mat1
*Density
7.85e-09
*Elastic
2.08e+05,0.3
**
*Boundary
rig,1,3
fix,1,6
**
*Step
particle generation,  gravity settling, rotation
**
*Dynamic, Explicit, direct user control
5e-6, 1.3
**
*Connector Motion, type=VELOCITY
conn,4, 0.0
conn,5, 0.0
conn,6,-1.0
**
*Output, history, frequency=1
*Element Output, elset=conn
CRM1,CRM2,CRM3,CVR1,CVR2,CVR3
**
*Output, Field, number interval=10
*Node Output
u,v
**
*End Step
**
