*Heading
Abaqus/Standard LINEAR DYNAMICS (CIRCUIT BOARD ON BRACKETS)
**
**
**
** PART INSTANCE: BOARD
**
*Node
      1,          0.7,         -0.5
      2,          1.3,         -0.5
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*Element, type=S4
 1,   1,  29, 197,  42
 2,  29,  30, 198, 197
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*Nset, nset=BOARD, generate
   1,  888,    1
*Elset, elset=BOARD, generate
   1,  828,    1
**
** --------------------------------------------------------
**
** PART INSTANCE: CHIP
**
*System
          1.,          0.,        0.15,          1.,          1.,        0.15
*Node
    889,         -0.5,         -0.3,           0.
    890,           0.,         -0.3,           0.
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*Element, type=C3D8
829, 895, 896, 899, 898, 889, 890, 893, 892
830, 896, 897, 900, 899, 890, 891, 894, 893
831, 901, 902, 905, 904, 895, 896, 899, 898
832, 902, 903, 906, 905, 896, 897, 900, 899
*Nset, nset=CHIP, generate
 889,  906,    1
*Elset, elset=CHIP, generate
 829,  832,    1
**
**
** --------------------------------------------------------
**
** PART INSTANCE: SMNT-1   (SURFACE MOUNT #1)
**
*System
       -0.75,         1.5,          0.,        0.25,         1.5,          0.
*Node
    907,       -0.625,       -0.625,           0.
    908,       -0.375,       -0.625,           0.
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*Element, type=C3D8I
833, 919, 920, 926, 925, 907, 908, 914, 913
834, 920, 921, 927, 926, 908, 909, 915, 914
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*Nset, Nset=SMNT-1, generate
 907,  978,    1
*Elset, Elset=SMNT-1, generate
 833,  857,    1
**
**  ---------------------------------------------------
**
** PART INSTANCE: SMNT-2   (SURFACE MOUNT #2)
**
*System
       -0.75,        -1.5,          0.,        0.25,        -1.5,          0.
*Node
    979,       -0.625,       -0.625,           0.
    980,       -0.375,       -0.625,           0.
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*Element, type=C3D8I
858,  991,  992,  998,  997,  979,  980,  986,  985
859,  992,  993,  999,  998,  980,  981,  987,  986
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*Nset, Nset=SMNT-2, generate
  979,  1050,     1
*Elset, Elset=SMNT-2, generate
 858,  882,    1
**
** --------------------------------------------------------
**
** PART INSTANCE: BRACKET-1  (RIGHT SIDE)
**
*System
         2.5,          3.,    -0.7125,         2.5,          2.,    -0.7125
         2.5,          3.,     0.2875
*Node
   1051,      -0.1125,           0.,          4.7
   1052,      -0.2625,           0.,          4.7
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*Element, type=S4
883, 1051, 1052, 1053, 1054
884, 1055, 1056, 1057, 1058
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*Nset, nset=BRACKET-R, generate
 1051,  1380,     1
*Elset, elset=BRACKET-R, generate
  883,  1172,     1
**
** ----------------------------------------------------------------
**
** PART INSTANCE: BRACKET-2 (LEFT SIDE)
**
*System
        -2.5,         -3.,    -0.7125,        -2.5,         -2.,    -0.7125
        -2.5,         -3.,     0.2875
*Node
   1381,      -0.2625,  -3.63668e-32,          0.3
   1382,      -0.1125,  -3.63668e-32,          0.3
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*Element, type=S4
1173, 1381, 1382, 1383, 1384
1174, 1385, 1386, 1387, 1388
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*Nset, nset=BRACKET-L, generate
 1381,  1710,     1
*Elset, elset=BRACKET-L, generate
 1173,  1462,     1
**
** ----------------------------------------------------------------------
**
**    DEFINE CHIP STANDOFFS & RIGID BODY CONSTRAINT
**
*SYSTEM
*Nset, Nset=STANDOFF-B, Generate
 1,  4,  1
**
*NODE, NSET=CHIP-M
2000, 1.0, 0.0, 0.25
**
*NCOPY, CHANGE NUMBER = 2000, OLD SET=STANDOFF-B, NEW SET=STANDOFF-T, SHIFT
0.0, 0.0, 0.15
0.0, 0.0, 0.0, 0.0, 0.0, 1.0, 0.0
*ELEMENT, TYPE=B31, ELSET=STANDOFF
1501, 1, 2001
1502, 2, 2002
1503, 3, 2003
1504, 4, 2004
**
*BEAM SECTION, ELSET=STANDOFF, MATERIAL=ALUMINUM, SECTION=CIRC, POISSON=.3
0.010
1.0, 0.0, 0.0
**
**
*Nset, Nset=CHIP-RB, Generate
 889,  906,    1
2001, 2004,    1
**
*RIGID BODY, REF NODE = CHIP-M, TIE NSET = CHIP-RB
**
**
** ---------------------------------------------------------------------------
**
**  DEFINE BOLTED CONNECTION BETWEEN BOARD & BRACKET VIA KINEMATIC COUPLING
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*Nset, nset=BOLT1-S
    9,   10,   12, 1401, 1402, 1403, 1404
*Nset, nset=BOLT2-S
    5,    7,    8, 1397, 1398, 1399, 1400
*Nset, nset=BOLT3-S
   13,   15,   16, 1071, 1072, 1073, 1074
*Nset, nset=BOLT4-S
   17,   18,   20, 1067, 1068, 1069, 1070
**
*surface, name=BOLT_KC-1, type=node
BOLT1-S,
*coupling, constraint name=constraint-1, ref node=11, surface=BOLT_KC-1
*kinematic
1, 1
2, 2
3, 3
4, 4
5, 5
6, 6
*surface, name=BOLT_KC-2, type=node
BOLT2-S,
*coupling, constraint name=constraint-2, ref node=6, surface=BOLT_KC-2
*kinematic
1, 1
2, 2
3, 3
4, 4
5, 5
6, 6
*surface, name=BOLT_KC-3, type=node
BOLT3-S,
*coupling, constraint name=constraint-3, ref node=14, surface=BOLT_KC-3
*kinematic
1, 1
2, 2
3, 3
4, 4
5, 5
6, 6
*surface, name=BOLT_KC-4, type=node
BOLT4-S,
*coupling, constraint name=constraint-4, ref node=19, surface=BOLT_KC-4
*kinematic
1, 1
2, 2
3, 3
4, 4
5, 5
6, 6
**
**
** ------------------------------------------------------
**
**    TIE INTERFACES  (surface Mounts)
**
*Elset, elset=board-top_SPOS, generate
  90,  761,    1
*Surface, name=board-top, Type=Element
board-top_SPOS, SPOS
**
*Elset, elset=mount-left_S3, generate
 858,  882,    1
*Surface, name=mount-left, Type=Element
mount-left_S3, S3
**
*Elset, elset=mount-right_S3, generate
 833,  857,    1
*Surface, name=mount-right, Type=Element
mount-right_S3, S3
**
**
*TIE, NAME=TIE-C1, Position Tolerance = 0.001, Adjust = yes
mount-left, board-top
**
*TIE, NAME=TIE-C2, Position Tolerance = 0.001, Adjust = yes
mount-right, board-top
**
** --------------------------------------------------------
**
**  FIXED BASE GEOMETRIES
**
**  Use *RIGID BODY to create a reference base node for
**  each of the left and right side bracket supports.
**  Using a reference base node for imposing Primary and Secondary
**  Base boundary constraints also allows for more efficient
**  post processing of reaction force data.
**
*SYSTEM
**
*NODE, NSET=BASE-R-M
2100, 0.0,  3.1875, -0.75
*NODE, NSET=BASE-L-M
2200, 0.0, -3.1875, -0.75
*Nset,  Nset=BASE-R, generate
 1051,  1062,     1
*Nset,  Nset=BASE-L, generate
 1381,  1392,     1
**
*RIGID BODY, REF NODE = BASE-R-M, TIE NSET = BASE-R
*RIGID BODY, REF NODE = BASE-L-M, TIE NSET = BASE-L
**
**
** -----------------------------------------------------
**
** SECTION & MATERIAL PROPERTIES
**
**
*Shell Section, elset=BOARD, material=BOARD, poisson=0.275, OFFSET=SPOS
0.062, 3
**
*Solid Section, elset=CHIP, material=CHIP
1.,
*Solid Section, elset=SMNT-1, material=SMNT
1.,
*Solid Section, elset=SMNT-2, material=SMNT
1.,
*Shell Section, elset=BRACKET-R, material=ALUMINUM, poisson=0.3
0.050, 3
*Shell Section, elset=BRACKET-L, material=ALUMINUM, poisson=0.3
0.050, 3
**
**
*Material, name=ALUMINUM
*Density
 0.000259,
*Elastic
 1e+07, 0.3
*Damping, Composite=0.02
**
*Material, name=BOARD
*Density
 0.00011,
*Elastic
800000., 0.275
*Damping, Composite=0.05
**
*Material, name=CHIP
*Density
 0.00045,
*Elastic
 100.0, 0.2
**
*Material, name=SMNT
*Density
 0.00017,
*Elastic
 1.2e+06, 0.3
*Damping, Composite=0.03
**
**
** --------------------------------------------------------
**
**    DEFINE OUTPUT SETS FOR HISTORY DATA
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**
