*Heading
*Preprint, echo=NO, model=NO, history=NO, contact=NO
**
*Node, nset=nall
      1,          10.,          10.,          20.
      2,          10.,           0.,          20.
      3,          10.,          10.,           0.
      4,          10.,           0.,           0.
      5,           0.,          10.,          20.
      6,           0.,           0.,          20.
      7,           0.,          10.,           0.
      8,           0.,           0.,           0.
*Element, type=C3D8R, elset=eall
1, 5, 6, 8, 7, 1, 2, 4, 3
*Solid Section, elset=eall, material=Material-1
*Nset, nset=Face
 1, 2, 5, 6
*Amplitude, name=TRANS-PULSE-50G, smooth=0.
             0.,              0.,          0.0002,              5.,          0.0004,             10.,          0.0006,             15.
         0.0008,             20.,           0.001,             25.,          0.0012,             30.,          0.0014,             35.
         0.0016,             40.,          0.0018,             45.,           0.002,             50.,          0.0022,             45.
         0.0024,             40.,          0.0026,             35.,          0.0028,             30.,           0.003,             25.
         0.0032,             20.,          0.0034,             15.,          0.0036,             10.,          0.0038,              5.
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         0.2496,              0.,          0.2498,              0.,            0.25,              0.
**
** MATERIALS
**
*Material, name=Material-1
*Density
1.,
*Elastic
1., 0.3
**
** BOUNDARY CONDITIONS
**
** Name: BC-1 Type: Displacement/Rotation
*Boundary
Face, 1, 3
**
**   Add Spectum Keyword data (prior to first *Step)
**
*SPECTRUM,
**
** ----------------------------------------------------------------
**
** STEP: Step-1
**
*Step, name=Step-1, nlgeom=NO, perturbation
*Frequency, eigensolver=Lanczos, sim, acoustic coupling=on, normalization=mass
2, , , , ,
**
** OUTPUT REQUESTS
**
*Restart, write, frequency=0
**
** FIELD OUTPUT: F-Output-1
**
*Output, field, variable=PRESELECT
*End Step
