*HEADING
springback simulation
*IMPORT,STEP=1,INT=1,STATE=YES,UPDATE=YES
ANGLE,
*RESTART,WRITE,FREQ=2
**
** springback
**
*STEP,NLGEOM,INC=25
*STATIC
.1,1
*BOUNDARY
1,2,2
XSYMM,XSYMM
ANGLE,ZSYMM
**
*END STEP
