*Heading
**
** PARTS
**
*Part, name=cup
*End Part
**
*Part, name=die
*End Part
**
*Part, name=punch
*End Part
**
**
** ASSEMBLY
**
*Assembly, name=Assembly
**
*Instance, name=punch-1, part=punch
*Node
      1,           5.,          90.,           0.
*Nset, nset=punch-1-RefPt_, internal
1,
*Surface, type=SEGMENTS, name=punch
START,          80.,       145.15
 LINE,        64.44,       145.15
 LINE, 64.1399173728785, 128.025784883219
 CIRCL,           0.,          65.,           0., 129.149764859957
*Rigid Body, ref node=punch-1-RefPt_, analytical surface=punch
*End Instance
**
*Instance, name=die-1, part=die
*Node
      1,           0.,         -25.,           0.
*Nset, nset=die-1-RefPt_, internal
1,
*Surface, type=SEGMENTS, name=die
START,           0., -21.42
 CIRCL, 75.6254277590843, 51.5398316489961,           0., 54.2541216933095
 LINE, 76.2879635709015, 69.9993747915413
*Rigid Body, ref node=die-1-RefPt_, analytical surface=die
*End Instance
**
*Instance, name=cup-1, part=cup
          0.,         32.5,           0.
*Node
      1,          50.,        -29.5
      2,           0.,        -29.5
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*Element, type=CAX4R
 1,   1,   9, 127,  48
 2,   9,  10, 128, 127
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** Region: (Section-1:Picked)
*Elset, elset=_I1, internal, generate
   1,  480,    1
** Section: Section-1
*Solid Section, elset=_I1, material=AL1
1.,
*End Instance
*Nset, nset=xsymm, instance=cup-1
   2,   3,   5,   8,  28,  88
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*Elset, elset=xsymm, instance=cup-1
  20,  40,  41,  61, 100, 120
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*Nset, nset=refPunch, instance=punch-1
 1,
*Nset, nset=refDie, instance=die-1
 1,
*Nset, nset=fix-y, instance=cup-1
 3,
*Elset, elset=_cup_bot_S3, internal, instance=cup-1, generate
 21,  40,   1
*Elset, elset=_cup_bot_S4, internal, instance=cup-1
   1,  21,  81, 101, 121, 141
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*Surface, type=ELEMENT, name=cup_bot
_cup_bot_S3, S3
_cup_bot_S4, S4
*Elset, elset=_cup_top_S2, internal, instance=cup-1
 60, 80
*Elset, elset=_cup_top_S3, internal, instance=cup-1, generate
 61,  80,   1
*Elset, elset=_cup_top_S4, internal, instance=cup-1, generate
  81,  461,   20
*Surface, type=ELEMENT, name=cup_top
_cup_top_S2, S2
_cup_top_S3, S3
_cup_top_S4, S4
*End Assembly
**
** MATERIALS
**
*Material, name=AL1
*Density
 1.8e-06,
*Elastic
4000., 0.21
*Plastic
  5.,   0.
 5.1, 0.22
**
** INTERACTION PROPERTIES
**
*Surface Interaction, name=Fric
1.,
*Friction, taumax=5.
 0.5,
**
** BOUNDARY CONDITIONS
**
** Name: die Type: Displacement/Rotation
*Boundary
refDie, 1, 1
refDie, 2, 2
refDie, 6, 6
** Name: fix-y Type: Displacement/Rotation
*Boundary
fix-y, 2, 2
** Name: punch Type: Displacement/Rotation
*Boundary
refPunch, 1, 1
refPunch, 2, 2
refPunch, 6, 6
** Name: xsymm Type: Symmetry/Antisymmetry/Encastre
*Boundary
xsymm, XSYMM
**
** INTERACTIONS
**
*Contact
*Contact Inclusions, ALL EXTERIOR
*Contact Property Assignment
 ,  , Fric
** ----------------------------------------------------------------
**
** STEP: Step-1
**
*Step, name=Step-1, nlgeom=YES
initial contact
*Static
1., 1., 1e-05, 1.
**
** BOUNDARY CONDITIONS
**
** Name: die Type: Displacement/Rotation
*Boundary
refDie, 2, 2, 5.
**
** OUTPUT REQUESTS
**
*Restart, write, frequency=1
**
** FIELD OUTPUT: F-Output-1
**
*Output, field, variable=PRESELECT
**
** HISTORY OUTPUT: H-Output-1
**
*Output, history, variable=PRESELECT
**
** HISTORY OUTPUT: H-Output-2
**
*Output, history
*Node Output, nset=refDie
U2, RF2
**
** HISTORY OUTPUT: H-Output-3
**
*Node Output, nset=refPunch
U2, RF2
*El Print, freq=999999
*Node Print, freq=999999
*End Step
** ----------------------------------------------------------------
**
** STEP: Step-2
**
*Step, name=Step-2, nlgeom=YES
begin forming cup
*Static
0.01, 1., 1e-05, 1.
**
** BOUNDARY CONDITIONS
**
** Name: die Type: Displacement/Rotation
*Boundary, op=NEW
refDie, 1, 1
refDie, 2, 2, 5.
refDie, 6, 6
** Name: fix-y Type: Displacement/Rotation
*Boundary, op=NEW
** Name: punch Type: Displacement/Rotation
*Boundary, op=NEW
refPunch, 1, 1
refPunch, 2, 2, -5.
refPunch, 6, 6
** Name: xsymm Type: Symmetry/Antisymmetry/Encastre
*Boundary, op=NEW
xsymm, XSYMM
**
** OUTPUT REQUESTS
**
*Restart, write, frequency=1
**
** FIELD OUTPUT: F-Output-1
**
*Output, field, variable=PRESELECT
**
** HISTORY OUTPUT: H-Output-1
**
*Output, history, variable=PRESELECT
**
** HISTORY OUTPUT: H-Output-2
**
*Output, history
*Node Output, nset=refDie
U2, RF2
**
** HISTORY OUTPUT: H-Output-3
**
*Node Output, nset=refPunch
U2, RF2
*End Step
** ----------------------------------------------------------------
**
** STEP: Step-3
**
*Step, name=Step-3, nlgeom=YES
*Static
0.01, 1., 1e-05, 1.
**
** BOUNDARY CONDITIONS
**
** Name: punch Type: Displacement/Rotation
*Boundary
refPunch, 2, 2, -10.
**
** OUTPUT REQUESTS
**
*Restart, write, frequency=1
**
** FIELD OUTPUT: F-Output-1
**
*Output, field, variable=PRESELECT
**
** HISTORY OUTPUT: H-Output-1
**
*Output, history, variable=PRESELECT
**
** HISTORY OUTPUT: H-Output-2
**
*Output, history
*Node Output, nset=refDie
U2, RF2
**
** HISTORY OUTPUT: H-Output-3
**
*Node Output, nset=refPunch
U2, RF2
*End Step
** ----------------------------------------------------------------
**
** STEP: Step-4
**
*Step, name=Step-4, nlgeom=YES
*Static
0.01, 1., 1e-05, 1.
**
** BOUNDARY CONDITIONS
**
** Name: punch Type: Displacement/Rotation
*Boundary
refPunch, 2, 2, -15.
**
** OUTPUT REQUESTS
**
*Restart, write, frequency=1
**
** FIELD OUTPUT: F-Output-1
**
*Output, field, variable=PRESELECT
**
** HISTORY OUTPUT: H-Output-1
**
*Output, history, variable=PRESELECT
**
** HISTORY OUTPUT: H-Output-2
**
*Output, history
*Node Output, nset=refDie
U2, RF2
**
** HISTORY OUTPUT: H-Output-3
**
*Node Output, nset=refPunch
U2, RF2
*End Step
