*Heading
**
** PARTS
**
*Part, name=plate
*Node
      1,        3.375,  0.419999987,    2.6400001
      2,        3.375,           0.,   2.70000005
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*Element, type=S4
 1,    1,  147, 1221,  166
 2,  147,  148, 1222, 1221
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*Element, type=B31
1945, 109, 583
1946, 583, 584
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*Element, type=S3
28, 168,   2, 169
73, 169,   2, 197
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*Elset, elset=main
  608,  609,  610,  611,  612,  613
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*Elset, elset=small
  581,  582,  583,  584,  585,  586
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*Elset, elset=large
    1,    2,    3,    4,    5,    6
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*Elset, elset=side
  31,  32,  33,  34,  35,  36
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*Elset, elset=beams, generate
 1945,  2232,     1
** Section: large
*Shell Section, elset=large, material=metal
0.01, 3
** Section: side
*Shell Section, elset=side, material=metal
0.007, 3
** Section: small
*Shell Section, elset=small, material=metal
0.006, 3
** Section: main
*Shell Section, elset=main, material=metal
0.005, 3
** Section: beams  Profile: rect
*Beam Section, elset=beams, material=metal, temperature=GRADIENTS, section=RECT
0.015, 0.015
1.,0.,0.
*Element, type=Spring1, elset=spring
2233, 6
2234, 38
*Spring, elset=spring
2
5.3e+08
*End Part
**
**
** ASSEMBLY
**
*Assembly, name=Assembly
**
*Instance, name=plate-1, part=plate
*End Instance
**
*Nset, nset=load, instance=plate-1
 128,
*Nset, nset=back-ctr, instance=plate-1
 3,
*Nset, nset=front, instance=plate-1
   62,   63,   65,  110,  111,  112
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*Nset, nset=back, instance=plate-1
    3,    4,  108,  109,  113,  114
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*Nset, nset=sides, instance=plate-1
    7,    8,   29,   30,   48,   49
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*Elset, elset=shells, instance=plate-1, generate
    1,  1944,     1
*End Assembly
**
** MATERIALS
**
*Material, name=metal
*Density
7850.,
*Elastic
 2.1e+11, 0.3
*Plastic
 2.35259e+08,      0.
   4.719e+08, 0.18837
