*Heading
** Job name: gear-shaft Model name: Model-1
** Generated by: Abaqus/CAE 6.11-1
*Preprint, echo=NO, model=NO, history=NO, contact=NO
**
** PARTS
**
*Part, name=gear-2d
*End Part
**
*Part, name=shaft
*Node
      1,          13.,           0.
      2,          13.,         -1.5
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*Element, type=R2D2
1, 1, 2
2, 2, 6
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*Node
     69,           0.,           0.,           0.
*Nset, nset=shaft-RefPt_, internal
69,
*Nset, nset=shaft-RP
 69,
*Elset, elset=shaft, generate
  1,  68,   1
*End Part
**
**
** ASSEMBLY
**
*Assembly, name=Assembly
**
*Instance, name=gear-2d-1, part=gear-2d
*Node
      1,   12.9131718,          1.5
      2,   12.9131718,         -1.5
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*Element, type=CPE4R
  1,    1,   84, 1052,  395
  2,   84,   85, 1053, 1052
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*Nset, nset=_PickedSet4, internal, generate
    1,  5815,     1
*Elset, elset=_PickedSet4, internal, generate
    1,  5508,     1
** Section: steelSection
*Solid Section, elset=_PickedSet4, material=steel
1.,
*End Instance
**
*Instance, name=shaft-1, part=shaft
*End Instance
**
*Nset, nset=design-area, instance=gear-2d-1
    1,    2,   41,   42,   43,   44
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*Elset, elset=design-area, instance=gear-2d-1
  673,  674,  675,  676,  677,  678
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*Nset, nset=frozen-area, instance=gear-2d-1
    1,    2,    3,    4,    5,    6
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*Elset, elset=frozen-area, instance=gear-2d-1
    1,    2,    3,    4,    5,    6
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*Nset, nset=load, instance=gear-2d-1
 984,
*Elset, elset=_Surf-2-shaft_SPOS, internal, instance=shaft-1, generate
 1,  4,  1
*Elset, elset=_Surf-2-shaft_SNEG, internal, instance=shaft-1, generate
  5,  68,   1
*Surface, type=ELEMENT, name=Surf-2-shaft
_Surf-2-shaft_SPOS, SPOS
_Surf-2-shaft_SNEG, SNEG
*Elset, elset=_Surf-2-gear_S2, internal, instance=gear-2d-1
 156, 312
*Elset, elset=_Surf-2-gear_S3, internal, instance=gear-2d-1, generate
 157,  312,    1
*Elset, elset=_Surf-2-gear_S4, internal, instance=gear-2d-1
    1,  157, 5089, 5114, 5139, 5164
*Surface, type=ELEMENT, name=Surf-2-gear
_Surf-2-gear_S2, S2
_Surf-2-gear_S3, S3
_Surf-2-gear_S4, S4
*Rigid Body, ref node=shaft-1.shaft-RefPt_, elset=shaft-1.shaft
*Nset, nset=_T-csys-load, internal
load,
*Transform, nset=_T-csys-load
0.954042022426643, -0.299672854032661,           0., 0.299672854032661, 0.954042022426643,           0.
*End Assembly
**
** MATERIALS
**
*Material, name=steel
*Elastic
200000., 0.3
**
** INTERACTION PROPERTIES
**
*Surface Interaction, name=IntProp-1
1.,
*Friction
0.,
*Surface Behavior, pressure-overclosure=HARD
**
** INTERACTIONS
**
** Interaction: gear-shaft-contact
*Contact Pair, interaction=IntProp-1, type=SURFACE TO SURFACE, adjust=0.0
Surf-2-gear, Surf-2-shaft
** ----------------------------------------------------------------
**
** STEP: loadGear
**
*Step, name=loadGear, nlgeom=YES
*Static
0.1, 1., 1e-05, 1.
**
** BOUNDARY CONDITIONS
**
** Name: fixed-shaft Type: Displacement/Rotation
*Boundary
shaft-1.shaft-RP, 1, 1
shaft-1.shaft-RP, 2, 2
shaft-1.shaft-RP, 6, 6
**
** LOADS
**
** Name: tooth-load   Type: Concentrated force
*Cload
load, 2, -100.
**
** OUTPUT REQUESTS
**
*Restart, write, frequency=0
**
** FIELD OUTPUT: F-Output-1
**
*Output, field, variable=PRESELECT
**
** HISTORY OUTPUT: H-Output-1
**
*Output, history, variable=PRESELECT
*End Step
