*HEADING
*NODE, NSET=ALL
         1,             1997.51,                30.0,              273.25
         2,             2032.01,                30.0,              273.25
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*ELEMENT, TYPE=S3, ELSET=Property_2
         1,       160,      3250,      1181
         2,      1181,      1183,       802
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*ELEMENT, TYPE=S4, ELSET=Property_2
        25,       657,       876,       874,       875
        26,       875,       874,       877,       670
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*ELEMENT, TYPE=S4, ELSET=Property_3
      2321,       746,      1226,      1224,      1225
      2322,      1226,       745,      1227,      1224
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*ELEMENT, TYPE=MASS, ELSET=MASS_1
      4001,         1
      4002,         2
      4003,         3
      4004,         4
      4005,         5
*ELSET, ELSET=P1
         1,         2,         3,         4,         5,         6
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*ELSET, ELSET=P3
      2321,      2322,      2323,      2324,      2325,      2326
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*ELSET, ELSET=DESIGN_ALL
      2321,      2322,      2323,      2324,      2325,      2326
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*ELSET, ELSET=DES_RING1
      2321,      2322,      2323,      2324,      2325,      2326
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*ELSET, ELSET=DES_RING2
      2332,      2334,      2335,      2337,      2344,      2346
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*ELSET, ELSET=DES_RING3
      2336,      2338,      2339,      2340,      2341,      2342
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*SHELL SECTION,ELSET=Property_2,MATERIAL=Material 1
            1.0,
*SHELL SECTION,ELSET=Property_3,MATERIAL=Material 1
            1.0,
*MASS, ELSET=MASS_1
          0.001,
*MATERIAL,NAME=Material 1
*ELASTIC
  2.06e+05,       0.3
*DENSITY
 7.840e-09,
*COUPLING, CONSTRAINT NAME=constraint_1, REF NODE=5, SURFACE=constraint_1_surface
*KINEMATIC
    1,    6
*SURFACE, NAME=constraint_1_surface, TYPE=NODE
       798,  1.000000
      3281,  1.000000
       795,  1.000000
      3282,  1.000000
       793,  1.000000
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      3280,  1.000000
*COUPLING, CONSTRAINT NAME=constraint_2, REF NODE=1, SURFACE=constraint_2_surface
*KINEMATIC
    1,    6
*SURFACE, NAME=constraint_2_surface, TYPE=NODE
       622,  1.000000
      3235,  1.000000
       635,  1.000000
      3236,  1.000000
       860,  1.000000
      3237,  1.000000
       634,  1.000000
      3232,  1.000000
       621,  1.000000
      3233,  1.000000
       862,  1.000000
      3234,  1.000000
*COUPLING, CONSTRAINT NAME=constraint_3, REF NODE=2, SURFACE=constraint_3_surface
*KINEMATIC
    1,    6
*SURFACE, NAME=constraint_3_surface, TYPE=NODE
       629,  1.000000
      3219,  1.000000
       846,  1.000000
      3218,  1.000000
       628,  1.000000
      3217,  1.000000
       641,  1.000000
      3216,  1.000000
       844,  1.000000
      3215,  1.000000
       642,  1.000000
      3214,  1.000000
*COUPLING, CONSTRAINT NAME=constraint_4, REF NODE=4, SURFACE=constraint_4_surface
*KINEMATIC
    1,    6
*SURFACE, NAME=constraint_4_surface, TYPE=NODE
      3222,  1.000000
       681,  1.000000
      3223,  1.000000
       694,  1.000000
      3224,  1.000000
       840,  1.000000
      3225,  1.000000
       693,  1.000000
      3220,  1.000000
       680,  1.000000
      3221,  1.000000
       842,  1.000000
*COUPLING, CONSTRAINT NAME=constraint_5, REF NODE=3, SURFACE=constraint_5_surface
*KINEMATIC
    1,    6
*SURFACE, NAME=constraint_5_surface, TYPE=NODE
      3228,  1.000000
       674,  1.000000
      3229,  1.000000
       687,  1.000000
      3230,  1.000000
       856,  1.000000
      3231,  1.000000
       686,  1.000000
      3226,  1.000000
       673,  1.000000
      3227,  1.000000
       858,  1.000000
*BOUNDARY, TYPE=DISPLACEMENT, OP=NEW
   1,        1,        6,                       0.
   2,        1,        6,                       0.
   3,        1,        6,                       0.
   4,        1,        6,                       0.
*STEP, PERTURBATION
*STATIC
*CLOAD, OP=NEW
       5,        1,                    -2500.
*OUTPUT, FIELD, FREQUENCY=999
*NODE OUTPUT
U,
*ELEMENT OUTPUT
E,
S,
STH,
*END STEP
*STEP, PERTURBATION
*STATIC
*CLOAD, OP=NEW
       5,        4,                     8000.
**       5,        4,                     80000.
*OUTPUT, FIELD, FREQUENCY=999
*NODE OUTPUT
U,
*ELEMENT OUTPUT
E,
S,
*END STEP
