*SYSTEM
*NODE, SYSTEM=R
       1,         10.,          0.,          0.
       2,  5.72201e-09,          0.,          0.
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*MATERIAL, NAME=MAT_MID_1
*ELASTIC
210000., 0.3
*SHELL SECTION, ELSET=PSHELL_1, MATERIAL=MAT_MID_1
1.,
*ELEMENT, TYPE=S3R, ELSET=PSHELL_1
1, 3, 120, 1
2, 4, 121, 3
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*ELSET, ELSET=ALL_SHELL_ISO
PSHELL_1,
*ELSET, ELSET=ALL_MASSIVE_ELEMENTS
ALL_SHELL_ISO,
*STEP, PERTURBATION, name=Step-1
*STATIC
*BOUNDARY
       1, 1,6, 0.
      62, 1,6, 0.
      82, 1,6, 0.
      83, 1,6, 0.
      84, 1,6, 0.
      85, 1,6, 0.
     117, 1,6, 0.
     118, 1,6, 0.
     119, 1,6, 0.
     120, 1,6, 0.
*CLOAD
    1807, 3, -0.6
    1808, 3, -0.6
    1809, 3, -0.6
    1810, 3, -0.6
    1811, 3, -0.6
    1812, 3, -0.6
    1813, 3, -0.6
    1814, 3, -0.6
    1815, 3, -0.6
    1816, 3, -0.6
    1817, 3, -0.6
*END STEP
*STEP, PERTURBATION, name=Step-2
*STATIC
*BOUNDARY
       1, 1,6, 0.
      62, 1,6, 0.
      82, 1,6, 0.
      83, 1,6, 0.
      84, 1,6, 0.
      85, 1,6, 0.
     117, 1,6, 0.
     118, 1,6, 0.
     119, 1,6, 0.
     120, 1,6, 0.
*CLOAD
    1807, 2, -0.2
    1808, 2, -0.2
    1809, 2, -0.2
    1810, 2, -0.2
    1811, 2, -0.2
    1812, 2, -0.2
    1813, 2, -0.2
    1814, 2, -0.2
    1815, 2, -0.2
    1816, 2, -0.2
    1817, 2, -0.2
*END STEP
