*Heading
 Workshop 3 ATOM
** Job name: hole-plate-quarter Model name: hole-plate-quarter
** Generated by: Abaqus/CAE 6.11-1
*Preprint, echo=NO, model=NO, history=NO, contact=NO
**
** PARTS
**
*Part, name=PART-1
*Node
      1,          50.,           0.
      2,          50.,          50.
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*Element, type=CPS4
 33,   1,  46,  50,  47
 34,  46,   3,  48,  50
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*Elset, elset=P1, generate
  33,  160,    1
** Section: Section-1-P1
*Solid Section, elset=P1, material=MAT1
1.,
*End Part
**
**
** ASSEMBLY
**
*Assembly, name=Assembly
**
*Instance, name=PART-1-1, part=PART-1
*End Instance
**
*Nset, nset=DESIGN_NODES, instance=PART-1-1
   6,  10,  11,  12,  13,  30
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*Nset, nset=FORCE_1, instance=PART-1-1
  1,  2,  3,  4,  5, 46, 51, 56, 61
*Nset, nset=FORCE_3, instance=PART-1-1
   2,  26,  27,  28,  29, 126, 131, 136, 141
*Nset, nset=SPC1_4, instance=PART-1-1
  26,  30,  31,  32,  33, 143, 163, 183, 203
*Nset, nset=SPC1_6, instance=PART-1-1
   1,  10,  14,  15,  16,  47,  67,  87, 107
*Nset, nset=_PICKEDSET9, internal, instance=PART-1-1
   6,  10,  11,  12,  13,  30
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*Elset, elset=_PICKEDSET10, internal, instance=PART-1-1, generate
  33,  160,    1
*Elset, elset=_PickedSet12, internal, instance=PART-1-1, generate
  33,  160,    1
*Elset, elset=_PickedSet13, internal, instance=PART-1-1, generate
  33,  160,    1
*End Assembly
**
** MATERIALS
**
**   mat1
**
*Material, name=MAT1
*Elastic
210000., 0.3
**
** BOUNDARY CONDITIONS
**
** Name: Disp-BC-1 Type: Displacement/Rotation
*Boundary
SPC1_4, 1, 1
** Name: Disp-BC-2 Type: Displacement/Rotation
*Boundary
SPC1_6, 2, 2
** ----------------------------------------------------------------
**
** STEP: Step-1
**
*Step, name=Step-1, nlgeom=YES
*Static
1., 1., 1e-05, 1.
**
** LOADS
**
** Name: CFORCE-1   Type: Concentrated force
*Cload
FORCE_1, 1, 200.
**
** OUTPUT REQUESTS
**
*Restart, write, frequency=0
**
** FIELD OUTPUT: F-Output-1
**
*Output, field, variable=PRESELECT
**
** HISTORY OUTPUT: H-Output-1
**
*Output, history, variable=PRESELECT
*End Step
** ----------------------------------------------------------------
**
** STEP: Step-2
**
*Step, name=Step-2, nlgeom=YES
*Static
1., 1., 1e-05, 1.
**
** LOADS
**
** Name: CFORCE-1   Type: Concentrated force
*Cload, op=NEW
** Name: CFORCE-2   Type: Concentrated force
*Cload, op=NEW
FORCE_3, 2, 100.
**
** OUTPUT REQUESTS
**
*Restart, write, frequency=0
**
** FIELD OUTPUT: F-Output-2
**
*Output, field, variable=PRESELECT
**
** HISTORY OUTPUT: H-Output-2
**
*Output, history, variable=PRESELECT
*End Step
