*Heading
** Job name: torque-link-assembly-contctrl Model name: torque-link-assembly
** Generated by: Abaqus/CAE 6.12-1
** *Preprint, echo=NO, model=NO, history=NO, contact=NO
**
** PARTS
**
*Part, name=LINK
*Node
      1,  -422.191925,  -113.125984,       -162.5
      2,  -422.191925,  -113.125984,        -225.
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*Element, type=C3D8R
   1, 1080,  101, 1075, 3841,   97,    1,  100, 1071
   2, 3841, 1075, 1076, 3838, 1071,  100,   99, 1072
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*Element, type=C3D8
2353, 2615, 2616, 4988, 4897,  712,  713, 2546, 2545
2354, 2616, 2617, 4989, 4988,  713,  714, 2547, 2546
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*Nset, nset=LINK, generate
    1,  6189,     1
*Elset, elset=LINK, generate
    1,  4578,     1
*Elset, elset=_TO-COUPLING_S1, internal
 2773, 2774, 2775, 2776, 2777, 2778
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*Elset, elset=_TO-COUPLING_S4, internal
   21,   22,   23,   24,   55,   56
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*Elset, elset=_TO-COUPLING_S3, internal
  19,  20,  25,  26,  57,  58,  59,  60,  69,  70,  71,  72, 137, 138
*Elset, elset=_TO-COUPLING_S2, internal
  29,  30,  31,  32,  73,  74
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*Elset, elset=_TO-COUPLING_S6, internal, generate
 4357,  4379,     2
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*Elset, elset=_TO-COUPLING_S1_2, internal
 2773, 2774, 2775, 2776, 2777, 2778
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*Elset, elset=_TO-COUPLING_S4_2, internal
   21,   22,   23,   24,   55,   56
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*Elset, elset=_TO-COUPLING_S2_2, internal
  29,  30,  31,  32,  73,  74
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*Elset, elset=_TO-COUPLING_S6_2, internal, generate
 4357,  4379,     2
*Elset, elset=_TO-COUPLING_S3_2, internal
  19,  20,  25,  26,  57,  58,  59,  60,  69,  70,  71,  72, 137, 138
*Surface, type=ELEMENT, name=TO-COUPLING
_TO-COUPLING_S1_2, S1
_TO-COUPLING_S4_2, S4
_TO-COUPLING_S2_2, S2
_TO-COUPLING_S6_2, S6
_TO-COUPLING_S3_2, S3
*Elset, elset=_TO-PIN_S1_2, internal
 3241, 3242, 3243, 3244, 3245, 3246
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*Elset, elset=_TO-PIN_S6_2, internal, generate
 3355,  3919,     6
*Elset, elset=_TO-PIN_S4_2, internal
 2355, 2358, 2361, 2364, 2367, 2370
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*Elset, elset=_TO-PIN_S2_2, internal
 2653, 2654, 2655, 2662, 2663, 2664, 4249, 4250, 4251, 4258, 4259, 4260
*Elset, elset=_TO-PIN_S3_2, internal
 2443, 2444, 2445, 2452, 2453, 2454
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*Surface, type=ELEMENT, name=TO-PIN
_TO-PIN_S1_2, S1
_TO-PIN_S6_2, S6
_TO-PIN_S4_2, S4
_TO-PIN_S2_2, S2
_TO-PIN_S3_2, S3
*Elset, elset=_TO-LINK_S6_2, internal, generate
 2785,  3349,     6
*Elset, elset=_TO-LINK_S2_2, internal
 2785, 2786, 2787, 2788, 2789, 2790
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*Elset, elset=_TO-LINK_S4_2, internal
 2534, 2536, 2538, 2540, 2542, 2544
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*Elset, elset=_TO-LINK_S3_2, internal
 2353, 2354, 2355, 2362, 2363, 2364
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*Surface, type=ELEMENT, name=TO-LINK
_TO-LINK_S6_2, S6
_TO-LINK_S2_2, S2
_TO-LINK_S4_2, S4
_TO-LINK_S3_2, S3
** Section: Section-1-LINK
*Solid Section, elset=LINK, controls=EC-1, material=MAT1
,
*End Part
**
*Part, name=PIN
*Node
      1,  -515.012878,   125.018799,   3357.18994
      2,   -525.20105,   125.018799,   3373.28662
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*Element, type=R3D4
  1,   1,  25, 321,  46
  2,  25,   2,  26, 321
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*Nset, nset=PIN-RefPt_, internal
 881,
*Nset, nset=PIN-REFPT_, internal
 881,
*Nset, nset=RP
 881,
*Elset, elset=_TO-LINK-2_SPOS, internal
 111, 112, 113, 114, 115, 116
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*Elset, elset=_TO-LINK-1_SPOS, internal
   1,   2,   3,   4,   5,   6
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*Nset, nset=PIN, generate
   1,  881,    1
*Elset, elset=PIN, generate
   1,  858,    1
*Elset, elset=_TO-LINK-2_SPOS_1, internal
 111, 112, 113, 114, 115, 116
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*Elset, elset=_TO-LINK-1_SPOS_1, internal
   1,   2,   3,   4,   5,   6
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*Elset, elset=_TO-LINK-2_SPOS_2, internal
 111, 112, 113, 114, 115, 116
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*Surface, type=ELEMENT, name=TO-LINK-2
_TO-LINK-2_SPOS_2, SPOS
*Elset, elset=_TO-LINK-1_SPOS_2, internal
   1,   2,   3,   4,   5,   6
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*Surface, type=ELEMENT, name=TO-LINK-1
_TO-LINK-1_SPOS_2, SPOS
*End Part
**
**
** ASSEMBLY
**
*Assembly, name=Assembly
**
*Instance, name=LINK-1, part=LINK
*End Instance
**
*Instance, name=LINK-2, part=LINK
          0.,           0.,           0.
          0.,           0.,           0.,           0.,           1.,           0.,         180.
*End Instance
**
*Instance, name=PIN-1, part=PIN
  497.353286,  3329.289031, 1.19380000000001
  497.353286,  3329.289031, 1.19380000000001,   498.353286,  3329.289031, 1.19380000000001,          90.
*End Instance
**
*Node
      1,  -502.957581,  -134.767075,           0.
      2,   502.957581,  -134.767075,           0.
*Nset, nset=RP1
 1,
*Nset, nset=RP2
 2,
*Elset, elset=DEMOLD-REGION-1, instance=LINK-1
  145,  146,  147,  148,  149,  150
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*Elset, elset=DEMOLD-REGION-2, instance=LINK-2
  145,  146,  147,  148,  149,  150
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*Elset, elset=OPTIMIZE-REGION, instance=LINK-1, generate
    1,  4578,     1
*Elset, elset=OPTIMIZE-REGION, instance=LINK-2, generate
    1,  4578,     1
*Nset, nset=POINT-ON-CENTRAL-PLANE-1, instance=LINK-1
 73,
*Nset, nset=POINT-ON-CENTRAL-PLANE-2, instance=LINK-2
 73,
*Elset, elset=FROZEN-REGION, instance=LINK-1
    1,    2,    3,    4,    5,    6
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*Elset, elset=FROZEN-REGION, instance=LINK-2
    1,    2,    3,    4,    5,    6
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*Orientation, name=PULL-DIRECTION-CSYS-1
0.965925775331622, 0.258819235278226,           0., -0.258819235278226, 0.965925775331622,           0.
1, 0.
*Orientation, name=PULL-DIRECTION-CSYS-2
-0.965925846484198, 0.25881896973326,           0., 0.25881896973326, 0.965925846484198,           0.
1, 0.
** Constraint: COUPLING-LINK1
*Coupling, constraint name=COUPLING-LINK1, ref node=RP1, surface=LINK-1.TO-COUPLING
*Kinematic
** Constraint: COUPLING-LINK2
*Coupling, constraint name=COUPLING-LINK2, ref node=RP2, surface=LINK-2.TO-COUPLING
*Kinematic
** Constraint: RigidBody-1
*Rigid Body, ref node=PIN-1.PIN-REFPT_, elset=PIN-1.PIN
** Constraint: TIE-LINK2
*Tie, name=TIE-LINK2, adjust=yes, position tolerance=2.
LINK-2.TO-PIN, PIN-1.TO-LINK-2
*End Assembly
**
** ELEMENT CONTROLS
**
*Section Controls, name=EC-1, hourglass=ENHANCED
1., 1., 1.
**
** MATERIALS
**
**   Density 4.46e-9 tonne/mm3; Elastic 114e3 MPa; Poisson 0.34; Exp Coeff
**   9.5e-6 (mm/mm) / °C
**
**
**  COMMENTS FROM *ELASTIC
**  ======================
**
*Material, name=MAT1
*Elastic
114000., 0.34
**
** INTERACTION PROPERTIES
**
*Surface Interaction, name=INTPROP-1
**
** BOUNDARY CONDITIONS
**
** Name: Disp-BC-1 Type: Displacement/Rotation
*Boundary
RP1, 2, 2
** Name: Disp-BC-2 Type: Displacement/Rotation
*Boundary
RP1, 3, 3
** Name: Disp-BC-3 Type: Displacement/Rotation
*Boundary
RP2, 1, 1
** Name: Disp-BC-4 Type: Displacement/Rotation
*Boundary
RP2, 2, 2
** Name: Disp-BC-5 Type: Displacement/Rotation
*Boundary
RP2, 3, 3
** Name: Disp-BC-6 Type: Displacement/Rotation
*Boundary
RP2, 4, 4
** Name: Disp-BC-7 Type: Displacement/Rotation
*Boundary
RP2, 5, 5
** Name: Disp-BC-8 Type: Displacement/Rotation
*Boundary
RP2, 6, 6
**
** INTERACTIONS
**
** ** Interaction: INTPROP-1-1
** *Contact Pair, interaction=INTPROP-1, type=SURFACE TO SURFACE
** LINK-2.TO-PIN, PIN-1.TO-LINK-2
** Interaction: INTPROP-1-2
*Contact Pair, interaction=INTPROP-1, type=SURFACE TO SURFACE
LINK-2.TO-LINK, LINK-1.TO-LINK
** Interaction: INTPROP-1-3
*Contact Pair, interaction=INTPROP-1, type=SURFACE TO SURFACE
LINK-1.TO-PIN, PIN-1.TO-LINK-1
** ----------------------------------------------------------------
**
** STEP: Step-1-TURNING
**
*Step, name=Step-1-TURNING, nlgeom=YES
*Static
1., 1., 1e-10, 1.
**
** LOADS
**
** Name: CFORCE-1   Type: Concentrated force
*Cload, op=NEW
RP1, 1, 333615.
** Name: CFORCE-2   Type: Moment
*Cload, op=NEW
RP1, 4, -1.69475e+08
** Name: CFORCE-3   Type: Moment
*Cload, op=NEW
RP1, 5, 6.2705e+06
**
** CONTROLS
**
*Controls, reset
*Controls, parameters=time incrementation
, , , , , , , 20, , ,
**
** OUTPUT REQUESTS
**
*Restart, write, frequency=0
**
** FIELD OUTPUT: F-Output-1
**
*Output, field, frequency=99999
*Contact Output
CDISP, CSTRESS
**
** FIELD OUTPUT: F-Output-2
**
*Element Output, directions=YES
LE, S
**
** FIELD OUTPUT: F-Output-3
**
*Node Output
RF, U
**
** HISTORY OUTPUT: H-Output-1
**
*Output, history, frequency=99999
*Node Output, nset=RP1
UR1,
**
** HISTORY OUTPUT: H-Output-2
**
*Output, history, variable=PRESELECT, frequency=99999
*End Step
