*Heading
** Job name: link-part Model name: torque-link-component
** Generated by: Abaqus/CAE 6.12-1
** *Preprint, echo=NO, model=NO, history=NO, contact=NO
**
** PARTS
**
*Part, name=LINK
*Node
      1,  -422.191925,  -113.125984,       -162.5
      2,  -422.191925,  -113.125984,        -225.
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*Element, type=C3D8R
   1,  856,  101,  851, 2607,   97,    1,  100,  847
   2, 2607,  851,  852, 2604,  847,  100,   99,  848
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*Nset, nset=LINK, generate
    1,  3830,     1
*Elset, elset=LINK, generate
    1,  2850,     1
*Elset, elset=_SURF-1_S1, internal
 2425, 2426, 2427, 2428, 2429, 2430
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*Elset, elset=_SURF-1_S4, internal
   21,   22,   23,   24,   55,   56
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*Elset, elset=_SURF-1_S3, internal
  19,  20,  25,  26,  57,  58,  59,  60,  69,  70,  71,  72, 137, 138
*Elset, elset=_SURF-1_S2, internal
  29,  30,  31,  32,  73,  74
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*Elset, elset=_SURF-1_S6, internal, generate
 2629,  2651,     2
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*Elset, elset=_SURF-1_S1_4, internal
 2425, 2426, 2427, 2428, 2429, 2430
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*Elset, elset=_SURF-1_S4_4, internal
   21,   22,   23,   24,   55,   56
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*Elset, elset=_SURF-1_S2_4, internal
  29,  30,  31,  32,  73,  74
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*Elset, elset=_SURF-1_S6_4, internal, generate
 2629,  2651,     2
*Elset, elset=_SURF-1_S3_4, internal
  19,  20,  25,  26,  57,  58,  59,  60,  69,  70,  71,  72, 137, 138
*Surface, type=ELEMENT, name=SURF-1
_SURF-1_S1_4, S1
_SURF-1_S4_4, S4
_SURF-1_S2_4, S2
_SURF-1_S6_4, S6
_SURF-1_S3_4, S3
*Elset, elset=_SURF-2_S1_4, internal
 2461, 2462, 2463, 2464, 2465, 2466
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*Elset, elset=_SURF-2_S4_4, internal
 2353, 2354, 2355, 2557, 2558, 2559, 2560, 2561, 2562
*Elset, elset=_SURF-2_S2_4, internal
 2365, 2366, 2367, 2368, 2369, 2370
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*Elset, elset=_SURF-2_S3_4, internal
 2356, 2357, 2358, 2563, 2564, 2565, 2566, 2567, 2568
*Surface, type=ELEMENT, name=SURF-2
_SURF-2_S1_4, S1
_SURF-2_S4_4, S4
_SURF-2_S2_4, S2
_SURF-2_S3_4, S3
** Section: Section-1-LINK
*Solid Section, elset=LINK, material=TITANIUM
,
*End Part
**
**
** ASSEMBLY
**
*Assembly, name=Assembly
**
*Instance, name=LINK-1, part=LINK
*End Instance
**
*Node
      1,  -502.957581,  -134.767075,           0.
      2,  2.93456964e-07,  -2.207031e-07,        63.75
*Nset, nset=RP1
 1,
*Nset, nset=RP2
 2,
*Elset, elset=OPTIMIZE-REGION, instance=LINK-1, generate
    1,  2850,     1
*Elset, elset=FROZEN-REGION, instance=LINK-1
    1,    2,    3,    4,    5,    6
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*Nset, nset=POINT-ON-CENTRAL-PLANE, instance=LINK-1
 73,
*Orientation, name=PULL-DIRECTION-CSYS
0.965925775331622, 0.258819235278226,           0., -0.258819235278226, 0.965925775331622,           0.
1, 0.
** Constraint: CONSTRAINT-1
*Coupling, constraint name=CONSTRAINT-1, ref node=RP1, surface=LINK-1.SURF-1
*Kinematic
** Constraint: CONSTRAINT-2
*Coupling, constraint name=CONSTRAINT-2, ref node=RP2, surface=LINK-1.SURF-2
*Kinematic
*End Assembly
**
** MATERIALS
**
**     Density 4.46e-9 tonne/mm3; Elastic 114e3 MPa; Poisson 0.34; Exp Coeff
**   9.5e-6
**
**     (mm/mm) / °C
**
*Material, name=TITANIUM
*Elastic
114000., 0.34
**
** BOUNDARY CONDITIONS
**
** Name: Disp-BC-1 Type: Displacement/Rotation
*Boundary
RP2, 1, 1
** Name: Disp-BC-2 Type: Displacement/Rotation
*Boundary
RP2, 2, 2
** Name: Disp-BC-3 Type: Displacement/Rotation
*Boundary
RP2, 3, 3
** Name: Disp-BC-4 Type: Displacement/Rotation
*Boundary
RP2, 4, 4
** Name: Disp-BC-5 Type: Displacement/Rotation
*Boundary
RP2, 5, 5
** Name: Disp-BC-6 Type: Displacement/Rotation
*Boundary
RP2, 6, 6
** Name: Disp-BC-7 Type: Displacement/Rotation
*Boundary
RP1, 2, 2
** Name: Disp-BC-8 Type: Displacement/Rotation
*Boundary
RP1, 3, 3
** ----------------------------------------------------------------
**
** STEP: Step-1-TURNING
**
*Step, name=Step-1-TURNING, nlgeom=YES, inc=10000
*Static
1., 1., 1e-20, 1.
**
** LOADS
**
** Name: CFORCE-1   Type: Concentrated force
*Cload, op=NEW
RP1, 1, 333615.
** Name: CFORCE-2   Type: Moment
*Cload, op=NEW
RP1, 4, -1.69475e+08
** Name: CFORCE-3   Type: Moment
*Cload, op=NEW
RP1, 5, 6.2705e+06
**
** CONTROLS
**
*Controls, reset
*Controls, parameters=time incrementation
, , , , , , , 20, , ,
**
** OUTPUT REQUESTS
**
*Restart, write, frequency=0
**
** FIELD OUTPUT: F-Output-1
**
*Output, field, frequency=99999
*Element Output, directions=YES
LE, S
**
** FIELD OUTPUT: F-Output-2
**
*Node Output
RF, U
**
** HISTORY OUTPUT: H-Output-1
**
*Output, history, variable=PRESELECT, frequency=99999
*End Step
** ----------------------------------------------------------------
**
** STEP: Step-2-BRAKING
**
*Step, name=Step-2-BRAKING, nlgeom=YES, inc=10000
*Static
1., 1., 1e-20, 1.
**
** LOADS
**
** Name: CFORCE-NEW
*Cload, op=NEW
** Name: CFORCE-1   Type: Concentrated force
*Cload, op=NEW
RP1, 1, 311375.
** Name: CFORCE-2   Type: Moment
*Cload, op=NEW
RP1, 6, 7.5415e+07
**
** CONTROLS
**
*Controls, reset
*Controls, parameters=time incrementation
, , , , , , , 20, , ,
**
** OUTPUT REQUESTS
**
*Restart, write, frequency=0
**
** FIELD OUTPUT: F-Output-3
**
*Output, field, frequency=99999
*Element Output, directions=YES
LE, S
**
** FIELD OUTPUT: F-Output-4
**
*Node Output
RF, U
**
** HISTORY OUTPUT: H-Output-2
**
*Output, history, variable=PRESELECT, frequency=99999
*End Step
