*Heading
**
**
*Node
      1,         -10.,           0.,          10.
      2,         -20.,           0.,          10.
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*Element, type=C3D8RH, elset=bead_seal
  1,  107,  460, 1039,  388,    1,   21,  235,   56
  2,  460,  461, 1040, 1039,   21,   22,  236,  235
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*Solid Section, elset=bead_seal, material=silicone
**
*System
        -10.,         10.,         10.,         -9.,         10.,         10.
*Node, nset=flange-RefPt
   1975,         -15.,           0.,          10.
*Surface, type=CYLINDER, name=flange
-10., 10., 10., 90., 10., 10.
-10., 10., -90.
START,          15.,           0.
 LINE,         -15.,           0.
*Rigid Body, ref node=flange-RefPt, analytical surface=flange
*System
*Nset, nset=xsymm
    1,    4,    5,    8,   11,   13
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*Nset, nset=base
   1,   2,   3,   4,  18,  19
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*Nset, nset=ends
   11,   12,   14,   15,   18,   19
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*Nset, nset=loadpt
1975,
*Nset, nset=peak
 13,
*Elset, elset=seal_S3
 501, 502, 503, 504, 505, 506
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*Elset, elset=seal_S4
 681, 682, 683, 684, 685, 686
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*Surface, type=ELEMENT, name=seal
seal_S3, S3
seal_S4, S4
**
*Material, name=silicone
*Hyperelastic, test data input
**
**
*Surface Interaction, name=fric
1.,
*Friction
 0.1,
**
*Boundary
base, 2, 2
ends, 3, 3
xsymm,1, 1
**
*Contact
*Contact Inclusions, all exterior
*Contact Property Assignment
 ,  , fric
**
*Step, name=compress, nlgeom=YES
*Static
0.025, 1.
**
*Output, field, variable=PRESELECT
*Output, history, variable=PRESELECT
*End Step
