*Heading
**
*Preprint, echo=NO, model=NO, history=NO, contact=NO
**
*Node
      1,         -10.,           0.,          10.
      2,         -20.,           0.,          10.
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*Element, type=C3D8RH, elset=bead_seal
  1,  107,  460, 1039,  388,    1,   21,  235,   56
  2,  460,  461, 1040, 1039,   21,   22,  236,  235
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*Solid Section, elset=bead_seal, material=silicone
**
*System
        -10.,         10.,         10.,         -9.,         10.,         10.
*Node, nset=flange-RefPt
   1975,         -15.,           0.,          10.
*Surface, type=CYLINDER, name=flange
-10., 10., 10., 90., 10., 10.
-10., 10., -90.
START,          15.,           0.
 LINE,         -15.,           0.
*Rigid Body, ref node=flange-RefPt, analytical surface=flange
*System
*Nset, nset=xsymm
    1,    4,    5,    8,   11,   13
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*Nset, nset=base
   1,   2,   3,   4,  18,  19
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*Nset, nset=ends
   11,   12,   14,   15,   18,   19
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*Nset, nset=loadpt
1975,
*Nset, nset=peak
 13,
*Elset, elset=seal_S3
 501, 502, 503, 504, 505, 506
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*Elset, elset=seal_S4
 681, 682, 683, 684, 685, 686
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*Surface, type=ELEMENT, name=seal
seal_S3, S3
seal_S4, S4
**
*Material, name=silicone
*Hyperelastic, n=3, ogden, test data input, moduli=INSTANTANEOUS
*Uniaxial Test Data
0.0000,0.0000
0.0281,0.0186
0.0515,0.0372
0.0716,0.0575
0.0906,0.0777
0.1085,0.0974
0.1254,0.1172
0.1414,0.1374
0.1566,0.1581
0.1718,0.1778
0.1848,0.1991
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0.4887,0.8730
*Biaxial Test Data
0.0000,0.0000
0.0421,0.0146
0.0777,0.0304
0.1086,0.0459
0.1361,0.0616
0.1605,0.0770
0.1828,0.0926
0.2031,0.1081
0.2228,0.1236
0.2396,0.1391
0.2566,0.1547
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0.7394,0.9040
*Planar Test Data
0.0000,0.0000
0.0369,0.0204
0.0664,0.0425
0.0928,0.0637
0.1174,0.0844
0.1401,0.1050
0.1615,0.1271
0.1816,0.1480
0.2002,0.1689
0.2180,0.1907
0.2350,0.2130
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0.5345,0.8235
*Volumetric Test Data
0.0000,1.0000
1.2264,0.9995
2.2076,0.9989
3.1707,0.9986
4.1608,0.9978
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278.3233,0.9099
*Viscoelastic, time=RELAXATION TEST DATA, errtol=0.0025, nmax=5
*Shear Test Data
     1.,  0.1
 0.9769,  0.2
 0.9646,  0.3
 0.9557,  0.4
  0.949,  0.5
 0.9436,  0.6
  0.939,  0.7
 0.9353,  0.8
 0.9319,  0.9
 0.9296,   1.
  0.911,   2.
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 0.7782,7200.
**
*Surface Interaction, name=fric
1.,
*Friction
 0.1,
**
*Boundary
base, 2, 2
ends, 3, 3
xsymm,1, 1
**
*Contact
*Contact Inclusions, all exterior
*Contact Property Assignment
 ,  , fric
**
*Step, name=compress, nlgeom=YES
*Static
0.025, 1.
**
*Boundary
loadpt, 1, 1
loadpt, 2, 2, -4.
loadpt, 3, 6
**
*Monitor, dof=2, node=loadpt
**
*Output, field, variable=PRESELECT
*Output, history, variable=PRESELECT
*Node Output, nset=loadpt
RF2, U2
*Contact Output, nset=peak
CSTRESS,
*End Step
