*Heading
**
*Node
      1,          55.,          35.
      2,          30.,          60.
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*Element, type=CAX3H, elset=rubber_elements
1, 149, 140, 126
2, 142, 141, 154
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*Element, type=CAX4RH, elset=rubber_elements
 3, 126,  11,  12, 133
 4,  18,   2,  19, 127
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*Elset, elset=rubber_tie_s_S1
 152, 164, 173, 176
*Elset, elset=rubber_tie_s_S2
  4,  5, 30, 35
*Elset, elset=rubber_tie_s_S3
 146, 159, 162, 165
*Elset, elset=rubber_tie_s_S4
  8,  9, 20, 28
*Surface, type=ELEMENT, name=rubber_tie_s
rubber_tie_s_S1, S1
rubber_tie_s_S2, S2
rubber_tie_s_S3, S3
rubber_tie_s_S4, S4
*Solid Section, elset=rubber_elements, material=rubber
**
*System
          0.,          5.,          0.,          1.,          5.,          0.
*Node
    389,          30.,          55.
    390,         27.5,          55.
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*Element, type=CAX4I, elset=tube_elements
362, 389, 390, 393, 392
363, 390, 391, 394, 393
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*Elset, elset=tube_tie_m_S4, generate
362, 392,   2
*Surface, type=ELEMENT, name=tube_tie_m
tube_tie_m_S4, S4
*Elset, elset=tube_couple_s_S2, generate
363, 393,   2
*Surface, type=ELEMENT, name=tube_couple_s
tube_couple_s_S2, S2
*Solid Section, elset=tube_elements, material=steel
**
*System
*Node
    440,           0.,          35.,           0.
*Nset, nset=fix
   4,   6,   7,  85,  86,  87
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*Nset, nset=loadpt
440,
**
*Tie, name=bond, adjust=yes
rubber_tie_s, tube_tie_m
**
*Coupling, constraint name=coupling, ref node=loadpt, surface=tube_couple_s
*Kinematic
**
*Material, name=rubber
*Hyperelastic, yeoh, test data input, moduli=INSTANTANEOUS
*Biaxial Test Data
     0.,     0.
 0.0421, 0.0146
 0.0777, 0.0304
 0.1086, 0.0459
 0.1361, 0.0616
 0.1605,  0.077
 0.1828, 0.0926
 0.2031, 0.1081
 0.2228, 0.1236
 0.2396, 0.1391
 0.2566, 0.1547
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 0.7394,  0.904
*Uniaxial Test Data
     0.,     0.
 0.0281, 0.0186
 0.0515, 0.0372
 0.0716, 0.0575
 0.0906, 0.0777
 0.1085, 0.0974
 0.1254, 0.1172
 0.1414, 0.1374
 0.1566, 0.1581
 0.1718, 0.1778
 0.1848, 0.1991
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 0.4887,  0.873
*Volumetric Test Data
      0.,     1.
  1.2264, 0.9995
  2.2076, 0.9989
  3.1707, 0.9986
  4.1608, 0.9978
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 278.323, 0.9099
*Viscoelastic, time=RELAXATION TEST DATA
*Shear Test Data
     1.,  0.1
 0.9769,  0.2
 0.9646,  0.3
 0.9557,  0.4
  0.949,  0.5
 0.9436,  0.6
  0.939,  0.7
 0.9353,  0.8
 0.9319,  0.9
 0.9296,   1.
  0.911,   2.
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 0.7782,7200.
*Material, name=steel
*Elastic
200000., 0.3
**
*Step, name="axial load", nlgeom=YES
*Static
0.025, 1.
**
*Boundary
loadpt, 1, 1
loadpt, 2, 2, 10.
loadpt, 6, 6
*Boundary
fix, ENCASTRE
**
*Output, field, variable=PRESELECT
*Element Output, elset=rubber_elements, directions=YES
NE,
**
*Output, history, variable=PRESELECT
*Node Output, nset=loadpt
RF2, U2
*End Step
