*HEADING
 COPPER ROD IMPACT (3D MODEL)
 SECTION CONTROLS USED (KINEMA=ORTHOGONAL, HOURGLASS=COMBINED)
**
**  This example simulates the high velocity impact of a copper rod
**  onto a rigid wall.  Similar tests have been performed to determine
**  the material constants for high-pressure equations of state, and
**  the test is sometimes described as the Taylor bar experiment.
**  Extremely high plastic strains develop at the crushed end of the
**  rod, resulting in severe local mesh distortion.
**
*RESTART, WRITE, NUMBER INTERVAL=20
**
**  Generate the nodes at one end
**
*NODE, NSET=CORE
    1,  0.0000E+00,  0.0000E+00,  0.0000E+00
    2,  0.3200E-03,  0.0000E+00,  0.0000E+00
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*NSET, NSET=INNER, GENERATE
   26,   31,   1
   31,   36,   1
*NODE, NSET=ENDPTS
   81,  0.3200E-02,  0.0000E+00,  0.0000E+00
   91,  0.0000E+00,  0.3200E-02,  0.0000E+00
*NGEN, NSET=OUTER, LINE=C
   81,   91,   1,   1, 0., 0., 0.
*NFILL
  INNER, OUTER, 5, 11
*NSET, NSET=HEAD, GENERATE
    1,   91,   1
**
**  Extrude a three-dimensional node mesh
**
*NCOPY, SHIFT, OLD SET=HEAD, NEW SET=TAIL, CHANGE NUMBER=3600
   0., 0., .0324
   0., 0., -1., 0., 0., 1., 0.
*NFILL, NSET=ROD
  HEAD, TAIL,   36,  100
*NSET, NSET=SPLANE1, GENERATE
    1, 3601,  100
    2, 3602,  100
    5, 3605,  100
   10, 3610,  100
   17, 3617,  100
   26, 3626,  100
   37, 3637,  100
   48, 3648,  100
   59, 3659,  100
   70, 3670,  100
   81, 3681,  100
*NSET, NSET=SPLANE2, GENERATE
    1, 3601,  100
    4, 3604,  100
    9, 3609,  100
   16, 3616,  100
   25, 3625,  100
   36, 3636,  100
   47, 3647,  100
   58, 3658,  100
   69, 3669,  100
   80, 3680,  100
   91, 3691,  100
*NSET, NSET=BODY, GENERATE
  101, 3691,    1
*NSET, NSET=NOUT
3601,
**
**  Fill-in the elements
**
*ELEMENT, TYPE=C3D8R, ELSET=BASE
    1,    1,    2,    3,    4,  101,  102,  103,  104
    2,    2,    5,    6,    3,  102,  105,  106,  103
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*ELGEN
    1,   36,  100,  100
    2,   36,  100,  100
    3,   36,  100,  100
    4,   36,  100,  100
    5,   36,  100,  100
    6,   36,  100,  100
    7,   36,  100,  100
    8,   36,  100,  100
    9,   36,  100,  100
   10,   36,  100,  100
   11,   36,  100,  100
   12,   36,  100,  100
   13,   36,  100,  100
   14,   36,  100,  100
   15,   36,  100,  100
   16,   36,  100,  100
   17,   36,  100,  100
   18,   36,  100,  100
   19,   36,  100,  100
   20,   36,  100,  100
   21,   36,  100,  100
   22,   36,  100,  100
   23,   36,  100,  100
   24,   36,  100,  100
   25,   36,  100,  100
*ELEMENT, TYPE=C3D8R
   26,   26,   37,   38,   27,  126,  137,  138,  127
*ELGEN
   26,    5,   11,    1,   10,    1,    5,   36,  100,  100
*ELSET, ELSET=ROD, GENERATE
    1, 3675,    1
**
**  Representative material properties for copper
**
*MATERIAL, NAME=COPPER
*ELASTIC
 124.E9, 0.34
** Young's modulus unit: Pa
*PLASTIC,HARDENING=JOHNSON COOK
 90.E6, 292.E6, 0.31, 1.09, 1083., 25.
** A & B unit: Pa
*RATE DEPENDENT,TYPE=JOHNSON COOK
 0.025, 1.0
** unit: reference strain rate has a unit of s^(-1)
*INELASTIC HEAT FRACTION
 1.,
** dimensionless
*SPECIFIC HEAT
 383.,
** unit: J/kgK
*EXPANSION
 5.E-5,
** unit: K^(-1)
*DENSITY
 8.96E3,
** unit: kg/m^3
*SOLID SECTION, ELSET=ROD, MATERIAL=COPPER, CONTROL=B
*SECTION CONTROLS, KINEMA=ORTHOGONAL, HOURGLASS=COMBINED, NAME=B
**
**  Zero displacement b.c.'s are prescribed on the symmetry planes.
**  To simulate the impact of the rod on a (frictionless) rigid wall,
**  zero axial displacements are prescribed at one end of the rod,
**  while all other nodes are subjected to an initial velocity field.
**
*BOUNDARY
 SPLANE1, 2
 SPLANE2, 1
 HEAD,    3
*INITIAL CONDITIONS, TYPE=TEMPERATURE
 ROD,  25.
*INITIAL CONDITIONS, TYPE=VELOCITY
 BODY, 3, -227.
**
*NSET, NSET=NODEOUT
 HEAD,3601,
*ELSET, ELSET=ELEOUT
 BASE,
**
**  Run the problem for 80 microseconds
**
*ELSET,ELSET=QA_TEST_ELEOUT
ELEOUT,
*NSET,NSET=QA_TEST_NODEOUT
NODEOUT,
**
*STEP
*DYNAMIC, EXPLICIT, ADIABATIC, ELEMENT BY ELEMENT
 , 80.E-6
**
*OUTPUT, FIELD, VARIABLE=PRESELECT, NUMBER INTERVAL=4
*OUTPUT, FIELD, NUMBER INTERVAL=1
*ELEMENT OUTPUT, ELSET=QA_TEST_ELEOUT
PEEQ,
*NODE OUTPUT, NSET=QA_TEST_NODEOUT
U,
*OUTPUT,HISTORY,VARIABLE=PRESELECT,TIMEINT=2.0E-05
*END STEP
