*Heading
*Heading
 Cantilever beam under Horiz & Vert loads
** Job name: beam3d Model name: Model-1
**
** PARTS
**
*Part, name=Beam
*Node
      1,           0.,          -5.,           0.
      2,          10.,          -5.,           0.
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*Element, type=C3D8I, elset=beam
 1, 14,  8, 10, 16, 13,  7,  9, 15
 2, 16, 10, 12, 18, 15,  9, 11, 17
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*Solid Section, elset=beam, material=STEEL
*End Part
**
**
** ASSEMBLY
**
*Assembly, name=Assembly
**
*Instance, name=Beam-1, part=Beam
*End Instance
**
*Nset, nset=fixed, instance=Beam-1, generate
  1,  17,   2
*Nset, nset=load, instance=Beam-1
 83, 87, 95, 99
*End Assembly
**
** MATERIALS
**
*Material, name=STEEL
*Density
7800.,
*Elastic
 2e+11, 0.3
**
** BOUNDARY CONDITIONS
**
** Name: Disp-BC-1 Type: Symmetry/Antisymmetry/Encastre
*Boundary
fixed, ENCASTRE
** ----------------------------------------------------------------
**
** STEP: Sideways
**
*Step, name=Sideways
*Static
1., 1., 1e-05, 1.
**
** LOADS
**
** Name: TipLoad   Type: Concentrated force
*Cload
load, 3, -1e+8
**
** OUTPUT REQUESTS
**
*Output, field, variable=PRESELECT
*Output, history, variable=PRESELECT
*End Step
** ----------------------------------------------------------------
**
** STEP: Down
**
*Step, name=Down
*Static
1., 1., 1e-05, 1.
**
** LOADS
**
*Cload
load, 2, -.5e+8
load, 3, 0.
*End Step
