*Heading
 Cantilever beam under Horiz & Vert loads
*Node
      1,           0.,          10.,           0.
      2,           0.,           0.,           0.
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*Element, type=C3D8I
 1,  7,  8, 10,  9,  1,  2,  4,  3
 2,  9, 10, 12, 11,  3,  4,  6,  5
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*Elset, elset=_I1, generate
  1,  20,   1
*Solid Section, elset=_I1, material=Steel
1.,
*Nset, nset=_G3, generate
 1,  6,  1
*Elset, elset=_G3
 1, 2
*Nset, nset=_G4
 61, 62, 65, 66
*Material, name=Steel
*Density
7800.,
*Elastic
 2e+11, 0.3
**
** BOUNDARY CONDITIONS
**
** Name: BC-1 Type: Symmetry/Antisymmetry/Encastre
*Boundary
_G3, ENCASTRE
*nset,nset=tip2
61,
*nset,nset=tip1,gen
62,65,1
*elset,elset=e1
1,
*elset,elset=e2
1,2,
** ----------------------------------------------------------------
*Step, name=Step1, nlgeom
*Static
.1, 1., 1e-05, 1.
*Cload
_G4, 2, -4e+08
*Restart, write, frequency=1
*Output, field, variable=PRESELECT
*Output, history, freq=1
*node output, nset=tip1
u1,u2,
*element output, elset=e1
S11,S22,
*energy output, elset=e2
ALLIE,
*End Step
** ----------------------------------------------------------------
*Step, name=Step2, nlgeom
*Static
.1, 1., 1e-05, 1.
*Cload
_G4, 2, -12e+08
*Restart, write, frequency=1
*Output, field, variable=PRESELECT
*Output, history, freq=1
*node output, nset=tip1
u1,u2,
*End Step
