*Heading
** Job name: crushDome Model name: rubberdome
**
** PARTS
**
*Part, name=dome
*End Part
*Part, name=floor
*End Part
**
** ASSEMBLY
**
*Assembly, name=Assembly
**
*Instance, name=dome-1, part=dome
*Node
      1,      7.01726,           0.
      2,      7.01726,          0.1
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*Element, type=CAX4H, elset=dome
  3,   17,   15,    1,    4
  4,   17,    4,    7,   19
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** Section: solidSection
*Solid Section, elset=dome, material=rubber
1.,
*End Instance
**
*Instance, name=floor-1, part=floor
*Node
      1,           0.,           0.
*Nset, nset=floor-1-RefPt_, internal
 1,
*Surface, type=SEGMENTS, name=rigid
START,           0.,           0.
 LINE,         4.75,           0.
*Rigid Body, ref node=floor-1-RefPt_, analytical surface=rigid
*End Instance
*Nset, nset=fix, instance=dome-1
  1,  2,  4,  6,  7,  9, 10, 12, 14
*Nset, nset=symm, instance=dome-1
  128,  130,  131,  133,  135, 1045, 1047, 1049, 1052, 1056, 1060
*Nset, nset=refPt, instance=floor-1
 1,
*Nset, nset=monitor, instance=dome-1
 52,
*Elset, elset=press_S3, instance=dome-1
 197, 206, 214, 217, 218, 221, 223, 224, 226, 229, 231
*Surface, type=ELEMENT, name=press
press_S3, S3
*Elset, elset=inside_S1, instance=dome-1
  12,  23,  27,  31,  35,  39
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*Elset, elset=inside_S2, instance=dome-1
   3,   7,  15,  19, 175, 179
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*Elset, elset=inside_S3, instance=dome-1
  11, 513, 521
*Elset, elset=inside_S4, instance=dome-1
 11,
*Surface, type=ELEMENT, name=inside
inside_S1, S1
inside_S2, S2
inside_S4, S4
inside_S3, S3
*End Assembly
**
** MATERIALS
**
*Material, name=rubber
*Density
 0.001,
*Hyperelastic
500000.,111200.,     0.
**
** INTERACTION PROPERTIES
**
*Surface Interaction, name=noFric
1.,
*Friction
0.,
**
** BOUNDARY CONDITIONS
**
** Name: fixDome Type: Symmetry/Antisymmetry/Encastre
*Boundary
fix, ENCASTRE
** Name: fixRigid Type: Symmetry/Antisymmetry/Encastre
*Boundary
refPt, ENCASTRE
** Name: symm Type: Symmetry/Antisymmetry/Encastre
*Boundary
symm, XSYMM
**
** INTERACTIONS
**
** Interaction: Int-1
*Contact Pair, interaction=noFric
inside, floor-1.rigid
** ----------------------------------------------------------------
**
** STEP: Step-1
**
*Step, name=Step-1, nlgeom, inc=100
compress dome
*Static, riks
0.2, 1., 1e-05, 1.0, , monitor, 2, -3.7
*Dsload
press, P, 10000.
*Monitor, dof=2, node=monitor, frequency=1
*Output, field, var=preselect
*Output, history, var=preselect, freq=0
*End Step
