*HEADING
2D MODEL -- CERAMIC-COPPER-STEEL
**  This file is to be used in conjuction with the
**  Submodeling with Abaqus lecture series. It is an incomplete
**  input file that requires additional user input.
***
--> cool-down only (800C to 20C)
    assume stress-free conditions at 800C
***
*SYSTEM
,1.45
*NODE,NSET=NALL
       1,       3.151,        0.16
       2,     3.15146,    0.164679
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**
**
*ELEMENT, TYPE=CPE3, ELSET=CERAMIC
      20,      34,      51,      38
      24,      38,      51,      42
      28,      42,      51,      46
      32,      46,      51,      50
      36,      50,      51,      59
      40,      59,      51,      63
      44,      63,      51,      67
      48,      67,      51,      71
*ELEMENT, TYPE=CPE4, ELSET=CERAMIC
       1,       1,       2,       7,       6
       2,       2,       3,       8,       7
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*ELEMENT, TYPE=CPE3, ELSET=COPPER
     160,     248,     265,     252
     164,     252,     265,     256
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*ELEMENT, TYPE=CPE4, ELSET=COPPER
     141,     215,     216,     221,     220
     142,     216,     217,     222,     221
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*ELEMENT, TYPE=CPE3, ELSET=STEEL
     373,     248,     578,     265
     374,     578,     579,     265
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*ELEMENT, TYPE=CPE4, ELSET=STEEL
     313,     472,     473,     478,     477
     314,     473,     474,     479,     478
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**
** steel
**
*NSET, NSET=STEEL
     215,     220,     225,     246,     247,     248
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**
** steel
**
*ELSET, ELSET=STEEL_1
     313,     314,     315,     316,     317,     318
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**
** copper
**
*NSET, NSET=COPPER
       1,       6,      11,      32,      33,      34
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**
** copper
**
*ELSET, ELSET=COPPER_1
     141,     142,     143,     144,     145,     146
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**
** ceramic
**
*NSET, NSET=CERAMIC
       1,       2,       3,       4,       5,       6
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**
** ceramic
**
*ELSET, ELSET=CERAMI_1
       1,       2,       3,       4,       5,       6
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**
** LHS
**
*NSET, NSET=LHS
     160,     171,     182,     194,     359,     370,     439,
     450,     646,     657,     716
**
** DRIVE_TOP
**
*NSET, NSET=DRIVE_TO
      93,      94,      95,      96,      97,     119
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**
** DRIVE_RIGHT
**
*NSET, NSET=DRIVE_RI
     784,     790,     796,     817,      823
**
** DRIVE_BOTTOM
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**
** STEEL
**
*SOLID SECTION, ELSET=STEEL, MATERIAL=STEEL
          1.,
**
** CERAMIC
**
*SOLID SECTION, ELSET=CERAMIC, MATERIAL=CERAMIC
          1.,
**
** COPPER
**
*SOLID SECTION, ELSET=COPPER, MATERIAL=COPPER
          1.,
**
** CERAMIC
**
*MATERIAL, NAME=CERAMIC
**
*ELASTIC, TYPE=ISO
280000.,.22
*EXPANSION
2.7E-6,
**
** STEEL
**
*MATERIAL, NAME=STEEL
**
*ELASTIC, TYPE=ISO
203000.,.28
*EXPANSION
1.2E-5,
*PLASTIC
200.,,20.
240.,.1,20.
110.,,800.
140.,.1,800.
**
** COPPER
**
*MATERIAL, NAME=COPPER
**
*ELASTIC, TYPE=ISO
126000.,.34
*EXPANSION
1.6E-5,
*PLASTIC
112.,,20.
130.,.1,20.
23.,,800.
30.,.1,800.
*INITIAL CONDITIONS,TYPE=TEMPERATURE
NALL,800.
**
*NSET,NSET=DRIVER
DRIVE_TO,DRIVE_BO,DRIVE_RI
**
** step definition
**
*STEP, INC=20
*STATIC
.01,1.,.001
**
*TEMPERATURE
NALL,20.
*END STEP
