*HEADING
2D MODEL -- CERAMIC-COPPER-STEEL
** This file is to be used in conjuction with the
** Submodeling with Abaqus lecture series
***
--> cool-down only (800C to 20C)
    assume stress-free conditions at 800C
***
*NODE,NSET=NALL
       1,       3.151,        1.61
       2,     3.15146,     1.61468
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**
**
*ELEMENT, TYPE=CPE4, ELSET=CERAMIC
       1,       1,       2,       7,       6
       2,       2,       3,       8,       7
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*ELEMENT, TYPE=CPE4, ELSET=COPPER
     141,     215,     216,     221,     220
     142,     216,     217,     222,     221
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*ELEMENT, TYPE=CPE4, ELSET=STEEL
     313,     472,     473,     478,     477
     314,     473,     474,     479,     478
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*ELEMENT, TYPE=CPE3, ELSET=CERAMIC
      20,      34,      51,      38
      24,      38,      51,      42
      28,      42,      51,      46
      32,      46,      51,      50
      36,      50,      51,      59
      40,      59,      51,      63
      44,      63,      51,      67
      48,      67,      51,      71
*ELEMENT, TYPE=CPE3, ELSET=COPPER
     160,     248,     265,     252
     164,     252,     265,     256
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*ELEMENT, TYPE=CPE3, ELSET=STEEL
     373,     248,     578,     265
     374,     578,     579,     265
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**
** LHS
**
*NSET, NSET=LHS
     160,     171,     182,     194,     205,     359
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**
** drive_to
**
*NSET, NSET=DRIVE_TO
     849,     850,     851,     852,     853,     855
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**
** drive_bo
**
*NSET, NSET=DRIVE_BO
     950,     956,     962,     968,     974,     980
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**
** drive_ri
**
*NSET, NSET=DRIVE_RI
     784,     790,     796,     817,     823,     976,     977,     978,
     979,      980
**
** STEEL
**
*SOLID SECTION, ELSET=STEEL, MATERIAL=STEEL
          1.,
**
** CERAMIC
**
*SOLID SECTION, ELSET=CERAMIC, MATERIAL=CERAMIC
          1.,
**
** COPPER
**
*SOLID SECTION, ELSET=COPPER, MATERIAL=COPPER
          1.,
**
** CERAMIC
**
*MATERIAL, NAME=CERAMIC
**
*ELASTIC, TYPE=ISO
280000.,.22
*EXPANSION
2.7E-6,
**
** STEEL
**
*MATERIAL, NAME=STEEL
**
*ELASTIC, TYPE=ISO
203000.,.28
*EXPANSION
1.2E-5,
*PLASTIC
200.,,20.
240.,.1,20.
110.,,800.
140.,.1,800.
**
** COPPER
**
*MATERIAL, NAME=COPPER
**
*ELASTIC, TYPE=ISO
126000.,.34
*EXPANSION
1.6E-5,
*PLASTIC
112.,,20.
130.,.1,20.
23.,,800.
30.,.1,800.
*INITIAL CONDITIONS,TYPE=TEMPERATURE
NALL,800.
**
*NSET,NSET=DRIVER
DRIVE_TO,DRIVE_BO,DRIVE_RI
*SUBMODEL, EXTERIOR TOLERANCE=.1
DRIVER,
**
** step definition
**
*STEP, INC=20
*STATIC
.01,1.,.001
*BOUNDARY
LHS, 1, 1
*BOUNDARY,STEP=1,SUBMODEL
DRIVER,1,2
*TEMPERATURE
NALL,20.
*END STEP
