*Heading
 Lined nozzle submodel
**
**  This file is to be used in conjuction with the
**  Submodeling with ABAQUS lecture series. It is an incomplete
**  input file that requires additional user input.
**
*Preprint, echo=NO, model=NO, history=NO, contact=NO
** ----------------------------------------------------------------
**
** PART INSTANCE: Nozzle-Lined-1
**
*Node
      1,   56.2923317,   213.813004,   28.0080605
      2,   56.2923317,   253.813004,   28.0080605
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*Element, type=C3D20R
   1,   18,   17,  634,  418,  851,  850, 2291, 2075, 3175, 3174, 3173, 3172, 3176, 3177, 3178,
      3179, 3181, 3180, 3182, 3183
   2,  435,  434,  417,  418, 2092, 2091, 2074, 2075, 3187, 3186, 3185, 3184, 3188, 3189, 3190,
      3191, 3193, 3192, 3194, 3183
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*Nset, nset=Nozzle-Lined-1__PickedSet2
     1,     2,     3,     4,     5,     6
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*Elset, elset=Nozzle-Lined-1__PickedSet2
    1,    2,    3,    4,    5,    6
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*Nset, nset=Nozzle-Lined-1__PickedSet3
     6,    11,    12,    13,    14,    15
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*Elset, elset=Nozzle-Lined-1__PickedSet3, generate
 1489,  1956,     1
** Section: SteelSection
*Solid Section, elset=Nozzle-Lined-1__PickedSet2, material=Steel
1.,
** Section: CopperSection
*Solid Section, elset=Nozzle-Lined-1__PickedSet3, material=Copper
1.,
*System
*Elset, elset=_BoundarySurface_S6
   49,   63,   64,   70,   78,   81
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*Elset, elset=_BoundarySurface_S4
   19,   20,   21,   32,   48,   54
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*Elset, elset=_BoundarySurface_S3
    1,   34,   35,   36,   37,   38
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*Elset, elset=_BoundarySurface_S5
   33,   39,   43,   48,  100,  405
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*Surface, type=ELEMENT, name=BoundarySurface
_BoundarySurface_S6, S6
_BoundarySurface_S4, S4
_BoundarySurface_S3, S3
_BoundarySurface_S5, S5
*Elset, elset=_PressureSurface_S2, generate
 1117,  1488,     1
*Elset, elset=_PressureSurface_S6
 1489, 1491, 1495, 1503, 1504, 1511
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*Elset, elset=_PressureSurface_S4
 1490, 1505, 1521, 1529, 1544, 1560
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*Elset, elset=_PressureSurface_S5
 1492, 1498, 1499, 1500, 1509, 1513
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*Elset, elset=_PressureSurface_S3
 1506, 1507, 1508, 1520, 1545, 1546
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*Elset, elset=_PressureSurface_S1, generate
 1606,  1644,     1
*Surface, type=ELEMENT, name=PressureSurface
_PressureSurface_S2, S2
_PressureSurface_S6, S6
_PressureSurface_S4, S4
_PressureSurface_S5, S5
_PressureSurface_S3, S3
_PressureSurface_S1, S1
**
**
**
**
** MATERIALS
**
*Material, name=Copper
*Density
 0.324,
*Elastic
 1.8e+07, 0.34
*Material, name=Steel
*Density
 0.284,
*Elastic
 3e+07, 0.28
** ----------------------------------------------------------------
**
** STEP: Step-1
**
*Step, name=Step-1
Bolt-up & pressure load
*Static
1., 1., 1e-05, 1.
**
** LOADS
**
**
**
**
** OUTPUT REQUESTS
**
*Restart, write, frequency=0
**
** FIELD OUTPUT: F-Output-1
**
*Output, field, variable=PRESELECT
**
** HISTORY OUTPUT: H-Output-1
**
*Output, history, variable=PRESELECT
*End Step
