*Heading
*Preprint, echo=NO, model=NO, history=NO, contact=NO
**
** PARTS
**
*Part, name=joint
*Node
      1,  0.100000001,           0.,          0.5
      2, -0.100000001,           0.,          0.5
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*Element, type=S4R
  1,  68, 120,   9,   1
  2, 120, 121,  10,   9
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*Nset, nset=tube
   1,   2,   3,   4,   9,  10
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*Elset, elset=tube, generate
   1,  192,    1
*Nset, nset=plate
   3,   4,   5,   6,   7,   8
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*Elset, elset=plate, generate
 193,  530,    1
*Nset, nset=Set-15
  1,  2,  9, 10, 11, 12
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*Elset, elset=Set-15, generate
  1,  24,   1
*Nset, nset=Set-16
   5,   8,  83,  84,  85,  86
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*Elset, elset=Set-16
 302, 308, 314, 320, 326, 332
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*Elset, elset=_tube_SNEG, internal, generate
   1,  192,    1
*Surface, type=ELEMENT, name=tube
_tube_SNEG, SNEG
*Elset, elset=_plate_SNEG, internal, generate
 193,  530,    1
*Surface, type=ELEMENT, name=plate
_plate_SNEG, SNEG
*Distribution, name=Ori-1-DiscOrient, location=ELEMENT, Table=Ori-1-DiscOrient_Table
** Description: Distribution generated from Discrete Orientation
,           1.,           0.,           0.,           0.,           1.,           0.
193,           1.,           0.,           0.,           0.,          -1.,           0.
194,           1.,           0.,           0.,           0.,          -1.,           0.
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530,           1.,           0.,           0.,           0.,          -1.,           0.
*Distribution, name=Ori-2-DiscOrient, location=ELEMENT, Table=Ori-2-DiscOrient_Table
** Description: Distribution generated from Discrete Orientation
,           1.,           0.,           0.,           0.,           1.,           0.
1,           0.,           0.,          -1., -0.0655197501182556, -0.997851252555847,          -0.
2,           0.,           0.,          -1., -0.195434182882309, -0.980716824531555,          -0.
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192,           0.,          -0.,          -1., -0.0614551045000553, 0.998109877109528,          -0.
*Orientation, name=Ori-2, system=RECTANGULAR
Ori-2-DiscOrient
3, 0.
** Region: (tube-1: Generated From Layup)
*Elset, elset=tube-1, generate
   1,  192,    1
** Section: tube-1
*Shell Section, elset=tube-1, composite, orientation=Ori-2, layup=tube
0.0025, 3, T300, 0., Ply-1
0.0025, 3, T300, 45., Ply-2
0.0025, 3, T300, -45., Ply-3
0.0025, 3, T300, 90., Ply-4
*Orientation, name=Ori-1, system=RECTANGULAR
Ori-1-DiscOrient
3, 0.
** Region: (plate-1: Generated From Layup)
*Elset, elset=plate-1, generate
 193,  530,    1
** Section: plate-1
*Shell Section, elset=plate-1, composite, orientation=Ori-1, layup=plate
0.0025, 3, T300, 0., Ply-1
0.0025, 3, T300, 45., Ply-2
0.0025, 3, T300, -45., Ply-3
0.0025, 3, T300, 90., Ply-4
*End Part
**
**
** ASSEMBLY
**
*Assembly, name=Assembly
**
*Instance, name=joint-1, part=joint
*End Instance
**
*Node
      1,           0.,           0.,          0.5
*Nset, nset=all, instance=joint-1, generate
   1,  579,    1
*Elset, elset=all, instance=joint-1, generate
   1,  530,    1
*Nset, nset=builtIn, instance=joint-1
   5,   6,   7,   8,  77,  78
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*Elset, elset=builtIn, instance=joint-1
 302, 308, 314, 320, 326, 332
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*Nset, nset=force, instance=joint-1, generate
  9,  31,   1
*Elset, elset=force, instance=joint-1, generate
  1,  24,   1
*Nset, nset=load, instance=joint-1
  1,  2,  9, 10, 11, 12
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*Elset, elset=load, instance=joint-1, generate
  1,  24,   1
*Nset, nset=plate, instance=joint-1
   3,   4,   5,   6,   7,   8
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*Elset, elset=plate, instance=joint-1, generate
 193,  530,    1
*Nset, nset=refPt
 1,
*Nset, nset=tube, instance=joint-1
   1,   2,   3,   4,   9,  10
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*Elset, elset=tube, instance=joint-1, generate
   1,  192,    1
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*Surface, type=NODE, name=load
load, 1.
*End Assembly
*Distribution Table, name=Ori-1-DiscOrient_Table
coord3D, coord3D
*Distribution Table, name=Ori-2-DiscOrient_Table
coord3D, coord3D
**
** MATERIALS
**
*Material, name=T300
*Elastic, type=LAMINA
 1.56512e+11, 1.2962e+10,       0.23,  6.964e+09,  6.964e+09,  6.964e+09
*Fail Stress
 1.5169e+09, 2.7076e+09,  1.024e+08,   2.53e+08,  1.069e+08,         0.,         0.
** ----------------------------------------------------------------
**
** STEP: Step-1
**
*Step, name=Step-1, nlgeom=NO
Total load of 7000 N in the 1-direction
*Static
1., 1., 1e-05, 1.
**
** OUTPUT REQUESTS
**
*Restart, write, frequency=0
**
** FIELD OUTPUT: F-Output-1
**
*Output, field
*Node Output
U,
**
** FIELD OUTPUT: F-Output-2
**
*Element Output, elset=joint-1.plate-1, directions=YES
1, 2, 3, 4, 5, 6, 7, 8, 9, 10, 11, 12
CFAILURE, S
**
** FIELD OUTPUT: F-Output-3
**
*Element Output, elset=joint-1.tube-1, directions=YES
1, 2, 3, 4, 5, 6, 7, 8, 9, 10, 11, 12
CFAILURE, S
**
** HISTORY OUTPUT: H-Output-1
**
*Output, history, variable=PRESELECT
*End Step
