*Heading
*Preprint, echo=NO, model=NO, history=NO, contact=NO
**
** PARTS
**
*Part, name=joint
*Node
      1, -0.239999995,           0.,           0.
      2, -0.119999968,           0.,           0.
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*Element, type=S4R
  1,   1,   9, 107,  54
  2,   9,  10, 108, 107
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*Nset, nset=tube
   5,   6,   7,   8,  59,  60
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*Elset, elset=tube, generate
 222,  340,    1
*Nset, nset=fillet
   2,   3,   5,   6,  16,  17
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*Elset, elset=fillet, generate
 137,  221,    1
*Nset, nset=plate
   1,   2,   3,   4,   9,  10
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*Elset, elset=plate, generate
   1,  136,    1
*Nset, nset=Set-10
   7,   8,  85,  86,  87,  88
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*Elset, elset=Set-10, generate
 228,  340,    7
*Nset, nset=Set-11
  5,  6, 59, 60, 61, 62
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*Elset, elset=Set-11
 141, 146, 151, 156, 161, 166
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*Nset, nset=Set-12
  1,  2,  9, 10, 11, 12, 13, 14, 15
*Elset, elset=Set-12, generate
 1,  8,  1
*Elset, elset=_tube_SPOS, internal, generate
 222,  340,    1
*Surface, type=ELEMENT, name=tube
_tube_SPOS, SPOS
*Elset, elset=_fillet_SPOS, internal, generate
 137,  221,    1
*Surface, type=ELEMENT, name=fillet
_fillet_SPOS, SPOS
*Elset, elset=_plate_SPOS, internal, generate
   1,  136,    1
*Surface, type=ELEMENT, name=plate
_plate_SPOS, SPOS
*Distribution, name=Ori-1-DiscOrient, location=ELEMENT, Table=Ori-1-DiscOrient_Table
** Description: Distribution generated from Discrete Orientation
,           1.,           0.,           0.,           0.,           1.,           0.
137, 0.97930383682251, 0.180912122130394, -0.0907458662986755, 0.0922683626413345,  9.71445146547012e-17, 0.99573415517807
138, 0.877455770969391, 0.47271591424942, -0.0813082531094551, 0.0922683551907539,  9.71445146547012e-17, 0.99573415517807
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221, -0.152499064803123, 0.988202571868896, -0.0141311204060912, 0.0922683626413345,  3.29597460435593e-17, -0.99573415517807
*Distribution, name=Ori-2-DiscOrient, location=ELEMENT, Table=Ori-2-DiscOrient_Table
** Description: Distribution generated from Discrete Orientation
,           1.,           0.,           0.,           0.,           1.,           0.
1,           1.,  2.89120502125944e-17,  -1.22464685258517e-16,  1.22464685258517e-16,  3.54070469740189e-33,           1.
2,           1.,  2.89120502125944e-17,  -1.22464685258517e-16,  1.22464685258517e-16,  3.54070469740189e-33,           1.
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136,           1.,  2.89120502125944e-17,  -1.22464685258517e-16,  1.22464685258517e-16,  3.54070469740189e-33,           1.
*Distribution, name=Ori-3-DiscOrient, location=ELEMENT, Table=Ori-3-DiscOrient_Table
** Description: Distribution generated from Discrete Orientation
,           1.,           0.,           0.,           0.,           1.,           0.
222,  -1.18147840572659e-18,           1.,  -1.27501834685883e-17, 0.0922683551907539,  1.28048063403382e-17, 0.99573415517807
223,  -1.18147840572659e-18,           1.,  -1.27501834685883e-17, 0.0922683551907539,  1.28048063403382e-17, 0.99573415517807
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340,  -1.18147850912416e-18,           1.,  1.27501842957689e-17, 0.0922683626413345,  1.28048071675188e-17, -0.99573415517807
*Orientation, name=Ori-2, system=RECTANGULAR
Ori-2-DiscOrient
3, 0.
** Region: (plate-1: Generated From Layup)
*Elset, elset=plate-1, generate
   1,  136,    1
** Section: plate-1
*Shell Section, elset=plate-1, composite, orientation=Ori-2, layup=plate
0.0025, 3, T300, 0., Ply-1
0.0025, 3, T300, 45., Ply-2
0.0025, 3, T300, -45., Ply-3
0.0025, 3, T300, 90., Ply-4
*Orientation, name=Ori-1, system=RECTANGULAR
Ori-1-DiscOrient
3, 0.
** Region: (fillet-1: Generated From Layup)
*Elset, elset=fillet-1, generate
 137,  221,    1
** Section: fillet-1
*Shell Section, elset=fillet-1, composite, orientation=Ori-1, layup=fillet
0.0025, 3, T300, 0., Ply-1
0.0025, 3, T300, 45., Ply-2
0.0025, 3, T300, -45., Ply-3
0.0025, 3, T300, 90., Ply-4
*Orientation, name=Ori-3, system=RECTANGULAR
Ori-3-DiscOrient
3, 0.
** Region: (tube-1: Generated From Layup)
*Elset, elset=tube-1, generate
 222,  340,    1
** Section: tube-1
*Shell Section, elset=tube-1, composite, orientation=Ori-3, layup=tube
0.0025, 3, T300, 0., Ply-1
0.0025, 3, T300, 45., Ply-2
0.0025, 3, T300, -45., Ply-3
0.0025, 3, T300, 90., Ply-4
*End Part
**
**
** ASSEMBLY
**
*Assembly, name=Assembly
**
*Instance, name=joint-1, part=joint
          0.,           0.,           0.
          0.,           0.,           0.,           1.,           0.,           0.,          90.
*End Instance
**
*Nset, nset=cut, instance=joint-1
   1,   4,   7,   8,  39,  40
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*Elset, elset=cut, instance=joint-1
   1,   9,  17,  25,  33,  41
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*Nset, nset=ysymm, instance=joint-1
   2,   3,   5,   6,   9,  10
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*Elset, elset=ysymm, instance=joint-1
   1,   2,   3,   4,   5,   6
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*End Assembly
*Distribution Table, name=Ori-1-DiscOrient_Table
coord3D, coord3D
*Distribution Table, name=Ori-2-DiscOrient_Table
coord3D, coord3D
*Distribution Table, name=Ori-3-DiscOrient_Table
coord3D, coord3D
**
** MATERIALS
**
*Material, name=T300
*Elastic, type=LAMINA
 1.56512e+11, 1.2962e+10,       0.23,  6.964e+09,  6.964e+09,  6.964e+09
*Fail Stress
 1.5169e+09, 2.7076e+09,  1.024e+08,   2.53e+08,  1.069e+08,         0.,         0.
** ----------------------------------------------------------------
**
** STEP: Step-1
**
*Step, name=Step-1, nlgeom=NO
*Static
1., 1., 1e-05, 1.
**
** OUTPUT REQUESTS
**
*Restart, write, frequency=0
**
** FIELD OUTPUT: F-Output-1
**
*Output, field
*Node Output
U,
**
** FIELD OUTPUT: F-Output-4
**
*Element Output, elset=joint-1.fillet-1, directions=YES
1, 2, 3, 4, 5, 6, 7, 8, 9, 10, 11, 12
CFAILURE, S
**
** FIELD OUTPUT: F-Output-2
**
*Element Output, elset=joint-1.plate-1, directions=YES
1, 2, 3, 4, 5, 6, 7, 8, 9, 10, 11, 12
CFAILURE, S
**
** FIELD OUTPUT: F-Output-3
**
*Element Output, elset=joint-1.tube-1, directions=YES
1, 2, 3, 4, 5, 6, 7, 8, 9, 10, 11, 12
CFAILURE, S
**
** HISTORY OUTPUT: H-Output-1
**
*Output, history, variable=PRESELECT
*End Step
