*Heading
*Preprint, echo=NO, model=NO, history=NO, contact=NO
**
** PARTS
**
*Part, name=solid
*Node
   1096, -0.239999995, 0.00499999989,           0.
   1097, -0.119999968, 0.00499999989,           0.
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*Element, type=C3D20R
341, 1096, 1104, 1202, 1149, 2191, 2199, 2297, 2244, 1474, 1475, 1476, 1477, 2569, 2570, 2571,
     2572, 6571, 6579, 6677, 6624
342, 1104, 1105, 1203, 1202, 2199, 2200, 2298, 2297, 1478, 1479, 1480, 1475, 2573, 2574, 2575,
     2570, 6579, 6580, 6678, 6677
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*Elset, elset=solid-Layer-1, generate
 341,  680,    1
*Elset, elset=solid-Layer-2, generate
  681,  1020,     1
*Elset, elset=solid-Layer-3, generate
 1021,  1360,     1
*Elset, elset=solid-Layer-4, generate
 1361,  1700,     1
*Elset, elset=tube
  562,  563,  564,  565,  566,  567
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*Elset, elset=plate
  341,  342,  343,  344,  345,  346
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*Elset, elset=fillet
  477,  478,  479,  480,  481,  482
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*Elset, elset=_fillet-outer_S1, internal, generate
 477,  561,    1
*Surface, type=ELEMENT, name=fillet-outer
_fillet-outer_S1, S1
*Elset, elset=_tube-outer_S1, internal, generate
 562,  680,    1
*Surface, type=ELEMENT, name=tube-outer
_tube-outer_S1, S1
*Elset, elset=_plate-outer_S1, internal, generate
 341,  476,    1
*Surface, type=ELEMENT, name=plate-outer
_plate-outer_S1, S1
*Distribution, name=Ori-1-DiscOrient, location=ELEMENT, Table=Ori-1-DiscOrient_Table
** Description: Distribution generated from Discrete Orientation
,           1.,           0.,           0.,           0.,           1.,           0.
477, -0.981036841869354, -0.171180710196495, 0.0909060686826706, 0.0922679975628853,  -8.67597549358834e-08, 0.99573427438736
478, -0.874341666698456, -0.478500247001648, 0.0810193121433258, 0.0922679603099823,  -4.59032136745918e-08, 0.99573415517807
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1581, 0.142466753721237, -0.989707231521606, 0.0135165015235543, 0.0944129601120949,  -5.47236004422302e-06, -0.995532989501953
*Distribution, name=Ori-5-DiscOrient, location=ELEMENT, Table=Ori-5-DiscOrient_Table
** Description: Distribution generated from Discrete Orientation
,           1.,           0.,           0.,           0.,           1.,           0.
341,          -1.,           0.,  4.3555106480218e-16,  4.3555106480218e-16,          -0.,           1.
342,          -1.,           0.,  1.46441077796183e-16,  1.46441077796183e-16,          -0.,           1.
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1496,          -1.,           0.,  1.14973856745245e-16,  1.14973856745245e-16,          -0.,           1.
*Distribution, name=Ori-9-DiscOrient, location=ELEMENT, Table=Ori-9-DiscOrient_Table
** Description: Distribution generated from Discrete Orientation
,           1.,           0.,           0.,           0.,           1.,           0.
562, 0.00123657856602222, -0.999999344348907,  -5.73116303712595e-05, 0.0922682359814644,  5.70298034290317e-05, 0.99573427438736
563,           0.,          -1.,           0., 0.0922685414552689,           0., 0.99573415517807
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1700,           0.,          -1.,           0., 0.0944582372903824,           0., -0.995528817176819
*Orientation, name=Ori-5, system=RECTANGULAR
Ori-5-DiscOrient
3, 0.
** Region: (plate-1: Generated From Layup)
*Elset, elset=plate-1, generate
 341,  476,    1
** Section: plate-1
*Solid Section, elset=plate-1, composite, orientation=Ori-5, stack direction=3, layup=plate
0.0025, 3, T300, 0., Ply-1
*Orientation, name=Ori-1, system=RECTANGULAR
Ori-1-DiscOrient
3, 0.
** Region: (fillet-1: Generated From Layup)
*Elset, elset=fillet-1, generate
 477,  561,    1
** Section: fillet-1
*Solid Section, elset=fillet-1, composite, orientation=Ori-1, stack direction=3, layup=fillet
0.0025, 3, T300, 0., Ply-1
*Orientation, name=Ori-9, system=RECTANGULAR
Ori-9-DiscOrient
3, 0.
** Region: (tube-1: Generated From Layup)
*Elset, elset=tube-1, generate
 562,  680,    1
** Section: tube-1
*Solid Section, elset=tube-1, composite, orientation=Ori-9, stack direction=3, layup=tube
0.0025, 3, T300, 0., Ply-1
*Orientation, name=Ori-7, system=RECTANGULAR
Ori-5-DiscOrient
3, 0.
** Region: (plate-3: Generated From Layup)
*Elset, elset=plate-3, generate
 681,  816,    1
** Section: plate-3
*Solid Section, elset=plate-3, composite, orientation=Ori-7, stack direction=3, layup=plate
0.0025, 3, T300, 45., Ply-2
*Orientation, name=Ori-3, system=RECTANGULAR
Ori-1-DiscOrient
3, 0.
** Region: (fillet-3: Generated From Layup)
*Elset, elset=fillet-3, generate
 817,  901,    1
** Section: fillet-3
*Solid Section, elset=fillet-3, composite, orientation=Ori-3, stack direction=3, layup=fillet
0.0025, 3, T300, 45., Ply-2
*Orientation, name=Ori-11, system=RECTANGULAR
Ori-9-DiscOrient
3, 0.
** Region: (tube-3: Generated From Layup)
*Elset, elset=tube-3, generate
  902,  1020,     1
** Section: tube-3
*Solid Section, elset=tube-3, composite, orientation=Ori-11, stack direction=3, layup=tube
0.0025, 3, T300, 45., Ply-2
*Orientation, name=Ori-6, system=RECTANGULAR
Ori-5-DiscOrient
3, 0.
** Region: (plate-2: Generated From Layup)
*Elset, elset=plate-2, generate
 1021,  1156,     1
** Section: plate-2
*Solid Section, elset=plate-2, composite, orientation=Ori-6, stack direction=3, layup=plate
0.0025, 3, T300, -45., Ply-3
*Orientation, name=Ori-2, system=RECTANGULAR
Ori-1-DiscOrient
3, 0.
** Region: (fillet-2: Generated From Layup)
*Elset, elset=fillet-2, generate
 1157,  1241,     1
** Section: fillet-2
*Solid Section, elset=fillet-2, composite, orientation=Ori-2, stack direction=3, layup=fillet
0.0025, 3, T300, -45., Ply-3
*Orientation, name=Ori-10, system=RECTANGULAR
Ori-9-DiscOrient
3, 0.
** Region: (tube-2: Generated From Layup)
*Elset, elset=tube-2, generate
 1242,  1360,     1
** Section: tube-2
*Solid Section, elset=tube-2, composite, orientation=Ori-10, stack direction=3, layup=tube
0.0025, 3, T300, -45., Ply-3
*Orientation, name=Ori-8, system=RECTANGULAR
Ori-5-DiscOrient
3, 0.
** Region: (plate-4: Generated From Layup)
*Elset, elset=plate-4, generate
 1361,  1496,     1
** Section: plate-4
*Solid Section, elset=plate-4, composite, orientation=Ori-8, stack direction=3, layup=plate
0.0025, 3, T300, 90., Ply-4
*Orientation, name=Ori-4, system=RECTANGULAR
Ori-1-DiscOrient
3, 0.
** Region: (fillet-4: Generated From Layup)
*Elset, elset=fillet-4, generate
 1497,  1581,     1
** Section: fillet-4
*Solid Section, elset=fillet-4, composite, orientation=Ori-4, stack direction=3, layup=fillet
0.0025, 3, T300, 90., Ply-4
*Orientation, name=Ori-12, system=RECTANGULAR
Ori-9-DiscOrient
3, 0.
** Region: (tube-4: Generated From Layup)
*Elset, elset=tube-4, generate
 1582,  1700,     1
** Section: tube-4
*Solid Section, elset=tube-4, composite, orientation=Ori-12, stack direction=3, layup=tube
0.0025, 3, T300, 90., Ply-4
*End Part
**
**
** ASSEMBLY
**
*Assembly, name=Assembly
**
*Instance, name=solid-1, part=solid
          0.,           0.,           0.
          0.,           0.,           0.,           1.,           0.,           0.,          90.
*End Instance
**
*Nset, nset=cut, instance=solid-1
 1096, 1099, 1102, 1103, 1134, 1135
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*Nset, nset=ysymm, instance=solid-1
 1097, 1098, 1100, 1101, 1104, 1105
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*End Assembly
*Distribution Table, name=Ori-1-DiscOrient_Table
coord3D, coord3D
*Distribution Table, name=Ori-5-DiscOrient_Table
coord3D, coord3D
*Distribution Table, name=Ori-9-DiscOrient_Table
coord3D, coord3D
**
** MATERIALS
**
*Material, name=T300
*Elastic, type=ENGINEERING CONSTANTS
 1.56512e+11, 1.2962e+10, 1.2962e+10,       0.23,         0.,         0.,  6.964e+09,  6.964e+09
  6.964e+09,
*Fail Stress
 1.5169e+09, 2.7076e+09,  1.024e+08,   2.53e+08,  1.069e+08,         0.,         0.
** ----------------------------------------------------------------
**
** STEP: Step-1
**
*Step, name=Step-1, nlgeom=NO
*Static
1., 1., 1e-05, 1.
**
** OUTPUT REQUESTS
**
*Restart, write, frequency=0
**
** FIELD OUTPUT: F-Output-1
**
*Output, field
*Node Output
U,
**
** FIELD OUTPUT: F-Output-4
**
*Element Output, elset=solid-1.fillet-1, directions=YES
1, 2, 3
CFAILURE, S
**
** FIELD OUTPUT: F-Output-4
**
*Element Output, elset=solid-1.fillet-2, directions=YES
1, 2, 3
CFAILURE, S
**
** FIELD OUTPUT: F-Output-4
**
*Element Output, elset=solid-1.fillet-3, directions=YES
1, 2, 3
CFAILURE, S
**
** FIELD OUTPUT: F-Output-4
**
*Element Output, elset=solid-1.fillet-4, directions=YES
1, 2, 3
CFAILURE, S
**
** FIELD OUTPUT: F-Output-2
**
*Element Output, elset=solid-1.plate-1, directions=YES
1, 2, 3
CFAILURE, S
**
** FIELD OUTPUT: F-Output-2
**
*Element Output, elset=solid-1.plate-2, directions=YES
1, 2, 3
CFAILURE, S
**
** FIELD OUTPUT: F-Output-2
**
*Element Output, elset=solid-1.plate-3, directions=YES
1, 2, 3
CFAILURE, S
**
** FIELD OUTPUT: F-Output-2
**
*Element Output, elset=solid-1.plate-4, directions=YES
1, 2, 3
CFAILURE, S
**
** FIELD OUTPUT: F-Output-3
**
*Element Output, elset=solid-1.tube-1, directions=YES
1, 2, 3
CFAILURE, S
**
** FIELD OUTPUT: F-Output-3
**
*Element Output, elset=solid-1.tube-2, directions=YES
1, 2, 3
CFAILURE, S
**
** FIELD OUTPUT: F-Output-3
**
*Element Output, elset=solid-1.tube-3, directions=YES
1, 2, 3
CFAILURE, S
**
** FIELD OUTPUT: F-Output-3
**
*Element Output, elset=solid-1.tube-4, directions=YES
1, 2, 3
CFAILURE, S
**
** HISTORY OUTPUT: H-Output-1
**
*Output, history, variable=PRESELECT
*End Step
