*Heading
**
*Node
     12, 0., -2.4
     22, 0.,  0.
     23, 8., -2.4
     33, 8.,  0.
    112, 0.,  0.
    122, 0.,  2.4
    123, 8.,  0.
    133, 8.,  2.4
*Element, type=Z2001, elset=bottom, file=frame_se
1,  12, 22, 23, 33
*Element, type=Z2001, elset=top, file=frame_se
2,  112, 122, 123, 133
*Substructure Property, elset=bottom
*Substructure Property, elset=top
0., 2.4, 0
*MPC
TIE, 112, 22
TIE, 123, 33
*Nset, nset=fixed
12, 23
*Nset, nset=cload-bot
22,
*Nset, nset=cload-top
122,
**
*Step, name=Step-1
*Static
*cload
cload-bot, 1,  50.
cload-top, 1, 100.
*sload
bottom, snow, -100.
top   , snow, -235.
*Boundary
fixed, ENCASTRE
**
*Substructure Path, enter element=1
*Substructure Path, enter element=1
*Output, field
*Node Output, nset=BEAM
U,
*Element Output, elset=BEAM, directions=YES
SF,
*Substructure Path, leave
*Substructure Path, enter element=2
*Output, field
*Node Output, nset=COLUMN
U,
*Element Output, elset=COLUMN, directions=YES
SF,
*Substructure Path, leave
*Substructure Path, enter element=3
*Output, field
*Node Output, nset=COLUMN
U,
*Element Output, elset=COLUMN, directions=YES
SF,
*Substructure Path, leave
*Substructure Path, leave
**
*Substructure Path, enter element=2
*Substructure Path, enter element=1
*Output, field
*Node Output, nset=BEAM
U,
*Element Output, elset=BEAM, directions=YES
SF,
*Substructure Path, leave
*Substructure Path, enter element=2
*Output, field
*Node Output, nset=COLUMN
U,
*Element Output, elset=COLUMN, directions=YES
SF,
*Substructure Path, leave
*Substructure Path, enter element=3
*Output, field
*Node Output, nset=COLUMN
U,
*Element Output, elset=COLUMN, directions=YES
SF,
*Substructure Path, leave
*Substructure Path, leave
**
*End Step
