*HEADING
**
** Usage level model definition
**
** Units mm, MPa, sec, Celsius
**
*Part, name=mount
*NODE,NSET=NALL
   1451,   7.86659002,   9.27604008,  -1.27855003
   1452,   8.09144974,   9.27604008,  -1.27855003
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**
**  ELEMENT DEFINITIONS
**
*ELEMENT, TYPE=C3D6, ELSET=SOLDERF
 6648,    9186,    9185,    9413,    9211,    9210,    9415
 6649,    9211,    9210,    9415,    9236,    9235,    9417
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*ELEMENT, TYPE=C3D8R, ELSET=PACKAGE
 5651, 7507, 7508, 7531, 7530, 7973, 7974, 7997, 7996
 5702, 7551, 7552, 7575, 7574, 8017, 8018, 8041, 8040
*ELEMENT, TYPE=C3D8I, ELSET=BOARD
 1526, 1451, 1452, 1484, 1483, 2380, 2381, 2413, 2412
 1527, 1452, 1453, 1485, 1484, 2381, 2382, 2414, 2413
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*ELEMENT, TYPE=C3D8R, ELSET=SOLDERF
 6656, 9180, 9181, 9206, 9205, 9452, 9442, 9444, 9453
 6657, 9181, 9182, 9207, 9206, 9442, 9443, 9445, 9444
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*ELEMENT, TYPE=C3D8R, ELSET=LEADPADF
 6264, 8662, 8663, 8688, 8687, 8912, 8913, 8938, 8937
 6265, 8663, 8664, 8689, 8688, 8913, 8914, 8939, 8938
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**
** ELEMENT SET DEFINITIONS
**
** leadf
**
*ELSET, ELSET=LEADF
    7577,    7579,    7581,    7583,    7588,    7589
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**
** padf
**
*ELSET, ELSET=PADF
    6264,    6265,    6266,    6267,    6268,    6269
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**
** leadf1
**
*ELSET, ELSET=LEADF1
    7512,    7513,    7514,    7515,    7552,    7553
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**
** padf1
**
*ELSET, ELSET=PADF1
    6264,    6265,    6266,    6267,    6268,    6269
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**
** solderf1
**
*ELSET, ELSET=SOLDERF1
    6648,    6649,    6650,    6651,    6656,    6657
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**
** leadf2
**
*ELSET, ELSET=LEADF2
    7588,    7589,    7590,    7591,    7596,    7597
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**
** padf2
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*ELSET,ELSET=LEAD
LEADF,
*ELSET,ELSET=LEG1
LEADF1,PADF1,SOLDERF1
*ELSET,ELSET=LEG2
LEADF2,PADF2,SOLDERF2
*ELSET,ELSET=PAD
PADF,
*ELSET,ELSET=SOLDER
SOLDERF,
*ELSET,ELSET=SPACK1
5651,
*ELSET,ELSET=SPACK2
5702,
*ELSET,ELSET=SBOARD1,GEN
1526,1531
*ELSET,ELSET=SBOARD2
1689,1719,1745,1774,1800,1829
*NSET, NSET=NPAD1, GENERATE
 8662, 8786, 1
**
*NSET, NSET=NPAD2, GENERATE
 8787, 8911, 1
**
*NSET, NSET=NLEAD1, GENERATE
12452, 12504, 13
12652, 12704, 13
12822, 12874, 13
12982, 13034, 13
13132, 13184, 13
**
*NSET, NSET=NLEAD2, GENERATE
12517, 12521, 1
12717, 12721, 1
12887, 12891, 1
13047, 13051, 1
13197, 13201, 1
**
*NSET,NSET=SBOARD1,GEN
1483,1489,1
1451,1457,1
2412,2418,1
2380,2386,1
*NSET,NSET=SBOARD2
2525,2526,2558,2559,2581,2582
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*NSET,NSET=SPACK1
7531,7530,7507,7508,7997,7996,7973,7974
*NSET,NSET=SPACK2
7574,7575,7551,7552,8040,8041,8017,8018
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**
**ELEMENT PROPERTIES
**
*ORIENTATION,NAME=DEFAULT
1,0,0,0,1,0
3,0
**
*SOLID SECTION, ELSET=SOLDER, MATERIAL=DBL_POWER_SOLDER
**
*SOLID SECTION, ELSET=LEAD, MATERIAL=LEAD
**
*SOLID SECTION, ELSET=PAD, MATERIAL=PAD
**
*SOLID SECTION, ELSET=PACKAGE, MATERIAL=PACKAGE
**
*SOLID SECTION, ELSET=BOARD, MATERIAL=BOARD, ORIENTATION=DEFAULT
**
**  surfaceS
**
*surface,NAME=SPACK1
SPACK1,S4
*surface,NAME=SPACK2
SPACK2,S5
*surface,NAME=SBOARD1
SBOARD1,S2
*surface,NAME=SBOARD2
SBOARD2,S2
*surface,type=node,NAME=NLEAD1
NLEAD1,
*surface,type=node,NAME=NLEAD2
NLEAD2,
*surface,type=node,NAME=NPAD1
NPAD1,
*surface,type=node,NAME=NPAD2
NPAD2,
*NSET, NSET=CHPBRD
1451,1452,1453,1454,1455,1456
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**
*End Part
**
*Assembly, name=Assembly
**
*Instance, name=mount-1, part=mount
*End Instance
**
*End Assembly
**
** fr4
**
*MATERIAL,NAME=BOARD
**
*ELASTIC,TYPE=ENGINEERING CONSTANTS
15031,6895,15031,.241,.159,.497,2103,2758
2103,
*EXPANSION,TYPE=ORTHO,ZERO=0.0
20.6E-6,20.6E-6,68.3E-6
**
** eutectic solder (63Sn/37Pb)
**
*PHYSICAL CONSTANTS, ABSOLUTE ZERO=-273
*MATERIAL,NAME=DBL_POWER_SOLDER
*ELASTIC
31976,0.4,0.
20976,0.4,125.
*EXPANSION,ZERO=0.0
21E-6,
*CREEP,LAW=DOUBLE POWER
1.7e12, 5413., 3., 8.9e24, 5413., 7., 25.e3
**
** kovar
**
*MATERIAL,NAME=LEAD
*ELASTIC
138034,0.3
*EXPANSION,ZERO=0.0
5.87E-6,
**
** component (package) - alumina
**
*MATERIAL,NAME=PACKAGE
*ELASTIC
299992,0.22
*EXPANSION,ZERO=0.0
7.1E-6,
**
** copper
**
*MATERIAL,NAME=PAD
*ELASTIC
128933,0.345
*EXPANSION,ZERO=0.0
16.7E-6,
*CONTACT PAIR,TIED,ADJUST=.001,INTERACTION=TIED,SMALL SLIDING
mount-1.NLEAD1,mount-1.SPACK1
mount-1.NLEAD2,mount-1.SPACK2
mount-1.NPAD1,mount-1.SBOARD1
mount-1.NPAD2,mount-1.SBOARD2
*SURFACE INTERACTION,NAME=TIED
