*Heading
** input file for the co-simulation workshop in the
**   Abaqus/Explicit: Advanced Topics,
**   Substructures and Submodeling with Abaqus,
**   and Crashworthiness Analysis with Abaqus seminars
Beam Impact Co-simulation - substructure generation
**
**
*Preprint, echo=NO, model=NO, history=NO, contact=NO
** ----------------------------------------------------------------
**
** PART INSTANCE: beamRoot-1
**
*Node
   4231,          0.5,          0.5,          10.
   4232,          0.5,           0.,          10.
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*Element, type=C3D8I
3737, 4264, 4265, 4268, 4267, 4231, 4232, 4235, 4234
3738, 4265, 4266, 4269, 4268, 4232, 4233, 4236, 4235
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*Nset, nset=beamRoot-1__PickedSet5, generate
4231, 4329,   1
*Elset, elset=beamRoot-1__PickedSet5, generate
3737, 3776,   1
** Section: Section-1
*Solid Section, elset=beamRoot-1__PickedSet5, material=Material-1
,
*System
*Node
   4429,  2.10556194e-31,          5.5,  -24.3633804
*Nset, nset=impactor-refPt
4429,
*Nset, nset=beamRoot, generate
4231, 4329,   1
*Elset, elset=beamRoot, generate
3737, 3776,   1
*Nset, nset=retained-nodes
4261,4262,4263,4294,4295,4296,4327,4328,4329
*Elset, elset=retained-nodes
3755,3756,3775,3776
*Nset, nset=cosim-std
4261,4262,4263,4294,4295,4296,4327,4328,4329
*Elset, elset=cosim-std
3755,3756,3775,3776
*Nset, nset=fixed-end
4231,4232,4233,4264,4265,4266,4297,4298,4299
*Elset, elset=fixed-end
3737,3738,3757,3758
*Elset, elset=_cosim-std-surf_S5
3755,3756,3775,3776
*Surface, type=ELEMENT, name=cosim-std-surf
_cosim-std-surf_S5, S5
**
** MATERIALS
**
*Material, name=Material-1
*Density
1.,
*Elastic
100000., 0.1
**
** INTERACTION PROPERTIES
**
*Surface Interaction, name=IntProp-1
1.,
**
** BOUNDARY CONDITIONS
**
** Name: fix end Type: Symmetry/Antisymmetry/Encastre
*Boundary
fixed-end, ENCASTRE
** ----------------------------------------------------------------
**
** STEP: frequency
**
*Step, name=frequency, perturbation
*Frequency, eigensolver=Lanczos, acoustic coupling=on, normalization=displacement,SIM=NO
20, , , , ,
**
** BOUNDARY CONDITIONS
**
** Name: BC-2-fix-retained-nodes Type: Symmetry/Antisymmetry/Encastre
*Boundary
retained-nodes, ENCASTRE
**
** OUTPUT REQUESTS
**
*Restart, write, frequency=0
**
** FIELD OUTPUT: F-Output-2
**
*Output, field, variable=PRESELECT
*End Step
** ----------------------------------------------------------------
**
** STEP: Substructure generation
**
*Step
*substructure generate, name=beam, overwrite, recovery matrix=yes, mass matrix=yes
**
*boundary, op=new
fixed-end, ENCASTRE
**
*Retained nodal dofs
Retained-nodes,
**
*Select Eigenmodes,generate
1,20,1
**
*End Step
