*Heading
** input file for the co-simulation workshop in the
**   ABAQUS/Explicit: Advanced Topics,
**   Substructures and Submodeling with Abaqus,
**   and Crashworthiness Analysis with Abaqus seminars
Beam Impact Co-simulation - Abaqus/Explicit only reference solution
**
*Preprint, echo=NO, model=NO, history=NO, contact=NO
**
** PARTS
**
*Part, name=Impactor
*Node
      1,           0.,          1.5,          4.5
      2,          1.5,           0.,          4.5
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*Element, type=C3D8R
  1,  511,  512, 2234, 2224,   33,   32,  444,  443
  2,  512,  513, 2235, 2234,   32,   31,  445,  444
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*Nset, nset=_PickedSet11, internal, generate
    1,  4230,     1
*Elset, elset=_PickedSet11, internal, generate
    1,  3736,     1
** Section: Section-1
*Solid Section, elset=_PickedSet11, material=Material-1
,
*End Part
**
*Part, name=beamRoot
*Node
      1,          0.5,          0.5,          10.
      2,          0.5,           0.,          10.
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*Element, type=C3D8I
 1, 34, 35, 38, 37,  1,  2,  5,  4
 2, 35, 36, 39, 38,  2,  3,  6,  5
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*Nset, nset=_PickedSet5, internal, generate
  1,  99,   1
*Elset, elset=_PickedSet5, internal, generate
  1,  40,   1
** Section: Section-1
*Solid Section, elset=_PickedSet5, material=Material-1
,
*End Part
**
*Part, name=beamTip
*Node
      1,          0.5,          0.5,          10.
      2,          0.5,           0.,          10.
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*Element, type=C3D8I
 1, 34, 35, 38, 37,  1,  2,  5,  4
 2, 35, 36, 39, 38,  2,  3,  6,  5
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*Nset, nset=_PickedSet5, internal, generate
  1,  99,   1
*Elset, elset=_PickedSet5, internal, generate
  1,  40,   1
** Section: Section-1
*Solid Section, elset=_PickedSet5, material=Material-1
,
*End Part
**
**
** ASSEMBLY
**
*Assembly, name=Assembly
**
*Instance, name=Impactor-1, part=Impactor
          0.,          5.5, -9.99999977236758
          0.,          5.5, -9.99999977236758,           1.,          5.5, -9.99999977236758,          90.
*End Instance
**
*Instance, name=beamRoot-1, part=beamRoot
*End Instance
**
*Instance, name=beamTip-1, part=beamTip
          0.,           0.,         -10.
*End Instance
**
*Node
      1,  2.10556194e-31,          5.5,         -10.
*Nset, nset=impactor-refPt
 1,
*Nset, nset=beamRoot, instance=beamRoot-1, generate
  1,  99,   1
*Elset, elset=beamRoot, instance=beamRoot-1, generate
  1,  40,   1
*Nset, nset=beamTip, instance=beamTip-1, generate
  1,  99,   1
*Elset, elset=beamTip, instance=beamTip-1, generate
  1,  40,   1
*Nset, nset=retained-nodes, instance=beamRoot-1
 31, 32, 33, 64, 65, 66, 97, 98, 99
*Elset, elset=retained-nodes, instance=beamRoot-1
 19, 20, 39, 40
*Nset, nset=cosim-std, instance=beamRoot-1
 31, 32, 33, 64, 65, 66, 97, 98, 99
*Elset, elset=cosim-std, instance=beamRoot-1
 19, 20, 39, 40
*Nset, nset=cosim-xpl, instance=beamTip-1
  1,  2,  3, 34, 35, 36, 67, 68, 69
*Elset, elset=cosim-xpl, instance=beamTip-1
  1,  2, 21, 22
*Nset, nset=fixed-end, instance=beamRoot-1
  1,  2,  3, 34, 35, 36, 67, 68, 69
*Elset, elset=fixed-end, instance=beamRoot-1
  1,  2, 21, 22
*Nset, nset=tip, instance=beamTip-1
 31,
*Nset, nset=impactor-All, instance=Impactor-1, generate
    1,  4230,     1
*Elset, elset=impactor-All, instance=Impactor-1, generate
    1,  3736,     1
*Elset, elset=_cosim-std-surf_S5, internal, instance=beamRoot-1
 19, 20, 39, 40
*Surface, type=ELEMENT, name=cosim-std-surf
_cosim-std-surf_S5, S5
*Elset, elset=_cosim-xpl-surf_S3, internal, instance=beamTip-1
  1,  2, 21, 22
*Surface, type=ELEMENT, name=cosim-xpl-surf
_cosim-xpl-surf_S3, S3
** Constraint: rigid body - impactor
*Rigid Body, ref node=impactor-refPt, elset=impactor-All, position=CENTER OF MASS
** Constraint: tie beam
*Tie, name="tie beam", adjust=yes
cosim-std-surf, cosim-xpl-surf
*End Assembly
**
** MATERIALS
**
*Material, name=Material-1
*Density
1.,
*Elastic
100000., 0.1
**
** INTERACTION PROPERTIES
**
*Surface Interaction, name=IntProp-1
**
** BOUNDARY CONDITIONS
**
** Name: fix end Type: Symmetry/Antisymmetry/Encastre
*Boundary
fixed-end, ENCASTRE
**
** PREDEFINED FIELDS
**
** Name: impactor velocity   Type: Velocity
*Initial Conditions, type=VELOCITY
impactor-refPt, 1, 0.
impactor-refPt, 2, -10.
impactor-refPt, 3, 0.
** ----------------------------------------------------------------
**
** STEP: Step-1
**
*Step, name=Step-1
*Dynamic, Explicit
, 0.3
**
** INTERACTIONS
**
** Interaction: general contact
*Contact, op=NEW
*Contact Inclusions, ALL EXTERIOR
*Contact property assignment
 ,  , IntProp-1
**
** OUTPUT REQUESTS
**
*Restart, write, number interval=1, time marks=NO
**
** FIELD OUTPUT: F-Output-1
**
*Output, field, variable=PRESELECT, number interval=10, time marks=YES
**
** HISTORY OUTPUT: H-Output-2-tip
**
*Output, history
*Node Output, nset=tip
U2,
**
** HISTORY OUTPUT: H-Output-1
**
*Output, history, variable=PRESELECT
*End Step
