*HEADING
 Two-Story Frame: B21 elements
** This file is to be used in conjuction with the Superelements or
** Substructuring Lecture Series Workshop Problem
**
**RESTART,WRITE,OVERLAY
*NODE
       1,          0.,          0.
       2,          0.,        0.24
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**
*ELEMENT, TYPE=B21 , ELSET=BEAM
       1,       1,       2
       2,       2,       3
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*BEAM SECTION,SECTION=RECT,MATERIAL=STEEL,ELSET=BEAM
0.1 , 0.1
*MATERIAL,NAME=STEEL
*ELASTIC
2.1E11 , 0.3
*DENSITY
7200.,
*BOUNDARY
1,ENCASTRE
22,ENCASTRE
*ELSET,ELSET=SNOWBOT,GEN
21,30,1
*ELSET,ELSET=SNOWTOP,GEN
51,60,1
**
** step  1: Combined Loading
**
*STEP, NLGEOM
Snow and Wind Loading
*STATIC
1.0,1.0
*DLOAD
SNOWBOT,PY,-100.
SNOWTOP,PY,-235.
*CLOAD
11,1,50.
44,1,100.
*NODE PRINT,FREQ=0
*EL PRINT,FREQ=0
*OUTPUT,FIELD
*NODE OUTPUT
U,
*ENDSTEP
