*HEADING
**
** substructure generation for surface_mount.inp
** Units mm, MPa, sec, Celsius
**
*NODE,NSET=NALL
       1,          0.,          0.,    -2.06591
       2,     1.30048,          0.,    -2.06591
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**
**  ELEMENT DEFINITIONS
**
*ELEMENT, TYPE=C3D6, ELSET=SOLDERC
 3121, 3904, 4232, 4416, 3905, 4233, 4417
 3122, 3906, 4234, 4418, 3907, 4235, 4419
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*ELEMENT, TYPE=C3D6, ELSET=PACKAGE
 4727, 5919, 5920, 5923, 6615, 6616, 6619
 4730, 5915, 5916, 5929, 6611, 6612, 6625
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*ELEMENT, TYPE=C3D6, ELSET=BOARD
    1,    8,    9,   25,  937,  938,  954
    2,   20,   21,   36,  949,  950,  965
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*ELEMENT, TYPE=C3D8R, ELSET=SOLDERC
 2625, 3075, 3076, 3083, 3082, 3720, 3674, 3675, 3721
 2626, 3089, 3090, 3097, 3096, 3722, 3676, 3677, 3723
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*ELEMENT, TYPE=C3D8I, ELSET=LEADPADC
 2221, 1887, 1888, 1900, 1899, 3070, 3071, 3078, 3077
 2222, 1888, 1889, 1901, 1900, 3071, 3072, 3079, 3078
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*ELEMENT, TYPE=C3D8R, ELSET=PACKAGE
 4728, 5920, 5921, 5924, 5923, 6616, 6617, 6620, 6619
 4729, 5921, 5922, 5925, 5924, 6617, 6618, 6621, 6620
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*ELEMENT, TYPE=C3D8I, ELSET=BOARD
    3,    9,   10,   26,   25,  938,  939,  955,  954
    4,   10,   11,   27,   26,  939,  940,  956,  955
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**
** ELEMENT SET DEFINITIONS
**
** leadc
**
*ELSET, ELSET=LEADC
    3722,    3723,    3724,    3725,    3726,    3727
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**
** padc
**
*ELSET, ELSET=PADC
    2221,    2222,    2223,    2224,    2225,    2226
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*ELSET,ELSET=LEAD
LEADC,
*ELSET,ELSET=PAD
PADC,
*ELSET,ELSET=SOLDER
SOLDERC,
**
**
** NODE SET DEFINITIONS
**
** ysymmp
**
*NSET, NSET=YSYMMP
    5912,    5913,    5914,    5915,    5916,    5917
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**
** xsymmp
**
*NSET, NSET=XSYMMP
    5912,    5939,    5963,    5987,    6011,    6035
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**
** ysymmb
**
*NSET, NSET=YSYMMB
       1,       2,       3,       4,       5,       6
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**
** xsymmb
**
*NSET, NSET=XSYMMB
       1,      79,     145,     211,     277,     343
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*NSET,NSET=XSYMM
XSYMMP,XSYMMB
*NSET,NSET=YSYMM
YSYMMP,YSYMMB
**
** pinz
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**
**ELEMENT PROPERTIES
**
**local orientation matching global system
*ORIENTATION,NAME=RECT
 1.0, 0.0, 0.0, 0.0, 1.0, 0.0
 1, 0.0
*SOLID SECTION, ELSET=SOLDER, MATERIAL=SOLDER
**
*SOLID SECTION, ELSET=LEAD, MATERIAL=LEAD
**
*SOLID SECTION, ELSET=PAD, MATERIAL=PAD
**
*SOLID SECTION, ELSET=PACKAGE, MATERIAL=PACKAGE
**
*SOLID SECTION, ELSET=BOARD, MATERIAL=BOARD,ORIENT=RECT
**
**
** fr4
**
*MATERIAL,NAME=BOARD
**
*ELASTIC,TYPE=ENGINEERING CONSTANTS
15031,6895,15031,.241,.159,.497,2103,2758
2103,
*EXPANSION,TYPE=ORTHO,ZERO=0.0
20.6E-6,20.6E-6,68.3E-6
**
** eutectic solder (63Sn/37Pb)
**
*MATERIAL,NAME=SOLDER
*ELASTIC
31976,0.4,0
20976,0.4,125
*EXPANSION,ZERO=0.0
21E-6,
**
** kovar
**
*MATERIAL,NAME=LEAD
*ELASTIC
138034,0.3
*EXPANSION,ZERO=0.0
5.87E-6,
**
** component (package) - alumina
**
*MATERIAL,NAME=PACKAGE
*ELASTIC
299992,0.22
*EXPANSION,ZERO=0.0
7.1E-6,
**
** copper
**
*MATERIAL,NAME=PAD
*ELASTIC
128933,0.345
*EXPANSION,ZERO=0.0
16.7E-6,
