*HEADING
*RESTART,WRITE,READ,STEP=1
*STEP,INC=300,NLGEOM=YES,UNSYMM=YES
 1:  STRAIGHT LINE ROLLING
*STEADY STATE TRANSPORT, INERTIA=YES
 0.5, 1.
*CONTROLS, ANALYSIS=DISCONTINUOUS
*CHANGE FRICTION,INTERACTION=SRIGID
*FRICTION,SLIP=0.02
 0.5
*TRANSPORT VELOCITY
 TIRE, 72.8
*MOTION,TYPE=VELOCITY,TRANSLATION
 TIRE, 1, , 22222.2
*OUTPUT,FIELD,FREQ=1
*ELEMENT OUTPUT
 S,LE
*ELEMENT OUTPUT,REBAR
 S,LE,RBANG,RBFOR,RBROT
*NODE OUTPUT
 U,
*CONTACT OUTPUT, VAR=PRESELECT
*OUTPUT,HISTORY, VAR=PRESELECT
*OUTPUT,HISTORY
*NODE OUTPUT, NSET=ROAD
 U,TF
*END STEP
*STEP, NLGEOM, UNSYMM=YES
*STEADY STATE TRANSPORT, INERTIA=YES
0.02, 1.0, 1E-6, 0.02
*AMPLITUDE, NAME=F, DEFINITION=USER, VARIABLES=4
*TRANSPORT VELOCITY, AMPLITUDE=F
 TIRE, 72.8
*CONTROLS, PARAMETERS=FIELD
,1.0
*OUTPUT, HISTORY, SENSOR, NAME=S1
*NODE OUTPUT, NSET=CARCASS-1_RIM
RM2
*OUTPUT, FIELD
*NODE OUTPUT
U
*CONTACT OUTPUT
CSTRESS
*OUTPUT, HISTORY
*NODE OUTPUT, NSET=CARCASS-1_RIM
U, RF
*END STEP
