*Heading
**
** PARTS
**
*Part, name=Axle
*Node
      1,           0.,           0.,           0.
      2,           0.,           0.,   1.60000002
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*Element, type=SFM3D4R
  1,   1,  11, 354, 140
  2,  11,  12, 355, 354
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*Nset, nset=All, generate
    1,  1251,     1
*Elset, elset=All, generate
    1,  1448,     1
** Section: Rigid
*Surface Section, elset=All
*End Part
**
*Part, name=Cart
*Node
      1,           0.,           0.,          1.5
      2,           0.,           1.,          1.5
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*Element, type=SFM3D4R
 1,  1,  9, 85, 24
 2,  9, 10, 86, 85
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*Nset, nset=All, generate
   1,  290,    1
*Elset, elset=All, generate
   1,  288,    1
** Section: Rigid
*Surface Section, elset=All
*End Part
**
*Part, name=Lug
*Node
      1, -0.229565367,  0.224999994,           0.
      2, -0.100000001,  0.224999994,           0.
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*Element, type=SFM3D4R
 1,  27,  28, 259, 249
 2,  28,   1,  29, 259
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*Nset, nset=All, generate
   1,  876,    1
*Elset, elset=All, generate
   1,  896,    1
** Section: Rigid
*Surface Section, elset=All
*End Part
**
*Part, name=Mass
*Node
      1,           0.,           0.,          0.5
      2,         -0.5,           0.,           0.
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*Element, type=SFM3D4R
  1,  14,  15, 209, 201
  2,  15,  16, 210, 209
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*Nset, nset=All, generate
    1,  1538,     1
*Elset, elset=All, generate
    1,  1536,     1
** Section: Rigid
*Surface Section, elset=All
*End Part
**
*Part, name=Road
*Node
      1,         -20.,           0.,           0.
      2,        -19.5,           0.,           0.
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*Element, type=SFM3D4R
  1,   1,   2,  83,  82
  2,   2,   3,  84,  83
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*Nset, nset=All, generate
   1,  486,    1
*Elset, elset=All, generate
   1,  400,    1
** Section: Rigid
*Surface Section, elset=All
*End Part
**
*Part, name=Rod
*Node
      1, 0.0999937728, -0.150000006, -0.00111625833
      2, 0.0999937728,  0.150000006, -0.00111625833
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*Element, type=SFM3D4R
 1,   1,  19, 125, 137
 2,  19,  18, 126, 125
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*Element, type=SFM3D3
 95,  34,  33,  69
 96,  68,  34,  69
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*Nset, nset=All, generate
    1,  2218,     1
*Elset, elset=All, generate
    1,  2230,     1
** Section: Rigid
*Surface Section, elset=All
*End Part
**
*Part, name=Wheel-surface
*Surface, type=CYLINDER, name=outer
START,          0.5,           0.
 CIRCL,           0.,         -0.5,           0.,           0.
 CIRCL,         -0.5,           0.,           0.,           0.
 CIRCL,           0.,          0.5,           0.,           0.
 CIRCL,          0.5,           0.,           0.,           0.
*End Part
**
*Part, name=Wheel
*Node
      1,           0.,           0.,           0.
      2,           0.,           0.,  0.174999997
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*Element, type=SFM3D4R
 1,   1,  11, 213,  32
 2,  11,  12, 214, 213
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*Nset, nset=All, generate
    1,  1036,     1
*Elset, elset=All, generate
    1,  1080,     1
** Section: Rigid
*Surface Section, elset=All
*End Part
**
**
** ASSEMBLY
**
*Assembly, name=Assembly
**
*Instance, name=Cart-1, part=Cart
*End Instance
**
*Instance, name=Rod-1, part=Rod
         1.5,        1.225,         0.75
         1.5,        1.225,         0.75, 0.507567522901759, 1.13817341095119, 0.836826589048808, 90.4352318522132
*End Instance
**
*Instance, name=Lug-1, part=Lug
         1.5,           1.,        0.465
*End Instance
**
*Instance, name=Lug-2, part=Lug
         1.5,           1.,         0.91
*End Instance
**
*Instance, name=Mass-1, part=Mass
0.63175873237288,     6.149039,         0.75
*End Instance
**
*Instance, name=Axle-1, part=Axle
2.64999958470188,        0.175,        -0.05
*End Instance
**
*Instance, name=Axle-2, part=Axle
0.34999958470188,        0.175,        -0.05
*End Instance
**
*Instance, name=Wheel-1, part=Wheel
0.349999584701879,        0.175,       -0.235
*End Instance
**
*Instance, name=Wheel-2, part=Wheel
0.349999584701879,        0.175,         1.56
*End Instance
**
*Instance, name=Wheel-3, part=Wheel
2.64999958470188,        0.175,       -0.235
*End Instance
**
*Instance, name=Wheel-4, part=Wheel
2.64999958470188,        0.175,         1.56
*End Instance
**
*Instance, name=Road-1, part=Road
          0.,       -0.325,           2.
          0.,       -0.325,           2.,          -1.,       -0.325,           2.,          90.
*End Instance
**
*Instance, name=Wheel-surface-1, part=Wheel-surface
        0.35,        0.175,      -0.1475
*End Instance
**
*Instance, name=Wheel-surface-2, part=Wheel-surface
        0.35,        0.175,       1.6475
*End Instance
**
*Instance, name=Wheel-surface-3, part=Wheel-surface
        2.65,        0.175,      -0.1475
*End Instance
**
*Instance, name=Wheel-surface-4, part=Wheel-surface
        2.65,        0.175,       1.6475
*End Instance
**
*Node
      1,          1.5,          0.5,         0.75
*Node
      2,  0.349999577,  0.174999997, -0.0500000007
*Node
      3,  0.349999577,  0.174999997,   1.54999995
*Node
      4,   2.64999962,  0.174999997, -0.0500000007
*Node
      5,   2.64999962,  0.174999997,   1.54999995
*Node
      6,          1.5,   1.22500002,  0.589999974
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*Element, type=CONN3D2
13, 6, 8
*Connector Section, elset=Wire-1-Set-1
Hinge,
"Datum csys-2",
*Element, type=CONN3D2
14, 10, 2
*Connector Section, elset=Wire-2-Set-1
Hinge,
"Datum csys-3",
*Element, type=CONN3D2
15, 14, 4
*Connector Section, elset=Wire-3-Set-1
Hinge,
"Datum csys-4",
*Element, type=CONN3D2
16, 3, 12
*Connector Section, elset=Wire-4-Set-1
Hinge,
"Datum csys-5",
*Element, type=CONN3D2
17, 5, 16
*Connector Section, elset=Wire-5-Set-1
Hinge,
"Datum csys-6",
*Nset, nset=CartTieNodes, generate
 2,  6,  1
*Nset, nset=CartRefNode
 1,
*Nset, nset=CartRigid, instance=Cart-1, generate
   1,  290,    1
*Nset, nset=CartRigid, instance=Lug-1, generate
   1,  876,    1
*Nset, nset=CartRigid, instance=Axle-1, generate
    1,  1251,     1
*Nset, nset=CartRigid, instance=Lug-2, generate
   1,  876,    1
*Nset, nset=CartRigid, instance=Axle-2, generate
    1,  1251,     1
*Elset, elset=CartRigid, instance=Cart-1, generate
   1,  288,    1
*Elset, elset=CartRigid, instance=Lug-1, generate
   1,  896,    1
*Elset, elset=CartRigid, instance=Axle-1, generate
    1,  1448,     1
*Elset, elset=CartRigid, instance=Lug-2, generate
   1,  896,    1
*Elset, elset=CartRigid, instance=Axle-2, generate
    1,  1448,     1
*Nset, nset=PendulumRefNode
 7,
*Nset, nset=PendulumTieNode
 8,
*Nset, nset=PendulumRigid, instance=Rod-1, generate
    1,  2218,     1
*Nset, nset=PendulumRigid, instance=Mass-1, generate
    1,  1538,     1
*Elset, elset=PendulumRigid, instance=Rod-1, generate
    1,  2230,     1
*Elset, elset=PendulumRigid, instance=Mass-1, generate
    1,  1536,     1
*Nset, nset=Wheel-1-RefNode
 9,
*Nset, nset=Wheel-1-TieNode
 10,
*Nset, nset=Wheel-2-RefNode
 11,
*Nset, nset=Wheel-2-TieNode
 12,
*Nset, nset=Wheel-3-RefNode
 13,
*Nset, nset=Wheel-3-TieNode
 14,
*Nset, nset=Wheel-4-RefNode
 15,
*Nset, nset=Wheel-4-TieNode
 16,
*Nset, nset=Wire-1-Set-1
 6, 8
*Elset, elset=Wire-1-Set-1
 13,
*Nset, nset=Wire-2-Set-1
  2, 10
*Elset, elset=Wire-2-Set-1
 14,
*Nset, nset=Wire-3-Set-1
  4, 14
*Elset, elset=Wire-3-Set-1
 15,
*Nset, nset=Wire-4-Set-1
  3, 12
*Elset, elset=Wire-4-Set-1
 16,
*Nset, nset=Wire-5-Set-1
  5, 16
*Elset, elset=Wire-5-Set-1
 17,
*Nset, nset=RoadRefNode
 17,
*Elset, elset=_Road_SPOS, internal, instance=Road-1, generate
   1,  400,    1
*Surface, type=ELEMENT, name=Road
_Road_SPOS, SPOS
*Elset, elset=_Wheels_SPOS, internal, instance=Wheel-1, generate
    1,  1080,     1
*Elset, elset=_Wheels_SPOS, internal, instance=Wheel-2, generate
    1,  1080,     1
*Elset, elset=_Wheels_SPOS, internal, instance=Wheel-3, generate
    1,  1080,     1
*Elset, elset=_Wheels_SPOS, internal, instance=Wheel-4, generate
    1,  1080,     1
*Surface, type=ELEMENT, name=Wheels
_Wheels_SPOS, SPOS
*Orientation, name="Datum csys-2"
 6.66133814775093e-14,           0.,           1.,           0.,           1.,           0.
1, 0.
*Orientation, name="Datum csys-3"
          0.,           0.,           1.,           0.,           1.,           0.
1, 0.
*Orientation, name="Datum csys-4"
          0.,           0.,           1.,           0.,           1.,           0.
1, 0.
*Orientation, name="Datum csys-5"
          0.,           0.,           1.,           0.,           1.,           0.
1, 0.
*Orientation, name="Datum csys-6"
          0.,           0.,           1.,           0.,           1.,           0.
1, 0.
** Constraint: Rigid-Cart
*Rigid Body, ref node=CartRefNode, elset=CartRigid, tie nset=CartTieNodes
** Constraint: Rigid-Pendulum
*Rigid Body, ref node=PendulumRefNode, elset=PendulumRigid, tie nset=PendulumTieNode
** Constraint: Rigid-Road
*Rigid Body, ref node=RoadRefNode, elset=Road-1.All
** Constraint: Rigid-Wheel-1
*Rigid Body, ref node=Wheel-1-RefNode, elset=Wheel-1.All, tie nset=Wheel-1-TieNode, analytical surface=Wheel-surface-1.outer
** Constraint: Rigid-Wheel-2
*Rigid Body, ref node=Wheel-2-RefNode, elset=Wheel-2.All, tie nset=Wheel-2-TieNode, analytical surface=Wheel-surface-2.outer
** Constraint: Rigid-Wheel-3
*Rigid Body, ref node=Wheel-3-RefNode, elset=Wheel-3.All, tie nset=Wheel-3-TieNode, analytical surface=Wheel-surface-3.outer
** Constraint: Rigid-Wheel-4
*Rigid Body, ref node=Wheel-4-RefNode, elset=Wheel-4.All, tie nset=Wheel-4-TieNode, analytical surface=Wheel-surface-4.outer
*Element, type=MASS, elset=CartRefNode_Cart-Mass_
1, 1
*Mass, elset=CartRefNode_Cart-Mass_
1.5,
*Element, type=MASS, elset=PendulumRefNode_Pendulum-Mass_MASS_
2, 7
*Mass, elset=PendulumRefNode_Pendulum-Mass_MASS_
2.,
*Element, type=ROTARYI, elset=PendulumRefNode_Pendulum-Mass_ROTI_
3, 7
*Rotary Inertia, elset=PendulumRefNode_Pendulum-Mass_ROTI_
1e-05, 1e-05, 1e-05, 0., 0., 0.
*Element, type=MASS, elset=RoadRefNode_Road-Mass_
4, 17
*Mass, elset=RoadRefNode_Road-Mass_
1.,
*Element, type=MASS, elset=Wheel-1-RefNode_Wheel-1-Mass_MASS_
5, 9
*Mass, elset=Wheel-1-RefNode_Wheel-1-Mass_MASS_
0.1,
*Element, type=ROTARYI, elset=Wheel-1-RefNode_Wheel-1-Mass_ROTI_
6, 9
*Rotary Inertia, elset=Wheel-1-RefNode_Wheel-1-Mass_ROTI_
0., 0., 0.0125, 0., 0., 0.
*Element, type=MASS, elset=Wheel-2-RefNode_Wheel-2-Mass_MASS_
7, 11
*Mass, elset=Wheel-2-RefNode_Wheel-2-Mass_MASS_
0.1,
*Element, type=ROTARYI, elset=Wheel-2-RefNode_Wheel-2-Mass_ROTI_
8, 11
*Rotary Inertia, elset=Wheel-2-RefNode_Wheel-2-Mass_ROTI_
0., 0., 0.0125, 0., 0., 0.
*Element, type=MASS, elset=Wheel-3-RefNode_Wheel-3-Mass_MASS_
9, 13
*Mass, elset=Wheel-3-RefNode_Wheel-3-Mass_MASS_
0.1,
*Element, type=ROTARYI, elset=Wheel-3-RefNode_Wheel-3-Mass_ROTI_
10, 13
*Rotary Inertia, elset=Wheel-3-RefNode_Wheel-3-Mass_ROTI_
0., 0., 0.0125, 0., 0., 0.
*Element, type=MASS, elset=Wheel-4-RefNode_Wheel-4-Mass_MASS_
11, 15
*Mass, elset=Wheel-4-RefNode_Wheel-4-Mass_MASS_
0.1,
*Element, type=ROTARYI, elset=Wheel-4-RefNode_Wheel-4-Mass_ROTI_
12, 15
*Rotary Inertia, elset=Wheel-4-RefNode_Wheel-4-Mass_ROTI_
0., 0., 0.0125, 0., 0., 0.
*End Assembly
**
** INTERACTION PROPERTIES
**
*Surface Interaction, name=Friction
*Friction
 0.5,
** ----------------------------------------------------------------
**
** STEP: Step-1
**
*Step, name=Step-1
Apply control force to balance pendulum
*Dynamic, Explicit, direct user control
0.0001, 5.
**
** BOUNDARY CONDITIONS
**
*Boundary, type=VELOCITY
Wheel-1-RefNode, 2, 3
Wheel-2-RefNode, 2, 3
Wheel-3-RefNode, 2, 3
Wheel-4-RefNode, 2, 3
*Boundary, type=VELOCITY
CartRefNode, 3, 6
*Boundary, type=VELOCITY
RoadRefNode, 1, 6
**
** LOADS
**
*Dload
, GRAV, 100., 0., -1., 0.
**
** INTERACTIONS
**
** Interaction: General contact
*Contact, op=NEW
*Contact Inclusions
Road , Wheel-surface-1.outer
Road , Wheel-surface-2.outer
Road , Wheel-surface-3.outer
Road , Wheel-surface-4.outer
*Contact Property Assignment
 ,  , Friction
**
** OUTPUT REQUESTS
**
*Restart, write, number interval=1, time marks=NO
**
** FIELD OUTPUT: Displacements
**
*Output, field, number interval=100
*Node Output
UT,
**
** HISTORY OUTPUT: Energy
**
*Output, history, variable=PRESELECT
*End Step
