*Heading
** creep analysis of solder joints by using literature experimental data
**
** PARTS
**
*Part, name=PCB-Substrate
*Node
      1,           0.,          -2.
      2,          0.5,          -2.
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*Element, type=CPE4R
  1,   1,   2,  43,  42
  2,   2,   3,  44,  43
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*Nset, nset=all, generate
   1,  205,    1
*Elset, elset=all, generate
   1,  160,    1
** Section: Section-pcb
*Solid Section, elset=all, material=PCB
,
*End Part
**
*Part, name=siliconDie
*Node
      1,          17.,          2.5
      2,         16.5,          2.5
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*Element, type=CPE4R
 1,   1,   2,  37,  36
 2,   2,   3,  38,  37
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*Nset, nset=all, generate
   1,  105,    1
*Elset, elset=all, generate
  1,  68,   1
** Section: Section-silicon
*Solid Section, elset=all, material=Silicon
,
*End Part
**
*Part, name=solderball1
*Node
      1,   3.61617041,  0.109999999
      2,   1.38382959,  0.109999999
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*Element, type=CPE4R
 1,   1,   9,  85,  38
 2,   9,  10,  86,  85
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*Nset, nset=all, generate
   1,  269,    1
*Elset, elset=all, generate
   1,  239,    1
** Section: Section-sball1
*Solid Section, elset=all, material=Solder
,
*End Part
**
*Part, name=solderball2
*Node
      1,   9.61616993,  0.109999999
      2,   7.38382959,  0.109999999
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*Element, type=CPE4R
 1,   1,   9,  85,  38
 2,   9,  10,  86,  85
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*Nset, nset=all, generate
   1,  269,    1
*Elset, elset=all, generate
   1,  239,    1
** Section: Section-sball2
*Solid Section, elset=all, material=Solder
,
*End Part
**
*Part, name=soldreball3
*Node
      1,   15.6161699,  0.109999999
      2,   13.3838301,  0.109999999
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*Element, type=CPE4R
 1,   1,   9,  85,  38
 2,   9,  10,  86,  85
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*Nset, nset=all, generate
   1,  269,    1
*Elset, elset=all, generate
   1,  239,    1
** Section: Section-sball3
*Solid Section, elset=all, material=Solder
,
*End Part
**
**
** ASSEMBLY
**
*Assembly, name=Assembly
**
*Instance, name=PCB-Substrate-1, part=PCB-Substrate
*End Instance
**
*Instance, name=siliconDie-1, part=siliconDie
*End Instance
**
*Instance, name=solderball1-1, part=solderball1
*End Instance
**
*Instance, name=solderball2-1, part=solderball2
*End Instance
**
*Instance, name=soldreball3-1, part=soldreball3
*End Instance
**
*Nset, nset=All, instance=PCB-Substrate-1, generate
   1,  205,    1
*Nset, nset=All, instance=siliconDie-1, generate
   1,  105,    1
*Nset, nset=All, instance=solderball2-1, generate
   1,  269,    1
*Nset, nset=All, instance=solderball1-1, generate
   1,  269,    1
*Nset, nset=All, instance=soldreball3-1, generate
   1,  269,    1
*Elset, elset=All, instance=PCB-Substrate-1, generate
   1,  160,    1
*Elset, elset=All, instance=siliconDie-1, generate
  1,  68,   1
*Elset, elset=All, instance=solderball2-1, generate
   1,  239,    1
*Elset, elset=All, instance=solderball1-1, generate
   1,  239,    1
*Elset, elset=All, instance=soldreball3-1, generate
   1,  239,    1
*Nset, nset=fixpoint, instance=PCB-Substrate-1
 1,
*Elset, elset=leftball-upright, instance=solderball1-1
 70, 83, 84
*Nset, nset=leftside, instance=PCB-Substrate-1, generate
   1,  165,   41
*Nset, nset=leftside, instance=siliconDie-1, generate
  35,  105,   35
*Elset, elset=leftside, instance=PCB-Substrate-1, generate
   1,  121,   40
*Elset, elset=leftside, instance=siliconDie-1
 34, 68
*Elset, elset=midball-upright, instance=solderball2-1
 70, 83, 84
*Elset, elset=rightball-mid, instance=soldreball3-1
 188, 210, 211, 214
*Elset, elset=rightball-upright, instance=soldreball3-1
 70, 83, 84
*Elset, elset=_pcb-up_S3, internal, instance=PCB-Substrate-1, generate
 121,  160,    1
*Surface, type=ELEMENT, name=pcb-up
_pcb-up_S3, S3
*Elset, elset=_sball1-low_S3, internal, instance=solderball1-1, generate
 29,  42,   1
*Surface, type=ELEMENT, name=sball1-low
_sball1-low_S3, S3
*Elset, elset=_sball1-up_S3, internal, instance=solderball1-1, generate
 71,  84,   1
*Surface, type=ELEMENT, name=sball1-up
_sball1-up_S3, S3
*Elset, elset=_sball2-low_S3, internal, instance=solderball2-1, generate
 29,  42,   1
*Surface, type=ELEMENT, name=sball2-low
_sball2-low_S3, S3
*Elset, elset=_sball2-up_S3, internal, instance=solderball2-1, generate
 71,  84,   1
*Surface, type=ELEMENT, name=sball2-up
_sball2-up_S3, S3
*Elset, elset=_sball3-low_S3, internal, instance=soldreball3-1, generate
 29,  42,   1
*Surface, type=ELEMENT, name=sball3-low
_sball3-low_S3, S3
*Elset, elset=_sball3-up_S3, internal, instance=soldreball3-1, generate
 71,  84,   1
*Surface, type=ELEMENT, name=sball3-up
_sball3-up_S3, S3
*Elset, elset=_silicon-low_S3, internal, instance=siliconDie-1, generate
 35,  68,   1
*Surface, type=ELEMENT, name=silicon-low
_silicon-low_S3, S3
** Constraint: Constraint-1
*Tie, name=Constraint-1, adjust=yes
sball1-low, pcb-up
** Constraint: Constraint-2
*Tie, name=Constraint-2, adjust=yes
sball2-low, pcb-up
** Constraint: Constraint-3
*Tie, name=Constraint-3, adjust=yes
sball3-low, pcb-up
** Constraint: Constraint-4
*Tie, name=Constraint-4, adjust=yes
sball1-up, silicon-low
** Constraint: Constraint-5
*Tie, name=Constraint-5, adjust=yes
sball2-up, silicon-low
** Constraint: Constraint-6
*Tie, name=Constraint-6, adjust=yes
sball3-up, silicon-low
*End Assembly
**------------Define Amplitude for cyclic thermal loading---------------
**
**
** MATERIALS
**
*Material, name=PCB
*Elastic
27000., 0.39
*Expansion
 1.6e-05,
*Material, name=Silicon
*Elastic
131000., 0.28
*Expansion
 2.7e-06,
*Material, name=Solder
**
**------------------ Define Creep (User)---------------------------------
*Elastic
41600., 0.35
*Expansion
 2.17e-05,
**
**--Define user Table to describe the creep behavior of solder material--
**
**
** BOUNDARY CONDITIONS
**
*Boundary
leftside, XSYMM
fixpoint, 2, 2
**
**
** STEP: Step-1
**
*Step, name=Step-1, nlgeom=YES, inc=10000
**
** ------------------Add the first creep analysis step--------------------
**
** PREDEFINED FIELDS
**
**
** ----------------Define cyclic thermal loading--------------------------
**
** OUTPUT REQUESTS
**
*Restart, write, frequency=0
**
** FIELD OUTPUT
**
*Output, field, variable=PRESELECT
**
** HISTORY OUTPUT
**
*Output, history
*Element Output, elset=leftball-upright
CEEQ, MISES
*Element Output, elset=midball-upright
CEEQ, MISES
*Element Output, elset=rightball-upright
CEEQ, MISES
*Element Output, elset=rightball-mid
CEEQ, MISES
*End Step
**
**
** STEP: Step-2
**
*Step, name=Step-2, nlgeom=YES, inc=10000
**
** --------------------Add the second creep analysis step-----------------
**
** PREDEFINED FIELDS
**
**
** ----------------Define cyclic thermal loading--------------------------
**
*End Step
**
**
** STEP: Step-3
**
*Step, name=Step-3, nlgeom=YES, inc=10000
**
** --------------------Add the third creep analysis step------------------
**
** PREDEFINED FIELDS
**
**
** ----------------Define cyclic thermal loading--------------------------
**
*End Step
