*Heading
** Job name: Job-1 Model name: Model-1
** Generated by: Abaqus/CAE 2023.HF4
*Preprint, echo=NO, model=NO, history=NO, contact=NO
**
** PARTS
**
*Part, name=cube
*Node
      1,           1.,           1.,           1.
      2,           1.,  0.899999976,           1.
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*Element, type=C3D8T
   1,  122,  123,  134,  133,    1,    2,   13,   12
   2,  123,  124,  135,  134,    2,    3,   14,   13
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*Nset, nset=Top_nodes
    1,  111, 1211, 1321
*Nset, nset=Bot_nodes
   11,  121, 1221, 1331
*Nset, nset=Left_nodes
 1211, 1221, 1321, 1331
*Nset, nset=Right_nodes
  111,  121, 1321, 1331
*Nset, nset=Set-1, generate
    1,  1331,     1
*Elset, elset=Set-1, generate
    1,  1000,     1
** Section: Section-1
*Solid Section, elset=Set-1, material=Steel
,
*End Part
**
**
** ASSEMBLY
**
*Assembly, name=Assembly
**
*Instance, name=cube-1, part=cube
*End Instance
**
*Nset, nset=Set-1, instance=cube-1, generate
   11,  1331,    11
*Elset, elset=Set-1, instance=cube-1, generate
   10,  1000,    10
*Nset, nset=Set-2, instance=cube-1, generate
    1,  1321,    11
*Elset, elset=Set-2, instance=cube-1, generate
   1,  991,   10
*Nset, nset=Set-3, instance=cube-1
    1,    2,    3,    4,    5,    6
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*Elset, elset=Set-3, instance=cube-1
    1,    2,    3,    4,    5,    6
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*End Assembly
**
** MATERIALS
**
*Material, name=Steel
*Conductivity
1.,
*Density
 7.8e-09,
*Elastic
200000., 0.3
*Specific Heat
1.,
** ----------------------------------------------------------------
**
** STEP: Step-1
**
*Step, name=Step-1, nlgeom=YES
*Coupled Temperature-displacement, creep=none
1., 1.,
**
** BOUNDARY CONDITIONS
**
** Name: BC-1 Type: Symmetry/Antisymmetry/Encastre
*Boundary
Set-1, ENCASTRE
** Name: BC-2 Type: Displacement/Rotation
*Boundary
Set-2, 2, 2, 0.1
** Name: BC-3 Type: Symmetry/Antisymmetry/Encastre
*Boundary
Set-3, YASYMM
**
** OUTPUT REQUESTS
**
*Restart, write, frequency=0
**
** FIELD OUTPUT: F-Output-1
**
*Output, field
*Node Output
CF, COORD, NT, RF, RFL, U
*Element Output, directions=YES
COORD, HFL, LE, PE, PEEQ, PEMAG, S
*Contact Output
CDISP, CSTRESS
**
** HISTORY OUTPUT: H-Output-1
**
*Output, history, variable=PRESELECT
*End Step
